// SBML level 3 version 2

model __main()

  // Compartments:
  compartment default_compartment = 1;

  // Species:
  species C00001 in default_compartment = v69*10*dilution_factor;
  species C11592 in default_compartment = v148*0.001*dilution_factor;
  species C00014 in default_compartment = v180*0.001*dilution_factor;
  species C00288 in default_compartment = v219*10.001*dilution_factor;
  species C00209 in default_compartment = v233*0.001*dilution_factor;
  species C00003 in default_compartment = v338*0.001*dilution_factor;
  species C02218 in default_compartment = v340*0.001*dilution_factor;
  species C00010 in default_compartment = v346*1.4*dilution_factor;
  species C00036 in default_compartment = v359*0.0011*dilution_factor;
  species C00022 in default_compartment = v386*0.0011*dilution_factor;
  species C00065 in default_compartment = v409*1.001*dilution_factor;
  species C00058 in default_compartment = v435*15*dilution_factor;
  species C00024 in default_compartment = v440*1.61*dilution_factor;
  species C00011 in default_compartment = v470*0.001*dilution_factor;
  species C00009 in default_compartment = v483*0.001*dilution_factor;
  species C00741 in default_compartment = v526*0.001*dilution_factor;
  species C00149 in default_compartment = v539*1.7*dilution_factor;
  species C00008 in default_compartment = v555*0.001*dilution_factor;
  species C00004 in default_compartment = v581*1.083*dilution_factor;
  species C00080 in default_compartment = v593*0.0001*dilution_factor;
  species C00161 in default_compartment = v613*0.001*dilution_factor;
  species C02441 in default_compartment = v680*0.001*dilution_factor;
  species C05167 in default_compartment = v691*0.001*dilution_factor;
  species C00002 in default_compartment = v712*1.001*dilution_factor;
  species eEC4213 in default_compartment = p_eEC4213*rel0*0.017715569*dilution_factor;
  species eEC2776 in default_compartment = p_eEC2776*rel0*0.044380239*dilution_factor;
  species eEC1242 in default_compartment = p_eEC1242*rel0*0.01698503*dilution_factor;
  species eEC12112 in default_compartment = p_eEC12112*rel0*0.014610778*dilution_factor;
  species eEC1241 in default_compartment = p_eEC1241*rel0*0.011323353*dilution_factor;
  species eEC5218 in default_compartment = p_eEC5218*rel0*0.02702994*dilution_factor;
  species eEC6355 in default_compartment = p_eEC6355*rel0*0.015889222*dilution_factor;
  species eEC1814 in default_compartment = p_eEC1814*rel0*0.011871257*dilution_factor;
  species eEC6215 in default_compartment = p_eEC6215*rel0*0.019907186*dilution_factor;
  species eEC2723 in default_compartment = p_eEC2723*rel0*0.009131737*dilution_factor;
  species eEC6117 in default_compartment = p_eEC6117*rel0*0.009679641*dilution_factor;
  species eEC42111 in default_compartment = p_eEC42111*rel0*0.009314371*dilution_factor;
  species eEC2211 in default_compartment = p_eEC2211*rel0*0.01004491*dilution_factor;
  species eEC23112 in default_compartment = p_eEC23112*rel0*0.009497006*dilution_factor;
  species eEC11186 in default_compartment = p_eEC11186*rel0*0.009131737*dilution_factor;
  species eEC25147 in default_compartment = p_eEC25147*rel0*0.009679641*dilution_factor;
  species eEC11137 in default_compartment = p_eEC11137*rel0*0.013770659*dilution_factor;
  species eEC2212 in default_compartment = p_eEC2212*rel0*0.008401198*dilution_factor;
  species eEC61115 in default_compartment = p_eEC61115*rel0*0.007670659*dilution_factor;
  species eEC111126 in default_compartment = p_eEC111126*rel0*0.008949102*dilution_factor;
  species eEC6115 in default_compartment = p_eEC6115*rel0*0.008218563*dilution_factor;
  species eEC2792 in default_compartment = p_eEC2792*rel0*0.00657485*dilution_factor;
  species eEC23161 in default_compartment = p_eEC23161*rel0*0.007853293*dilution_factor;
  species eEC41149 in default_compartment = p_eEC41149*rel0*0.007488024*dilution_factor;
  species eEC2121 in default_compartment = p_eEC2121*rel0*0.005661677*dilution_factor;
  species eEC4212 in default_compartment = p_eEC4212*rel0*0.006026946*dilution_factor;
  species eEC61120 in default_compartment = p_eEC61120*rel0*0.011323353*dilution_factor;
  species eEC23316 in default_compartment = p_eEC23316*rel0*0.010592814*dilution_factor;
  species eEC4311 in default_compartment = p_eEC4311*rel0*0.00657485*dilution_factor;
  species eEC2817 in default_compartment = p_eEC2817*rel0*0.008035928*dilution_factor;
  species eEC11144 in default_compartment = p_eEC11144*rel0*0.005479042*dilution_factor;
  species eEC2611 in default_compartment = p_eEC2611*rel0*0.008218563*dilution_factor;
  species eEC61111 in default_compartment = p_eEC61111*rel0*0.005661677*dilution_factor;
  species eEC6344 in default_compartment = p_eEC6344*rel0*0.007305389*dilution_factor;
  species eEC1319 in default_compartment = p_eEC1319*rel0*0.007305389*dilution_factor;
  species eEC111121 in default_compartment = p_eEC111121*rel0*0.004748503*dilution_factor;
  species eEC6114 in default_compartment = p_eEC6114*rel0*0.005661677*dilution_factor;
  species eEC27130 in default_compartment = p_eEC27130*rel0*0.007670659*dilution_factor;
  species eEC41131 in default_compartment = p_eEC41131*rel0*0.00310479*dilution_factor;
  species eEC61114 in default_compartment = p_eEC61114*rel0*0.006392216*dilution_factor;
  species eEC231117 in default_compartment = p_eEC231117*rel0*0.005479042*dilution_factor;
  species eEC2739 in default_compartment = p_eEC2739*rel0*0.006757485*dilution_factor;
  species eEC1442 in default_compartment = p_eEC1442*rel0*0.004748503*dilution_factor;
  species eEC7122 in default_compartment = p_eEC7122*rel0*0.011505988*dilution_factor;
  species eEC41213 in default_compartment = p_eEC41213*rel0*0.005661677*dilution_factor;
  species eEC2743 in default_compartment = p_eEC2743*rel0*0.00694012*dilution_factor;
  species eEC34252 in default_compartment = p_eEC34252*rel0*0.004931138*dilution_factor;
  species eEC6342 in default_compartment = p_eEC6342*rel0*0.005113772*dilution_factor;
  species eEC26116 in default_compartment = p_eEC26116*rel0*0.005661677*dilution_factor;
  species eEC2516 in default_compartment = p_eEC2516*rel0*0.005844311*dilution_factor;
  species eEC61117 in default_compartment = p_eEC61117*rel0*0.005296407*dilution_factor;
  species eEC341318 in default_compartment = p_eEC341318*rel0*0.005479042*dilution_factor;
  species eEC27140 in default_compartment = p_eEC27140*rel0*0.01041018*dilution_factor;
  species eEC2318 in default_compartment = p_eEC2318*rel0*0.004931138*dilution_factor;
  species eEC54211 in default_compartment = p_eEC54211*rel0*0.006026946*dilution_factor;
  species eEC32122 in default_compartment = p_eEC32122*rel0*0.002556886*dilution_factor;
  species eEC6119 in default_compartment = p_eEC6119*rel0*0.003835329*dilution_factor;
  species eEC111205 in default_compartment = p_eEC111205*rel0*0.004017964*dilution_factor;
  species eEC4219 in default_compartment = p_eEC4219*rel0*0.006757485*dilution_factor;
  species eEC6113 in default_compartment = p_eEC6113*rel0*0.003835329*dilution_factor;
  species eEC7421 in default_compartment = p_eEC7421*rel0*0.005661677*dilution_factor;
  species eEC7521 in default_compartment = p_eEC7521*rel0*0.004748503*dilution_factor;
  species eEC41991 in default_compartment = p_eEC41991*rel0*0.00347006*dilution_factor;
  species eEC61122 in default_compartment = p_eEC61122*rel0*0.003835329*dilution_factor;
  species eEC61121 in default_compartment = p_eEC61121*rel0*0.004200599*dilution_factor;
  species eEC61110 in default_compartment = p_eEC61110*rel0*0.003652695*dilution_factor;
  species eEC63414 in default_compartment = p_eEC63414*rel0*0.003652695*dilution_factor;
  species eEC6111 in default_compartment = p_eEC6111*rel0*0.003652695*dilution_factor;
  species eEC1611 in default_compartment = p_eEC1611*rel0*0.002922156*dilution_factor;
  species eEC23141 in default_compartment = p_eEC23141*rel0*0.00347006*dilution_factor;
  species eEC6312 in default_compartment = p_eEC6312*rel0*0.002739521*dilution_factor;
  species eEC6352 in default_compartment = p_eEC6352*rel0*0.002556886*dilution_factor;
  species eEC32193 in default_compartment = p_eEC32193*rel0*0.002374251*dilution_factor;
  species eEC342470 in default_compartment = p_eEC342470*rel0*0.002922156*dilution_factor;
  species eEC6116 in default_compartment = p_eEC6116*rel0*0.008583832*dilution_factor;
  species eEC2746 in default_compartment = p_eEC2746*rel0*0.003652695*dilution_factor;
  species eEC11511 in default_compartment = p_eEC11511*rel0*0.005113772*dilution_factor;
  species eEC11140 in default_compartment = p_eEC11140*rel0*0.005661677*dilution_factor;
  species eEC4321 in default_compartment = p_eEC4321*rel0*0.002374251*dilution_factor;
  species eEC6211 in default_compartment = p_eEC6211*rel0*0.003287425*dilution_factor;
  species eEC2761 in default_compartment = p_eEC2761*rel0*0.003287425*dilution_factor;
  species eEC271199 in default_compartment = p_eEC271199*rel0*0.002922156*dilution_factor;
  species eEC5311 in default_compartment = p_eEC5311*rel0*0.002374251*dilution_factor;
  species eEC2778 in default_compartment = p_eEC2778*rel0*0.001643713*dilution_factor;
  species eEC34112 in default_compartment = p_eEC34112*rel0*0.00347006*dilution_factor;
  species eEC1819 in default_compartment = p_eEC1819*rel0*0.003287425*dilution_factor;
  species eEC25155 in default_compartment = p_eEC25155*rel0*0.003287425*dilution_factor;
  species eEC6345 in default_compartment = p_eEC6345*rel0*0.003835329*dilution_factor;
  species eEC5422 in default_compartment = p_eEC5422*rel0*0.002739521*dilution_factor;
  species eEC61118 in default_compartment = p_eEC61118*rel0*0.002374251*dilution_factor;
  species eEC23129 in default_compartment = p_eEC23129*rel0*0.003287425*dilution_factor;
  species eEC26152 in default_compartment = p_eEC26152*rel0*0.003652695*dilution_factor;
  species eEC5438 in default_compartment = p_eEC5438*rel0*0.002739521*dilution_factor;
  species eEC26142 in default_compartment = p_eEC26142*rel0*0.002556886*dilution_factor;
  species eEC21210 in default_compartment = p_eEC21210*rel0*0.002556886*dilution_factor;
  species eEC2721 in default_compartment = p_eEC2721*rel0*0.002739521*dilution_factor;
  species eEC6412 in default_compartment = p_eEC6412*rel0*0.003287425*dilution_factor;
  species eEC2421 in default_compartment = p_eEC2421*rel0*0.003287425*dilution_factor;
  species eEC25178 in default_compartment = p_eEC25178*rel0*0.002008982*dilution_factor;
  species eEC51320 in default_compartment = p_eEC51320*rel0*0.002556886*dilution_factor;
  species eEC34139 in default_compartment = p_eEC34139*rel0*0.002922156*dilution_factor;
  species eEC11149 in default_compartment = p_eEC11149*rel0*0.002922156*dilution_factor;
  species eEC61119 in default_compartment = p_eEC61119*rel0*0.00310479*dilution_factor;
  species eEC15134 in default_compartment = p_eEC15134*rel0*0.002556886*dilution_factor;
  species eEC11632 in default_compartment = p_eEC11632*rel0*0.002008982*dilution_factor;
  species eEC53128 in default_compartment = p_eEC53128*rel0*0.001826347*dilution_factor;
  species eEC3611 in default_compartment = p_eEC3611*rel0*0.00310479*dilution_factor;
  species eEC23139 in default_compartment = p_eEC23139*rel0*0.001461078*dilution_factor;
  species eEC111103 in default_compartment = p_eEC111103*rel0*0.002008982*dilution_factor;
  species eEC5622 in default_compartment = p_eEC5622*rel0*0.002739521*dilution_factor;
  species eEC111251 in default_compartment = p_eEC111251*rel0*0.001826347*dilution_factor;
  species eEC2423 in default_compartment = p_eEC2423*rel0*0.001826347*dilution_factor;
  species eEC42159 in default_compartment = p_eEC42159*rel0*0.002191617*dilution_factor;
  species eEC342192 in default_compartment = p_eEC342192*rel0*0.004383234*dilution_factor;
  species eEC4337 in default_compartment = p_eEC4337*rel0*0.001826347*dilution_factor;
  species eEC341123 in default_compartment = p_eEC341123*rel0*0.002008982*dilution_factor;
  species eEC44121 in default_compartment = p_eEC44121*rel0*0.001278443*dilution_factor;
  species eEC231180 in default_compartment = p_eEC231180*rel0*0.001643713*dilution_factor;
  species eEC6112 in default_compartment = p_eEC6112*rel0*0.002008982*dilution_factor;
  species eEC6315 in default_compartment = p_eEC6315*rel0*0.001461078*dilution_factor;
  species eEC3421107 in default_compartment = p_eEC3421107*rel0*0.002739521*dilution_factor;
  species eEC6324 in default_compartment = p_eEC6324*rel0*0.002556886*dilution_factor;
  species eEC341118 in default_compartment = p_eEC341118*rel0*0.001278443*dilution_factor;
  species eEC31131 in default_compartment = p_eEC31131*rel0*0.002191617*dilution_factor;
  species eEC12111 in default_compartment = p_eEC12111*rel0*0.002191617*dilution_factor;
  species eEC2777 in default_compartment = p_eEC2777*rel0*0.000913174*dilution_factor;
  species eEC27171 in default_compartment = p_eEC27171*rel0*0.002008982*dilution_factor;
  species eEC54210 in default_compartment = p_eEC54210*rel0*0.002191617*dilution_factor;
  species eEC11771 in default_compartment = p_eEC11771*rel0*0.001643713*dilution_factor;
  species eEC2123 in default_compartment = p_eEC2123*rel0*0.000913174*dilution_factor;
  species eEC41119 in default_compartment = p_eEC41119*rel0*0.001278443*dilution_factor;
  species eEC41214 in default_compartment = p_eEC41214*rel0*0.001095808*dilution_factor;
  species eEC5316 in default_compartment = p_eEC5316*rel0*0.001643713*dilution_factor;
  species eEC26187 in default_compartment = p_eEC26187*rel0*0.001461078*dilution_factor;
  species eEC53125 in default_compartment = p_eEC53125*rel0*0.001461078*dilution_factor;
  species eEC61116 in default_compartment = p_eEC61116*rel0*0.001826347*dilution_factor;
  species eEC27111 in default_compartment = p_eEC27111*rel0*0.001095808*dilution_factor;
  species eEC4322 in default_compartment = p_eEC4322*rel0*0.001643713*dilution_factor;
  species eEC35110 in default_compartment = p_eEC35110*rel0*0.001278443*dilution_factor;
  species eEC42124 in default_compartment = p_eEC42124*rel0*0.000547904*dilution_factor;
  species eEC31325 in default_compartment = p_eEC31325*rel0*0.001278443*dilution_factor;
  species eEC4131 in default_compartment = p_eEC4131*rel0*0.002008982*dilution_factor;
  species eEC1351 in default_compartment = p_eEC1351*rel0*0.001826347*dilution_factor;
  species eEC2843 in default_compartment = p_eEC2843*rel0*0.001278443*dilution_factor;
  species eEC5427 in default_compartment = p_eEC5427*rel0*0.001826347*dilution_factor;
  species eEC42146 in default_compartment = p_eEC42146*rel0*0.000730539*dilution_factor;
  species eEC111100 in default_compartment = p_eEC111100*rel0*0.000913174*dilution_factor;
  species eEC35116 in default_compartment = p_eEC35116*rel0*0.000365269*dilution_factor;
  species eEC111305 in default_compartment = p_eEC111305*rel0*0.001095808*dilution_factor;
  species eEC32216 in default_compartment = p_eEC32216*rel0*0.000730539*dilution_factor;
  species eEC2216 in default_compartment = p_eEC2216*rel0*0.001826347*dilution_factor;
  species eEC25154 in default_compartment = p_eEC25154*rel0*0.001826347*dilution_factor;
  species eEC15138 in default_compartment = p_eEC15138*rel0*0.001278443*dilution_factor;
  species eEC6323 in default_compartment = p_eEC6323*rel0*0.001826347*dilution_factor;
  species eEC111298 in default_compartment = p_eEC111298*rel0*0.000365269*dilution_factor;
  species eEC1659 in default_compartment = p_eEC1659*rel0*0.002191617*dilution_factor;
  species eEC31446 in default_compartment = p_eEC31446*rel0*0.001643713*dilution_factor;
  species eEC2429 in default_compartment = p_eEC2429*rel0*0.001278443*dilution_factor;
  species eEC43117 in default_compartment = p_eEC43117*rel0*0.000913174*dilution_factor;
  species eEC6321 in default_compartment = p_eEC6321*rel0*0.001643713*dilution_factor;
  species eEC2411 in default_compartment = p_eEC2411*rel0*0.000913174*dilution_factor;
  species eEC2428 in default_compartment = p_eEC2428*rel0*0.001461078*dilution_factor;
  species eEC365n1 in default_compartment = p_eEC365n1*rel0*0.001826347*dilution_factor;
  species eEC111124 in default_compartment = p_eEC111124*rel0*0.001278443*dilution_factor;
  species eEC32123 in default_compartment = p_eEC32123*rel0*0.000182635*dilution_factor;
  species eEC11160 in default_compartment = p_eEC11160*rel0*0.000365269*dilution_factor;
  species eEC11138 in default_compartment = p_eEC11138*rel0*0.001643713*dilution_factor;
  species eEC2517 in default_compartment = p_eEC2517*rel0*0.000913174*dilution_factor;
  species eEC43119 in default_compartment = p_eEC43119*rel0*0.001643713*dilution_factor;
  species eEC34155 in default_compartment = p_eEC34155*rel0*0.000365269*dilution_factor;
  species eEC5621 in default_compartment = p_eEC5621*rel0*0.000913174*dilution_factor;
  species eEC6322 in default_compartment = p_eEC6322*rel0*0.000913174*dilution_factor;
  species eEC26111 in default_compartment = p_eEC26111*rel0*0.000365269*dilution_factor;
  species eEC1817 in default_compartment = p_eEC1817*rel0*0.000365269*dilution_factor;
  species eEC21114 in default_compartment = p_eEC21114*rel0*0.000182635*dilution_factor;
  species eEC41123 in default_compartment = p_eEC41123*rel0*0.000730539*dilution_factor;
  species eEC53116 in default_compartment = p_eEC53116*rel0*0.000547904*dilution_factor;
  species eEC51329 in default_compartment = p_eEC51329*rel0*0.000547904*dilution_factor;
  species eEC4133 in default_compartment = p_eEC4133*rel0*0.000547904*dilution_factor;
  species eEC6353 in default_compartment = p_eEC6353*rel0*0.000730539*dilution_factor;
  species eEC1812 in default_compartment = p_eEC1812*rel0*0.000913174*dilution_factor;
  species eEC6326 in default_compartment = p_eEC6326*rel0*0.000547904*dilution_factor;
  species eEC32121 in default_compartment = p_eEC32121*rel0*0.001095808*dilution_factor;
  species eEC31315 in default_compartment = p_eEC31315*rel0*0.000913174*dilution_factor;
  species eEC35188 in default_compartment = p_eEC35188*rel0*0.000913174*dilution_factor;
  species eEC271167 in default_compartment = p_eEC271167*rel0*0.001095808*dilution_factor;
  species eEC5319 in default_compartment = p_eEC5319*rel0*0.001278443*dilution_factor;
  species eEC34111 in default_compartment = p_eEC34111*rel0*0.000730539*dilution_factor;
  species eEC31311 in default_compartment = p_eEC31311*rel0*0.001826347*dilution_factor;
  species eEC5131 in default_compartment = p_eEC5131*rel0*0.000547904*dilution_factor;
  species eEC2427 in default_compartment = p_eEC2427*rel0*0.000730539*dilution_factor;
  species eEC49811 in default_compartment = p_eEC49811*rel0*0.000730539*dilution_factor;
  species eEC1218 in default_compartment = p_eEC1218*rel0*0.000365269*dilution_factor;
  species eEC54212 in default_compartment = p_eEC54212*rel0*0.000730539*dilution_factor;
  species eEC41240 in default_compartment = p_eEC41240*rel0*0.000365269*dilution_factor;
  species eEC41336 in default_compartment = p_eEC41336*rel0*0.000182635*dilution_factor;
  species eEC11741 in default_compartment = p_eEC11741*rel0*0.000365269*dilution_factor;
  species eEC1717 in default_compartment = p_eEC1717*rel0*0.000913174*dilution_factor;
  species eEC12141 in default_compartment = p_eEC12141*rel0*0.002556886*dilution_factor;
  species eEC15141 in default_compartment = p_eEC15141*rel0*0.000730539*dilution_factor;
  species eEC24222 in default_compartment = p_eEC24222*rel0*0.000730539*dilution_factor;
  species eEC2519 in default_compartment = p_eEC2519*rel0*0.001278443*dilution_factor;
  species eEC1112 in default_compartment = p_eEC1112*rel0*0.000182635*dilution_factor;
  species eEC34119 in default_compartment = p_eEC34119*rel0*0.001095808*dilution_factor;
  species eEC11195 in default_compartment = p_eEC11195*rel0*0.000365269*dilution_factor;
  species eEC2728 in default_compartment = p_eEC2728*rel0*0.000547904*dilution_factor;
  species eEC3126 in default_compartment = p_eEC3126*rel0*0.000547904*dilution_factor;
  species eEC63413 in default_compartment = p_eEC63413*rel0*0.000365269*dilution_factor;
  species eEC21145 in default_compartment = p_eEC21145*rel0*0.000547904*dilution_factor;
  species eEC5318 in default_compartment = p_eEC5318*rel0*0.000730539*dilution_factor;
  species eEC24217 in default_compartment = p_eEC24217*rel0*0.001095808*dilution_factor;
  species eEC31112 in default_compartment = p_eEC31112*rel0*0.000365269*dilution_factor;
  species eEC6354 in default_compartment = p_eEC6354*rel0*0.000182635*dilution_factor;
  species eEC36413 in default_compartment = p_eEC36413*rel0*0.000547904*dilution_factor;
  species eEC27422 in default_compartment = p_eEC27422*rel0*0.000547904*dilution_factor;
  species eEC25116 in default_compartment = p_eEC25116*rel0*0.000547904*dilution_factor;
  species eEC31213 in default_compartment = p_eEC31213*rel0*0.000913174*dilution_factor;
  species eEC26133 in default_compartment = p_eEC26133*rel0*0.000365269*dilution_factor;
  species eEC1532 in default_compartment = p_eEC1532*rel0*0.001095808*dilution_factor;
  species eEC36123 in default_compartment = p_eEC36123*rel0*0.000547904*dilution_factor;
  species eEC12041 in default_compartment = p_eEC12041*rel0*0.000547904*dilution_factor;
  species eEC63213 in default_compartment = p_eEC63213*rel0*0.000547904*dilution_factor;
  species eEC18412 in default_compartment = p_eEC18412*rel0*0.000730539*dilution_factor;
  species eEC2811 in default_compartment = p_eEC2811*rel0*0.000730539*dilution_factor;
  species eEC5111 in default_compartment = p_eEC5111*rel0*0.000365269*dilution_factor;
  species eEC25161 in default_compartment = p_eEC25161*rel0*0.000182635*dilution_factor;
  species eEC25118 in default_compartment = p_eEC25118*rel0*0.000365269*dilution_factor;
  species eEC1111 in default_compartment = p_eEC1111*rel0*0.000365269*dilution_factor;
  species eEC41137 in default_compartment = p_eEC41137*rel0*0*dilution_factor;
  species eEC21011 in default_compartment = p_eEC21011*rel0*0*dilution_factor;
  species eEC26992 in default_compartment = p_eEC26992*rel0*0.000365269*dilution_factor;
  species eEC4231 in default_compartment = p_eEC4231*rel0*0.000182635*dilution_factor;
  species eEC24210 in default_compartment = p_eEC24210*rel0*0.000182635*dilution_factor;
  species eEC27724 in default_compartment = p_eEC27724*rel0*0.000730539*dilution_factor;
  species eEC32186 in default_compartment = p_eEC32186*rel0*0.000365269*dilution_factor;
  species eEC11123 in default_compartment = p_eEC11123*rel0*0.000182635*dilution_factor;
  species eEC6329 in default_compartment = p_eEC6329*rel0*0.000547904*dilution_factor;
  species eEC63212 in default_compartment = p_eEC63212*rel0*0.000182635*dilution_factor;
  species eEC11774 in default_compartment = p_eEC11774*rel0*0.000547904*dilution_factor;
  species eEC63245 in default_compartment = p_eEC63245*rel0*0.000365269*dilution_factor;
  species eEC1512 in default_compartment = p_eEC1512*rel0*0.000365269*dilution_factor;
  species eEC51313 in default_compartment = p_eEC51313*rel0*0.000365269*dilution_factor;
  species eEC4124 in default_compartment = p_eEC4124*rel0*0.000182635*dilution_factor;
  species eEC18414 in default_compartment = p_eEC18414*rel0*0.000365269*dilution_factor;
  species eEC16510 in default_compartment = p_eEC16510*rel0*0.000182635*dilution_factor;
  species eEC12138 in default_compartment = p_eEC12138*rel0*0.000730539*dilution_factor;
  species eEC63210 in default_compartment = p_eEC63210*rel0*0.000182635*dilution_factor;
  species eEC26157 in default_compartment = p_eEC26157*rel0*0.000730539*dilution_factor;
  species eEC5341 in default_compartment = p_eEC5341*rel0*0.000365269*dilution_factor;
  species eEC2818 in default_compartment = p_eEC2818*rel0*0.000913174*dilution_factor;
  species eEC421126 in default_compartment = p_eEC421126*rel0*0.000365269*dilution_factor;
  species eEC2749 in default_compartment = p_eEC2749*rel0*0.000547904*dilution_factor;
  species eEC2132 in default_compartment = p_eEC2132*rel0*0.000365269*dilution_factor;
  species eEC34195 in default_compartment = p_eEC34195*rel0*0.000730539*dilution_factor;
  species eEC31323 in default_compartment = p_eEC31323*rel0*0.000547904*dilution_factor;
  species eEC3223 in default_compartment = p_eEC3223*rel0*0.000365269*dilution_factor;
  species eEC36166 in default_compartment = p_eEC36166*rel0*0.000182635*dilution_factor;
  species eEC312612 in default_compartment = p_eEC312612*rel0*0.000182635*dilution_factor;
  species eEC419912 in default_compartment = p_eEC419912*rel0*0.000547904*dilution_factor;
  species eEC211200 in default_compartment = p_eEC211200*rel0*0.000365269*dilution_factor;
  species eEC35416 in default_compartment = p_eEC35416*rel0*0*dilution_factor;
  species eEC111284 in default_compartment = p_eEC111284*rel0*0.000365269*dilution_factor;
  species eEC41111 in default_compartment = p_eEC41111*rel0*0.000365269*dilution_factor;
  species eEC11128 in default_compartment = p_eEC11128*rel0*0.000365269*dilution_factor;
  species eEC27756 in default_compartment = p_eEC27756*rel0*0*dilution_factor;
  species eEC35311 in default_compartment = p_eEC35311*rel0*0.000730539*dilution_factor;
  species eEC35413 in default_compartment = p_eEC35413*rel0*0.000182635*dilution_factor;
  species eEC2779 in default_compartment = p_eEC2779*rel0*0.000365269*dilution_factor;
  species eEC11742 in default_compartment = p_eEC11742*rel0*0*dilution_factor;
  species eEC2774 in default_compartment = p_eEC2774*rel0*0.000182635*dilution_factor;
  species eEC31116 in default_compartment = p_eEC31116*rel0*0.000730539*dilution_factor;
  species eEC211198 in default_compartment = p_eEC211198*rel0*0*dilution_factor;
  species eEC3137 in default_compartment = p_eEC3137*rel0*0.000365269*dilution_factor;
  species eEC21133 in default_compartment = p_eEC21133*rel0*0.000182635*dilution_factor;
  species eEC27738 in default_compartment = p_eEC27738*rel0*0.000547904*dilution_factor;
  species eEC2844 in default_compartment = p_eEC2844*rel0*0.000365269*dilution_factor;
  species eEC211186 in default_compartment = p_eEC211186*rel0*0.000365269*dilution_factor;
  species eEC549925 in default_compartment = p_eEC549925*rel0*0.000365269*dilution_factor;
  species eEC6328 in default_compartment = p_eEC6328*rel0*0.000182635*dilution_factor;
  species eEC231191 in default_compartment = p_eEC231191*rel0*0.000182635*dilution_factor;
  species eEC31310 in default_compartment = p_eEC31310*rel0*0.000547904*dilution_factor;
  species eEC13198 in default_compartment = p_eEC13198*rel0*0*dilution_factor;
  species eEC31129 in default_compartment = p_eEC31129*rel0*0.000365269*dilution_factor;
  species eEC4235 in default_compartment = p_eEC4235*rel0*0.000365269*dilution_factor;
  species eEC2619 in default_compartment = p_eEC2619*rel0*0*dilution_factor;
  species eEC51997 in default_compartment = p_eEC51997*rel0*0.000365269*dilution_factor;
  species eEC3523 in default_compartment = p_eEC3523*rel0*0.000547904*dilution_factor;
  species eEC27135 in default_compartment = p_eEC27135*rel0*0.000365269*dilution_factor;
  species eEC31345 in default_compartment = p_eEC31345*rel0*0.000365269*dilution_factor;
  species eEC4233 in default_compartment = p_eEC4233*rel0*0.000365269*dilution_factor;
  species eEC3135 in default_compartment = p_eEC3135*rel0*0*dilution_factor;
  species eEC27112 in default_compartment = p_eEC27112*rel0*0.000182635*dilution_factor;
  species eEC11718 in default_compartment = p_eEC11718*rel0*0.000365269*dilution_factor;
  species eEC25119 in default_compartment = p_eEC25119*rel0*0.000365269*dilution_factor;
  species eEC11631 in default_compartment = p_eEC11631*rel0*0*dilution_factor;
  species eEC211298 in default_compartment = p_eEC211298*rel0*0.000730539*dilution_factor;
  species eEC43210 in default_compartment = p_eEC43210*rel0*0.000730539*dilution_factor;
  species eEC1848 in default_compartment = p_eEC1848*rel0*0.000913174*dilution_factor;
  species eEC21211 in default_compartment = p_eEC21211*rel0*0.000182635*dilution_factor;
  species eEC27211 in default_compartment = p_eEC27211*rel0*0.000182635*dilution_factor;
  species eEC211185 in default_compartment = p_eEC211185*rel0*0.000182635*dilution_factor;
  species eEC211191 in default_compartment = p_eEC211191*rel0*0.000182635*dilution_factor;
  species eEC24219 in default_compartment = p_eEC24219*rel0*0.000365269*dilution_factor;
  species eEC211172 in default_compartment = p_eEC211172*rel0*0.000365269*dilution_factor;
  species eEC24125 in default_compartment = p_eEC24125*rel0*0.000182635*dilution_factor;
  species eEC211163 in default_compartment = p_eEC211163*rel0*0.000365269*dilution_factor;
  species eEC25190 in default_compartment = p_eEC25190*rel0*0.000182635*dilution_factor;
  species eEC2816 in default_compartment = p_eEC2816*rel0*0*dilution_factor;
  species eEC111133 in default_compartment = p_eEC111133*rel0*0.000182635*dilution_factor;
  species eEC211170 in default_compartment = p_eEC211170*rel0*0.000182635*dilution_factor;
  species eEC31416 in default_compartment = p_eEC31416*rel0*0.000730539*dilution_factor;
  species eEC34164 in default_compartment = p_eEC34164*rel0*0.000182635*dilution_factor;
  species eEC1113 in default_compartment = p_eEC1113*rel0*0*dilution_factor;
  species eEC6331 in default_compartment = p_eEC6331*rel0*0*dilution_factor;
  species eEC3224 in default_compartment = p_eEC3224*rel0*0.000365269*dilution_factor;
  species eEC313104 in default_compartment = p_eEC313104*rel0*0*dilution_factor;
  species eEC11142 in default_compartment = p_eEC11142*rel0*0.010227545*dilution_factor;
  species hEC11137 in default_compartment = p_hEC11137*rel1*0.0122*dilution_factor;
  species hEC43117 in default_compartment = p_hEC43117*rel2*0.0122*dilution_factor;
  species hEC6411 in default_compartment = p_hEC6411*rel3*0.0122*dilution_factor;
  species hEC11719 in default_compartment = p_hEC11719*rel4*0.0122*dilution_factor;

  // Parameters:
  v69 = 1;
  dilution_factor = 1;
  v148 = 1;
  v180 = 1;
  v219 = 1;
  v233 = 1;
  v338 = 1;
  v340 = 1;
  v346 = 1;
  v359 = 1;
  v386 = 1;
  v409 = 1;
  v435 = 1;
  v440 = 1;
  v470 = 1;
  v483 = 1;
  v526 = 1;
  v539 = 1;
  v555 = 1;
  v581 = 1;
  v593 = 1;
  v613 = 1;
  v680 = 1;
  v691 = 1;
  v712 = 1;
  p_eEC4213 = 1;
  rel0 = 1;
  p_eEC2776 = 1;
  p_eEC1242 = 1;
  p_eEC12112 = 1;
  p_eEC1241 = 1;
  p_eEC5218 = 1;
  p_eEC6355 = 1;
  p_eEC1814 = 1;
  p_eEC6215 = 1;
  p_eEC2723 = 1;
  p_eEC6117 = 1;
  p_eEC42111 = 1;
  p_eEC2211 = 1;
  p_eEC23112 = 1;
  p_eEC11186 = 1;
  p_eEC25147 = 1;
  p_eEC11137 = 1;
  p_eEC2212 = 1;
  p_eEC61115 = 1;
  p_eEC111126 = 1;
  p_eEC6115 = 1;
  p_eEC2792 = 1;
  p_eEC23161 = 1;
  p_eEC41149 = 1;
  p_eEC2121 = 1;
  p_eEC4212 = 1;
  p_eEC61120 = 1;
  p_eEC23316 = 1;
  p_eEC4311 = 1;
  p_eEC2817 = 1;
  p_eEC11144 = 1;
  p_eEC2611 = 1;
  p_eEC61111 = 1;
  p_eEC6344 = 1;
  p_eEC1319 = 1;
  p_eEC111121 = 1;
  p_eEC6114 = 1;
  p_eEC27130 = 1;
  p_eEC41131 = 1;
  p_eEC61114 = 1;
  p_eEC231117 = 1;
  p_eEC2739 = 1;
  p_eEC1442 = 1;
  p_eEC7122 = 1;
  p_eEC41213 = 1;
  p_eEC2743 = 1;
  p_eEC34252 = 1;
  p_eEC6342 = 1;
  p_eEC26116 = 1;
  p_eEC2516 = 1;
  p_eEC61117 = 1;
  p_eEC341318 = 1;
  p_eEC27140 = 1;
  p_eEC2318 = 1;
  p_eEC54211 = 1;
  p_eEC32122 = 1;
  p_eEC6119 = 1;
  p_eEC111205 = 1;
  p_eEC4219 = 1;
  p_eEC6113 = 1;
  p_eEC7421 = 1;
  p_eEC7521 = 1;
  p_eEC41991 = 1;
  p_eEC61122 = 1;
  p_eEC61121 = 1;
  p_eEC61110 = 1;
  p_eEC63414 = 1;
  p_eEC6111 = 1;
  p_eEC1611 = 1;
  p_eEC23141 = 1;
  p_eEC6312 = 1;
  p_eEC6352 = 1;
  p_eEC32193 = 1;
  p_eEC342470 = 1;
  p_eEC6116 = 1;
  p_eEC2746 = 1;
  p_eEC11511 = 1;
  p_eEC11140 = 1;
  p_eEC4321 = 1;
  p_eEC6211 = 1;
  p_eEC2761 = 1;
  p_eEC271199 = 1;
  p_eEC5311 = 1;
  p_eEC2778 = 1;
  p_eEC34112 = 1;
  p_eEC1819 = 1;
  p_eEC25155 = 1;
  p_eEC6345 = 1;
  p_eEC5422 = 1;
  p_eEC61118 = 1;
  p_eEC23129 = 1;
  p_eEC26152 = 1;
  p_eEC5438 = 1;
  p_eEC26142 = 1;
  p_eEC21210 = 1;
  p_eEC2721 = 1;
  p_eEC6412 = 1;
  p_eEC2421 = 1;
  p_eEC25178 = 1;
  p_eEC51320 = 1;
  p_eEC34139 = 1;
  p_eEC11149 = 1;
  p_eEC61119 = 1;
  p_eEC15134 = 1;
  p_eEC11632 = 1;
  p_eEC53128 = 1;
  p_eEC3611 = 1;
  p_eEC23139 = 1;
  p_eEC111103 = 1;
  p_eEC5622 = 1;
  p_eEC111251 = 1;
  p_eEC2423 = 1;
  p_eEC42159 = 1;
  p_eEC342192 = 1;
  p_eEC4337 = 1;
  p_eEC341123 = 1;
  p_eEC44121 = 1;
  p_eEC231180 = 1;
  p_eEC6112 = 1;
  p_eEC6315 = 1;
  p_eEC3421107 = 1;
  p_eEC6324 = 1;
  p_eEC341118 = 1;
  p_eEC31131 = 1;
  p_eEC12111 = 1;
  p_eEC2777 = 1;
  p_eEC27171 = 1;
  p_eEC54210 = 1;
  p_eEC11771 = 1;
  p_eEC2123 = 1;
  p_eEC41119 = 1;
  p_eEC41214 = 1;
  p_eEC5316 = 1;
  p_eEC26187 = 1;
  p_eEC53125 = 1;
  p_eEC61116 = 1;
  p_eEC27111 = 1;
  p_eEC4322 = 1;
  p_eEC35110 = 1;
  p_eEC42124 = 1;
  p_eEC31325 = 1;
  p_eEC4131 = 1;
  p_eEC1351 = 1;
  p_eEC2843 = 1;
  p_eEC5427 = 1;
  p_eEC42146 = 1;
  p_eEC111100 = 1;
  p_eEC35116 = 1;
  p_eEC111305 = 1;
  p_eEC32216 = 1;
  p_eEC2216 = 1;
  p_eEC25154 = 1;
  p_eEC15138 = 1;
  p_eEC6323 = 1;
  p_eEC111298 = 1;
  p_eEC1659 = 1;
  p_eEC31446 = 1;
  p_eEC2429 = 1;
  p_eEC43117 = 1;
  p_eEC6321 = 1;
  p_eEC2411 = 1;
  p_eEC2428 = 1;
  p_eEC365n1 = 1;
  p_eEC111124 = 1;
  p_eEC32123 = 1;
  p_eEC11160 = 1;
  p_eEC11138 = 1;
  p_eEC2517 = 1;
  p_eEC43119 = 1;
  p_eEC34155 = 1;
  p_eEC5621 = 1;
  p_eEC6322 = 1;
  p_eEC26111 = 1;
  p_eEC1817 = 1;
  p_eEC21114 = 1;
  p_eEC41123 = 1;
  p_eEC53116 = 1;
  p_eEC51329 = 1;
  p_eEC4133 = 1;
  p_eEC6353 = 1;
  p_eEC1812 = 1;
  p_eEC6326 = 1;
  p_eEC32121 = 1;
  p_eEC31315 = 1;
  p_eEC35188 = 1;
  p_eEC271167 = 1;
  p_eEC5319 = 1;
  p_eEC34111 = 1;
  p_eEC31311 = 1;
  p_eEC5131 = 1;
  p_eEC2427 = 1;
  p_eEC49811 = 1;
  p_eEC1218 = 1;
  p_eEC54212 = 1;
  p_eEC41240 = 1;
  p_eEC41336 = 1;
  p_eEC11741 = 1;
  p_eEC1717 = 1;
  p_eEC12141 = 1;
  p_eEC15141 = 1;
  p_eEC24222 = 1;
  p_eEC2519 = 1;
  p_eEC1112 = 1;
  p_eEC34119 = 1;
  p_eEC11195 = 1;
  p_eEC2728 = 1;
  p_eEC3126 = 1;
  p_eEC63413 = 1;
  p_eEC21145 = 1;
  p_eEC5318 = 1;
  p_eEC24217 = 1;
  p_eEC31112 = 1;
  p_eEC6354 = 1;
  p_eEC36413 = 1;
  p_eEC27422 = 1;
  p_eEC25116 = 1;
  p_eEC31213 = 1;
  p_eEC26133 = 1;
  p_eEC1532 = 1;
  p_eEC36123 = 1;
  p_eEC12041 = 1;
  p_eEC63213 = 1;
  p_eEC18412 = 1;
  p_eEC2811 = 1;
  p_eEC5111 = 1;
  p_eEC25161 = 1;
  p_eEC25118 = 1;
  p_eEC1111 = 1;
  p_eEC41137 = 1;
  p_eEC21011 = 1;
  p_eEC26992 = 1;
  p_eEC4231 = 1;
  p_eEC24210 = 1;
  p_eEC27724 = 1;
  p_eEC32186 = 1;
  p_eEC11123 = 1;
  p_eEC6329 = 1;
  p_eEC63212 = 1;
  p_eEC11774 = 1;
  p_eEC63245 = 1;
  p_eEC1512 = 1;
  p_eEC51313 = 1;
  p_eEC4124 = 1;
  p_eEC18414 = 1;
  p_eEC16510 = 1;
  p_eEC12138 = 1;
  p_eEC63210 = 1;
  p_eEC26157 = 1;
  p_eEC5341 = 1;
  p_eEC2818 = 1;
  p_eEC421126 = 1;
  p_eEC2749 = 1;
  p_eEC2132 = 1;
  p_eEC34195 = 1;
  p_eEC31323 = 1;
  p_eEC3223 = 1;
  p_eEC36166 = 1;
  p_eEC312612 = 1;
  p_eEC419912 = 1;
  p_eEC211200 = 1;
  p_eEC35416 = 1;
  p_eEC111284 = 1;
  p_eEC41111 = 1;
  p_eEC11128 = 1;
  p_eEC27756 = 1;
  p_eEC35311 = 1;
  p_eEC35413 = 1;
  p_eEC2779 = 1;
  p_eEC11742 = 1;
  p_eEC2774 = 1;
  p_eEC31116 = 1;
  p_eEC211198 = 1;
  p_eEC3137 = 1;
  p_eEC21133 = 1;
  p_eEC27738 = 1;
  p_eEC2844 = 1;
  p_eEC211186 = 1;
  p_eEC549925 = 1;
  p_eEC6328 = 1;
  p_eEC231191 = 1;
  p_eEC31310 = 1;
  p_eEC13198 = 1;
  p_eEC31129 = 1;
  p_eEC4235 = 1;
  p_eEC2619 = 1;
  p_eEC51997 = 1;
  p_eEC3523 = 1;
  p_eEC27135 = 1;
  p_eEC31345 = 1;
  p_eEC4233 = 1;
  p_eEC3135 = 1;
  p_eEC27112 = 1;
  p_eEC11718 = 1;
  p_eEC25119 = 1;
  p_eEC11631 = 1;
  p_eEC211298 = 1;
  p_eEC43210 = 1;
  p_eEC1848 = 1;
  p_eEC21211 = 1;
  p_eEC27211 = 1;
  p_eEC211185 = 1;
  p_eEC211191 = 1;
  p_eEC24219 = 1;
  p_eEC211172 = 1;
  p_eEC24125 = 1;
  p_eEC211163 = 1;
  p_eEC25190 = 1;
  p_eEC2816 = 1;
  p_eEC111133 = 1;
  p_eEC211170 = 1;
  p_eEC31416 = 1;
  p_eEC34164 = 1;
  p_eEC1113 = 1;
  p_eEC6331 = 1;
  p_eEC3224 = 1;
  p_eEC313104 = 1;
  p_eEC11142 = 1;
  p_hEC11137 = 1;
  rel1 = 1;
  p_hEC43117 = 1;
  rel2 = 1;
  p_hEC6411 = 1;
  rel3 = 1;
  p_hEC11719 = 1;
  rel4 = 1;
  Kcat_F_R704 = 7.969745;
  Kcat_R_R704 = 1.350432;
  Keq_R704 = 18.24607;
  Kcat_V_R704 = 1;
  Km_C00008_hEC6411 = 0.060795698;
  Km_C00009_hEC6411 = 1.167335;
  Km_C00036_hEC6411 = 0.202194154;
  Km_C00002_hEC6411 = 0.069778137;
  Km_C00022_hEC6411 = 9.7;
  Km_C00288_hEC6411 = 10.8;
  Ki_C00002_hEC6411 = 0.069778137;
  Ki_C00008_hEC6411 = 0.060795698;
  Ki_C00009_hEC6411 = 1.167335;
  Ki_C00022_hEC6411 = 0.670731664;
  Ki_C00036_hEC6411 = 0.202194154;
  Ki_C00288_hEC6411 = 1.142171;
  Kcat_F_R705 = 12.16954;
  Kcat_R_R705 = 26.70019;
  Keq_R705 = 336.0231;
  Kcat_V_R705 = 1;
  Km_C00058_hEC11719 = 6.29907;
  Km_C00003_hEC11719 = 0.179658741;
  Km_C00080_hEC11719 = 3.9966;
  Km_C00011_hEC11719 = 3.174462;
  Km_C00004_hEC11719 = 0.080049999;
  Kcat_F_R706 = 3.547282;
  Kcat_R_R706 = 16.00409;
  Keq_R706 = 194010.3;
  Kcat_V_R706 = 1;
  Km_C00014_hEC43117 = 2.321815;
  Km_C00022_hEC43117 = 0.786924958;
  Km_C00065_hEC43117 = 0.995956302;
  Ki_C00001_hEC43117 = 1.243283;
  Ki_C00014_hEC43117 = 2.321815;
  Ki_C00022_hEC43117 = 0.786924958;
  Ki_C00065_hEC43117 = 0.995956302;
  Ki_C00161_hEC43117 = 1.390292;
  Ki_C02218_hEC43117 = 1.603482;
  Ki_C05167_hEC43117 = 1.390292;
  Kcat_F_R707 = 3.547282;
  Kcat_R_R707 = 1.10709272;
  Keq_R707 = 11.80457;
  Kcat_V_R707 = 1;
  Km_C00001_hEC43117 = 1.243283;
  Km_C02218_hEC43117 = 1.603482;
  Kcat_F_R708 = 36.42262;
  Kcat_R_R708 = 17.86179;
  Keq_R708 = 1;
  Kcat_V_R708 = 1;
  Km_C00161_hEC43117 = 2.321815;
  Km_C05167_hEC43117 = 2.321815;
  Kcat_F_R709 = 1.10709272;
  Kcat_R_R709 = 16.00409;
  Keq_R709 = 16435.19;
  Kcat_V_R709 = 1;
  Kcat_F_R710 = 3.00716;
  Kcat_R_R710 = 467.4798;
  Keq_R710 = 2.261487e-5;
  Kcat_V_R710 = 1;
  Km_C00004_hEC11137 = 0.061;
  Km_C00036_hEC11137 = 0.0445;
  Km_C00080_hEC11137 = 1.627507;
  Km_C00003_hEC11137 = 0.105280019;
  Km_C00149_hEC11137 = 0.00012;
  Ki_C00002_hEC11137 = 0.045088965;
  Ki_C00003_hEC11137 = 0.105280019;
  Ki_C00004_hEC11137 = 0.034674671;
  Ki_C00010_hEC11137 = 0.03518714;
  Ki_C00024_hEC11137 = 0.036240213;
  Ki_C00036_hEC11137 = 0.066584691;
  Ki_C00080_hEC11137 = 1.627507;
  Ki_C00149_hEC11137 = 0.161660373;
  Ki_C00209_hEC11137 = 0.177507535;
  Ki_C00741_hEC11137 = 0.211944282;
  Ki_C02441_hEC11137 = 0.095263213;
  Ki_C11592_hEC11137 = 0.2360853;
  Gnc_C00022_hEC6411 = 1;
  Gc_C00022_hEC6411 = 1;
  Gnc_C00036_hEC6411 = 1;
  Gc_C00036_hEC6411 = 1;
  Gnc_C00002_hEC6411 = 1;
  Gc_C00002_hEC6411 = 1;
  Gnc_C00009_hEC6411 = 1;
  Gc_C00009_hEC6411 = 1;
  Gnc_C00008_hEC6411 = 1;
  Gc_C00008_hEC6411 = 1;
  Gnc_C00288_hEC6411 = 1;
  Gc_C00288_hEC6411 = 1;
  Gnc_C05167_hEC43117 = 1;
  Gc_C05167_hEC43117 = 1;
  Gnc_C00001_hEC43117 = 1;
  Gc_C00001_hEC43117 = 1;
  Gnc_C00022_hEC43117 = 1;
  Gc_C00022_hEC43117 = 1;
  Gnc_C00065_hEC43117 = 1;
  Gc_C00065_hEC43117 = 1;
  Gnc_C00161_hEC43117 = 1;
  Gc_C00161_hEC43117 = 1;
  Gnc_C02218_hEC43117 = 1;
  Gc_C02218_hEC43117 = 1;
  Gnc_C00014_hEC43117 = 1;
  Gc_C00014_hEC43117 = 1;
  Gnc_C02441_hEC11137 = 1;
  Gc_C02441_hEC11137 = 1;
  Gnc_C00003_hEC11137 = 1;
  Gc_C00003_hEC11137 = 1;
  Gnc_C00004_hEC11137 = 1;
  Gc_C00004_hEC11137 = 1;
  Gnc_C00024_hEC11137 = 1;
  Gc_C00024_hEC11137 = 1;
  Gnc_C00036_hEC11137 = 1;
  Gc_C00036_hEC11137 = 1;
  Gnc_C00010_hEC11137 = 1;
  Gc_C00010_hEC11137 = 1;
  Gnc_C00149_hEC11137 = 1;
  Gc_C00149_hEC11137 = 1;
  Gnc_C00741_hEC11137 = 1;
  Gc_C00741_hEC11137 = 1;
  Gnc_C11592_hEC11137 = 1;
  Gc_C11592_hEC11137 = 1;
  Gnc_C00002_hEC11137 = 1;
  Gc_C00002_hEC11137 = 1;
  Gnc_C00209_hEC11137 = 1;
  Gc_C00209_hEC11137 = 1;
  Gnc_C00080_hEC11137 = 1;
  Gc_C00080_hEC11137 = 1;

  // Assignment rules:
  hEC6411_fr := (Gnc_C00002_hEC6411 + (1 - Gnc_C00002_hEC6411)*(1/(1 + C00002/Ki_C00002_hEC6411)))*(Gnc_C00008_hEC6411 + (1 - Gnc_C00008_hEC6411)*(1/(1 + C00008/Ki_C00008_hEC6411)))*(Gnc_C00009_hEC6411 + (1 - Gnc_C00009_hEC6411)*(1/(1 + C00009/Ki_C00009_hEC6411)))*(Gnc_C00022_hEC6411 + (1 - Gnc_C00022_hEC6411)*(1/(1 + C00022/Ki_C00022_hEC6411)))*(Gnc_C00036_hEC6411 + (1 - Gnc_C00036_hEC6411)*(1/(1 + C00036/Ki_C00036_hEC6411)))*(Gnc_C00288_hEC6411 + (1 - Gnc_C00288_hEC6411)*(1/(1 + C00288/Ki_C00288_hEC6411)));
  hEC6411_Dreg := (1 - Gc_C00002_hEC6411)*(C00002/Ki_C00002_hEC6411) + (1 - Gc_C00008_hEC6411)*(C00008/Ki_C00008_hEC6411) + (1 - Gc_C00009_hEC6411)*(C00009/Ki_C00009_hEC6411) + (1 - Gc_C00022_hEC6411)*(C00022/Ki_C00022_hEC6411) + (1 - Gc_C00036_hEC6411)*(C00036/Ki_C00036_hEC6411) + (1 - Gc_C00288_hEC6411)*(C00288/Ki_C00288_hEC6411);
  R704_D := (1 + C00002/Km_C00002_hEC6411)*(1 + C00022/Km_C00022_hEC6411)*(1 + C00288/Km_C00288_hEC6411) + (1 + C00008/Km_C00008_hEC6411)*(1 + C00009/Km_C00009_hEC6411)*(1 + C00036/Km_C00036_hEC6411) - 1;
  hKcat_F_R704 := Kcat_V_R704*(Keq_R704*Km_C00002_hEC6411*Km_C00022_hEC6411*Km_C00288_hEC6411/(Km_C00008_hEC6411*Km_C00009_hEC6411*Km_C00036_hEC6411))^0.5;
  hKcat_R_R704 := Kcat_V_R704*(Keq_R704*Km_C00002_hEC6411*Km_C00022_hEC6411*Km_C00288_hEC6411/(Km_C00008_hEC6411*Km_C00009_hEC6411*Km_C00036_hEC6411))^(-0.5);
  R704_f := hEC6411*hEC6411_fr*(hKcat_F_R704*C00002*C00022*C00288/(Km_C00002_hEC6411*Km_C00022_hEC6411*Km_C00288_hEC6411))/(R704_D + hEC6411_Dreg);
  R704_r := hEC6411*hEC6411_fr*(hKcat_R_R704*C00008*C00009*C00036/(Km_C00008_hEC6411*Km_C00009_hEC6411*Km_C00036_hEC6411))/(R704_D + hEC6411_Dreg);
  R705_D := (1 + C00058/Km_C00058_hEC11719)*(1 + C00003/Km_C00003_hEC11719) + (1 + C00011/Km_C00011_hEC11719)*(1 + C00004/Km_C00004_hEC11719) - 1;
  hKcat_F_R705 := Kcat_V_R705*(Keq_R705*Km_C00058_hEC11719*Km_C00003_hEC11719/(Km_C00011_hEC11719*Km_C00004_hEC11719))^0.5;
  hKcat_R_R705 := Kcat_V_R705*(Keq_R705*Km_C00058_hEC11719*Km_C00003_hEC11719/(Km_C00011_hEC11719*Km_C00004_hEC11719))^(-0.5);
  R705_f := hEC11719*(hKcat_F_R705*C00058*C00003/(Km_C00058_hEC11719*Km_C00003_hEC11719))/R705_D;
  R705_r := hEC11719*(hKcat_R_R705*C00011*C00004/(Km_C00011_hEC11719*Km_C00004_hEC11719))/R705_D;
  hEC43117_fr := (Gnc_C00014_hEC43117 + (1 - Gnc_C00014_hEC43117)*(1/(1 + C00014/Ki_C00014_hEC43117)))*(Gnc_C00022_hEC43117 + (1 - Gnc_C00022_hEC43117)*(1/(1 + C00022/Ki_C00022_hEC43117)))*(Gnc_C00065_hEC43117 + (1 - Gnc_C00065_hEC43117)*(1/(1 + C00065/Ki_C00065_hEC43117)))*(Gnc_C00161_hEC43117 + (1 - Gnc_C00161_hEC43117)*(1/(1 + C00161/Ki_C00161_hEC43117)))*(Gnc_C02218_hEC43117 + (1 - Gnc_C02218_hEC43117)*(1/(1 + C02218/Ki_C02218_hEC43117)))*(Gnc_C05167_hEC43117 + (1 - Gnc_C05167_hEC43117)*(1/(1 + C05167/Ki_C05167_hEC43117)));
  hEC43117_Dreg := (1 - Gc_C00014_hEC43117)*(C00014/Ki_C00014_hEC43117) + (1 - Gc_C00022_hEC43117)*(C00022/Ki_C00022_hEC43117) + (1 - Gc_C00065_hEC43117)*(C00065/Ki_C00065_hEC43117) + (1 - Gc_C00161_hEC43117)*(C00161/Ki_C00161_hEC43117) + (1 - Gc_C02218_hEC43117)*(C02218/Ki_C02218_hEC43117) + (1 - Gc_C05167_hEC43117)*(C05167/Ki_C05167_hEC43117);
  R706_D := 1 + C00065/Km_C00065_hEC43117 + (1 + C00014/Km_C00014_hEC43117)*(1 + C00022/Km_C00022_hEC43117) - 1;
  hKcat_F_R706 := Kcat_V_R706*(Keq_R706*Km_C00065_hEC43117/(Km_C00014_hEC43117*Km_C00022_hEC43117))^0.5;
  hKcat_R_R706 := Kcat_V_R706*(Keq_R706*Km_C00065_hEC43117/(Km_C00014_hEC43117*Km_C00022_hEC43117))^(-0.5);
  R706_f := hEC43117*hEC43117_fr*(hKcat_F_R706*C00065/Km_C00065_hEC43117)/(R706_D + hEC43117_Dreg);
  R706_r := hEC43117*hEC43117_fr*(hKcat_R_R706*C00014*C00022/(Km_C00014_hEC43117*Km_C00022_hEC43117))/(R706_D + hEC43117_Dreg);
  R707_D := 1 + C00065/Km_C00065_hEC43117 + 1 + C02218/Km_C02218_hEC43117 - 1;
  hKcat_F_R707 := Kcat_V_R707*(Keq_R707*Km_C00065_hEC43117/Km_C02218_hEC43117)^0.5;
  hKcat_R_R707 := Kcat_V_R707*(Keq_R707*Km_C00065_hEC43117/Km_C02218_hEC43117)^(-0.5);
  R707_f := hEC43117*hEC43117_fr*(hKcat_F_R707*C00065/Km_C00065_hEC43117)/(R707_D + hEC43117_Dreg);
  R707_r := hEC43117*hEC43117_fr*(hKcat_R_R707*C02218/Km_C02218_hEC43117)/(R707_D + hEC43117_Dreg);
  R708_D := 1 + C05167/Km_C05167_hEC43117 + (1 + C00014/Km_C00014_hEC43117)*(1 + C00161/Km_C00161_hEC43117) - 1;
  hKcat_F_R708 := Kcat_V_R708*(Keq_R708*Km_C05167_hEC43117/(Km_C00014_hEC43117*Km_C00161_hEC43117))^0.5;
  hKcat_R_R708 := Kcat_V_R708*(Keq_R708*Km_C05167_hEC43117/(Km_C00014_hEC43117*Km_C00161_hEC43117))^(-0.5);
  R708_f := hEC43117*hEC43117_fr*(hKcat_F_R708*C05167/Km_C05167_hEC43117)/(R708_D + hEC43117_Dreg);
  R708_r := hEC43117*hEC43117_fr*(hKcat_R_R708*C00014*C00161/(Km_C00014_hEC43117*Km_C00161_hEC43117))/(R708_D + hEC43117_Dreg);
  R709_D := 1 + C02218/Km_C02218_hEC43117 + (1 + C00014/Km_C00014_hEC43117)*(1 + C00022/Km_C00022_hEC43117) - 1;
  hKcat_F_R709 := Kcat_V_R709*(Keq_R709*Km_C02218_hEC43117/(Km_C00014_hEC43117*Km_C00022_hEC43117))^0.5;
  hKcat_R_R709 := Kcat_V_R709*(Keq_R709*Km_C02218_hEC43117/(Km_C00014_hEC43117*Km_C00022_hEC43117))^(-0.5);
  R709_f := hEC43117*hEC43117_fr*(hKcat_F_R709*C02218/Km_C02218_hEC43117)/(R709_D + hEC43117_Dreg);
  R709_r := hEC43117*hEC43117_fr*(hKcat_R_R709*C00014*C00022/(Km_C00014_hEC43117*Km_C00022_hEC43117))/(R709_D + hEC43117_Dreg);
  hEC11137_fr := (Gnc_C00002_hEC11137 + (1 - Gnc_C00002_hEC11137)*(1/(1 + C00002/Ki_C00002_hEC11137)))*(Gnc_C00003_hEC11137 + (1 - Gnc_C00003_hEC11137)*(1/(1 + C00003/Ki_C00003_hEC11137)))*(Gnc_C00004_hEC11137 + (1 - Gnc_C00004_hEC11137)*(1/(1 + C00004/Ki_C00004_hEC11137)))*(Gnc_C00010_hEC11137 + (1 - Gnc_C00010_hEC11137)*(1/(1 + C00010/Ki_C00010_hEC11137)))*(Gnc_C00024_hEC11137 + (1 - Gnc_C00024_hEC11137)*(1/(1 + C00024/Ki_C00024_hEC11137)))*(Gnc_C00036_hEC11137 + (1 - Gnc_C00036_hEC11137)*(1/(1 + C00036/Ki_C00036_hEC11137)))*(Gnc_C00149_hEC11137 + (1 - Gnc_C00149_hEC11137)*(1/(1 + C00149/Ki_C00149_hEC11137)))*(Gnc_C00209_hEC11137 + (1 - Gnc_C00209_hEC11137)*(1/(1 + C00209/Ki_C00209_hEC11137)))*(Gnc_C00741_hEC11137 + (1 - Gnc_C00741_hEC11137)*(1/(1 + C00741/Ki_C00741_hEC11137)))*(Gnc_C02441_hEC11137 + (1 - Gnc_C02441_hEC11137)*(1/(1 + C02441/Ki_C02441_hEC11137)))*(Gnc_C11592_hEC11137 + (1 - Gnc_C11592_hEC11137)*(1/(1 + C11592/Ki_C11592_hEC11137)));
  hEC11137_Dreg := (1 - Gc_C00002_hEC11137)*(C00002/Ki_C00002_hEC11137) + (1 - Gc_C00003_hEC11137)*(C00003/Ki_C00003_hEC11137) + (1 - Gc_C00004_hEC11137)*(C00004/Ki_C00004_hEC11137) + (1 - Gc_C00010_hEC11137)*(C00010/Ki_C00010_hEC11137) + (1 - Gc_C00024_hEC11137)*(C00024/Ki_C00024_hEC11137) + (1 - Gc_C00036_hEC11137)*(C00036/Ki_C00036_hEC11137) + (1 - Gc_C00149_hEC11137)*(C00149/Ki_C00149_hEC11137) + (1 - Gc_C00209_hEC11137)*(C00209/Ki_C00209_hEC11137) + (1 - Gc_C00741_hEC11137)*(C00741/Ki_C00741_hEC11137) + (1 - Gc_C02441_hEC11137)*(C02441/Ki_C02441_hEC11137) + (1 - Gc_C11592_hEC11137)*(C11592/Ki_C11592_hEC11137);
  R710_D := (1 + C00003/Km_C00003_hEC11137)*(1 + C00149/Km_C00149_hEC11137) + (1 + C00004/Km_C00004_hEC11137)*(1 + C00036/Km_C00036_hEC11137) - 1;
  hKcat_F_R710 := Kcat_V_R710*(Keq_R710*Km_C00003_hEC11137*Km_C00149_hEC11137/(Km_C00004_hEC11137*Km_C00036_hEC11137))^0.5;
  hKcat_R_R710 := Kcat_V_R710*(Keq_R710*Km_C00003_hEC11137*Km_C00149_hEC11137/(Km_C00004_hEC11137*Km_C00036_hEC11137))^(-0.5);
  R710_f := hEC11137*hEC11137_fr*(hKcat_F_R710*C00003*C00149/(Km_C00003_hEC11137*Km_C00149_hEC11137))/(R710_D + hEC11137_Dreg);
  R710_r := hEC11137*hEC11137_fr*(hKcat_R_R710*C00004*C00036/(Km_C00004_hEC11137*Km_C00036_hEC11137))/(R710_D + hEC11137_Dreg);

  // Reactions:
  R704: C00002 + C00022 + C00288 + hEC6411 -> hEC6411 + C00008 + C00009 + C00036; R704_f - R704_r;
  R705: C00058 + C00003 + hEC11719 -> hEC11719 + C00080 + C00011 + C00004; R705_f - R705_r;
  R706: C00065 + hEC43117 -> hEC43117 + C00014 + C00022; R706_f - R706_r;
  R707: C00065 + hEC43117 -> hEC43117 + C00001 + C02218; R707_f - R707_r;
  R708: C05167 + hEC43117 -> hEC43117 + C00014 + C00161; R708_f - R708_r;
  R709: C00001 + C02218 + hEC43117 -> hEC43117 + C00014 + C00022; R709_f - R709_r;
  R710: C00003 + C00149 + hEC11137 -> hEC11137 + C00004 + C00036 + C00080; R710_f - R710_r;
end
