// SBML level 3 version 1

function Function_for_vBMGAP(GAP, default, kBMGLCGAP)
  kBMGLCGAP*GAP/default;
end

function Function_for_vDCS(Cs, default, kdegr, mu)
  (mu + kdegr)*Cs/default;
end

function Function_for_vDFUM(FUM, default, mu)
  mu*FUM/default;
end

function Function_for_vDG6P(G6P, default, mu)
  mu*G6P/default;
end

function Function_for_vDGLCex(D, GLCex, default)
  D*GLCex/default;
end

function Function_for_vBME4P(E4P, default, kBMGLCE4P)
  kBMGLCE4P*E4P/default;
end

function Function_for_vBMF6P(F6P, default, kBMGLCF6P)
  kBMGLCF6P*F6P/default;
end

function Function_for_vBMFUM(FUM, default, kBMGLCFUM)
  kBMGLCFUM*FUM/default;
end

function Function_for_vD6PG(default, mu, sixPG)
  mu*sixPG/default;
end

function Function_for_vDAceK(AceK, default, kdegr, mu)
  (mu + kdegr)*AceK/default;
end

function Function_for_vDF6P(F6P, default, mu)
  mu*F6P/default;
end

function Function_for_vDAcs(Acs, default, kdegr, mu)
  (mu + kdegr)*Acs/default;
end

function Function_for_vBMPEP(PEP, default, kBMGLCPEP)
  kBMGLCPEP*PEP/default;
end

function Function_for_vBMAcCoA(AcCoA, default, kBMGLCAcCoA)
  kBMGLCAcCoA*AcCoA/default;
end

function Function_for_vBMPYR(PYR, default, kBMGLCPYR)
  kBMGLCPYR*PYR/default;
end

function Function_for_vDFBP(FBP, default, mu)
  mu*FBP/default;
end

function Function_for_vDFum(Fum, default, kdegr, mu)
  (mu + kdegr)*Fum/default;
end

function Function_for_vDGAPDH(Gapdh, default, kdegr, mu)
  (mu + kdegr)*Gapdh/default;
end

function Function_for_vDGLC(GLC, default, mu)
  mu*GLC/default;
end

function Function_for_vBMSUC(SUC, default, kBMGLCSUC)
  kBMGLCSUC*SUC/default;
end

function Function_for_vDFba(Fba, default, kdegr, mu)
  (mu + kdegr)*Fba/default;
end

function Function_for_vBMR5P(R5P, default, kBMGLCR5P)
  kBMGLCR5P*R5P/default;
end

function Function_for_vBMG6P(G6P, default, kBMGLCG6P)
  kBMGLCG6P*G6P/default;
end

function Function_for_vBMOAA(OAA, default, kBMGLCOAA)
  kBMGLCOAA*OAA/default;
end

function Function_for_vD6PGL(default, mu, sixPGL)
  mu*sixPGL/default;
end

function Function_for_vDACEex(ACEex, D, default)
  D*ACEex/default;
end

function Function_for_vDAcCoA(AcCoA, default, mu)
  mu*AcCoA/default;
end

function Function_for_vBMaKG(aKG, default, kBMGLCaKG)
  kBMGLCaKG*aKG/default;
end

function Function_for_vDAcP(AcP, default, mu)
  mu*AcP/default;
end

function Function_for_vDE4P(E4P, default, mu)
  mu*E4P/default;
end

function Function_for_vDFbp(Fbp, default, kdegr, mu)
  (mu + kdegr)*Fbp/default;
end

function Function_for_vDGAP(GAP, default, mu)
  mu*GAP/default;
end

function Function_for_vDMAL(MAL, default, mu)
  mu*MAL/default;
end

function Function_for_vDSDH(Sdh, default, kdegr, mu)
  (mu + kdegr)*Sdh/default;
end

function Function_for_vDX5P(X5P, default, mu)
  mu*X5P/default;
end

function Function_for_vDR5P(R5P, default, mu)
  mu*R5P/default;
end

function Function_for_vDGOX(GOX, default, mu)
  mu*GOX/default;
end

function Function_for_vDGLCfeed(D, GLCfeed, default)
  D*GLCfeed/default;
end

function Function_for_vDPYR(PYR, default, mu)
  mu*PYR/default;
end

function Function_for_vDPfk(Pfk, default, kdegr, mu)
  (mu + kdegr)*Pfk/default;
end

function Function_for_vDPyk(Pyk, default, kdegr, mu)
  (mu + kdegr)*Pyk/default;
end

function Function_for_vDIcl(Icl, default, kdegr, mu)
  (mu + kdegr)*Icl/default;
end

function Function_for_vDKDPG(KDPG, default, mu)
  mu*KDPG/default;
end

function Function_for_vDPck(Pck, default, kdegr, mu)
  (mu + kdegr)*Pck/default;
end

function Function_for_vDMDH(Mdh, default, kdegr, mu)
  (mu + kdegr)*Mdh/default;
end

function Function_for_vDPps(Pps, default, kdegr, mu)
  (mu + kdegr)*Pps/default;
end

function Function_for_vDRU5P(RU5P, default, mu)
  mu*RU5P/default;
end

function Function_for_vDX(D, X, default)
  D*X/default;
end

function Function_for_vDaKG(aKG, default, mu)
  mu*aKG/default;
end

function Function_for_vDPpc(Ppc, default, kdegr, mu)
  (mu + kdegr)*Ppc/default;
end

function Function_for_vDICIT(ICIT, default, mu)
  mu*ICIT/default;
end

function Function_for_vDMS(Ms, default, kdegr, mu)
  (mu + kdegr)*Ms/default;
end

function Function_for_vDS7P(S7P, default, mu)
  mu*S7P/default;
end

function Function_for_vDPEP(PEP, default, mu)
  mu*PEP/default;
end

function Function_for_vDGlk(Glk, default, kdegr, mu)
  (mu + kdegr)*Glk/default;
end

function Function_for_vDOAA(OAA, default, mu)
  mu*OAA/default;
end

function Function_for_vDICDH(Icdh, default, kdegr, mu)
  (mu + kdegr)*Icdh/default;
end

function Function_for_vDICDHP(IcdhP, default, kdegr, mu)
  (mu + kdegr)*IcdhP/default;
end

function Function_for_vDMaeB(MaeB, default, kdegr, mu)
  (mu + kdegr)*MaeB/default;
end

function Function_for_vDPDH(Pdh, default, kdegr, mu)
  (mu + kdegr)*Pdh/default;
end

function Function_for_vDSUC(SUC, default, mu)
  mu*SUC/default;
end

function Function_for_vDaKGDH(akgdh, default, kdegr, mu)
  (mu + kdegr)*akgdh/default;
end

function Function_for_vDcAMP(cAMP, default, mu)
  mu*cAMP/default;
end

function Function_for_vE6PGDH(ATP, K6Pgdh6PG, K6PgdhATPinh, K6PgdhNADP, K6PgdhNADPHinh, NADP, NADPH, default, sixPG, v6Pgdhmax)
  v6Pgdhmax*sixPG*NADP/((sixPG + K6Pgdh6PG)*(NADP + K6PgdhNADP*(1 + NADPH/K6PgdhNADPHinh)*(1 + ATP/K6PgdhATPinh)))/default;
end

function Function_for_vEPdh(AcCoA, CoA, KPdhAcCoAm, KPdhCoAm, KPdhNADHm, KPdhNADm, KPdhPYRm, KPdhi, NAD, NADH, PYR, Pdh, default, kPdhcat)
  Pdh*kPdhcat*(1/(1 + KPdhi*NADH/NAD))*(PYR/KPdhPYRm)*(NAD/KPdhNADm)*(CoA/KPdhCoAm)/((1 + PYR/KPdhPYRm)*(1 + NAD/KPdhNADm + NADH/KPdhNADHm)*(1 + CoA/KPdhCoAm + AcCoA/KPdhAcCoAm))/default;
end

function Function_for_vEPgi(F6P, G6P, KPgiF6P, KPgiF6P6pginh, KPgiG6P, KPgiG6P6pginh, KPgieq, default, sixPG, vPgimax)
  vPgimax*(G6P - F6P/KPgieq)/(KPgiG6P*(1 + F6P/(KPgiF6P*(1 + sixPG/KPgiF6P6pginh)) + sixPG/KPgiG6P6pginh) + G6P)/default;
end

function Function_for_vEPpc(FBP, KPpcFBP, KPpcPEP, LPpc, PEP, Ppc, default, kPpccat, nPpc)
  Ppc*kPpccat*PEP/KPpcPEP*(1 + PEP/KPpcPEP)^(nPpc - 1)/((1 + PEP/KPpcPEP)^nPpc + LPpc/(1 + FBP/KPpcFBP)^nPpc)/default;
end

function Function_for_vEAcs(ACEex, Acs, KAcsACE, default, kAcscat)
  Acs*kAcscat*ACEex/(ACEex + KAcsACE)/default;
end

function Function_for_vEEdd(KDPG, KEdd6PGm, KEddKDPGm, KEddeq, QEddpH, default, sixPG, vEddmax)
  QEddpH*(-(KDPG/KEddeq) + sixPG)*vEddmax/(KEdd6PGm + KDPG*KEdd6PGm/KEddKDPGm + sixPG)/default;
end

function Function_for_vEG6PDH(G6P, KG6pdhG6P, KG6pdhNADP, KG6pdhNADPHg6pinh, KG6pdhNADPHnadpinh, NADP, NADPH, default, vG6pdhmax)
  vG6pdhmax*G6P*NADP/((G6P + KG6pdhG6P)*(1 + NADPH/KG6pdhNADPHg6pinh)*(KG6pdhNADP*(1 + NADPH/KG6pdhNADPHnadpinh) + NADP))/default;
end

function Function_for_vEMdh(KMdhMALI, KMdhMALm, KMdhNADHI, KMdhNADHm, KMdhNADI, KMdhNADII, KMdhNADm, KMdhOAAI, KMdhOAAII, KMdhOAAm, KMdheq, MAL, NAD, NADH, OAA, default, vMdh1max, vMdh2max)
  vMdh1max*vMdh2max*(NAD*MAL - NADH*OAA/KMdheq)/(KMdhNADI*KMdhMALm*vMdh2max + KMdhMALm*vMdh2max*NAD + KMdhNADm*vMdh2max*MAL + vMdh2max*NAD*MAL + KMdhOAAm*vMdh1max*NADH/KMdheq + KMdhNADHm*vMdh1max*OAA/KMdheq + vMdh1max*NADH*OAA/KMdheq + vMdh1max*KMdhOAAm*NAD*NADH/(KMdheq*KMdhNADI) + vMdh2max*KMdhNADm*MAL*OAA/KMdhOAAI + vMdh2max*NAD*MAL*NADH/KMdhNADHI + vMdh1max*MAL*NADH*OAA/(KMdheq*KMdhMALI) + vMdh2max*NAD*MAL*OAA/KMdhOAAII + vMdh1max*NAD*NADH*OAA/(KMdhNADII*KMdheq) + KMdhNADI*vMdh2max*NAD*MAL*NADH*OAA/(KMdhNADII*KMdhOAAm*KMdhNADHI))/default;
end

function Function_for_vEMaeB(AcCoA, KMaeBAcCoA, KMaeBMAL, KMaeBcAMP, LMaeB, MAL, MaeB, cAMP, default, kMaeBcat, nMaeB)
  MaeB*kMaeBcat*MAL/KMaeBMAL*(1 + MAL/KMaeBMAL)^(nMaeB - 1)/((1 + MAL/KMaeBMAL)^nMaeB + LMaeB*(1 + AcCoA/KMaeBAcCoA + cAMP/KMaeBcAMP)^nMaeB)/default;
end

function Function_for_vEIcl(GAP, ICIT, Icl, KIcl3PG, KIclICIT, KIclPEP, KIclaKG, LIcl, PEP, aKG, default, kIclcat, nIcl)
  Icl*kIclcat*ICIT/KIclICIT*(1 + ICIT/KIclICIT)^(nIcl - 1)/((1 + ICIT/KIclICIT)^nIcl + LIcl*(1 + PEP/KIclPEP + GAP/KIcl3PG + aKG/KIclaKG)^nIcl)/default;
end

function Function_for_vEAckmedium(X, default, rateOf_vEAck, rho)
  rateOf_vEAck*X/rho/default;
end

function Function_for_vERPE(KRpeeq, RU5P, X5P, default, vRpemax)
  vRpemax*(RU5P - X5P/KRpeeq)/default;
end

function Function_for_vEICDH(ICIT, Icdh, KIcdhICIT, KIcdhPEP, LIcdh, PEP, default, icdhb, kIcdhcat, nIcdh)
  (Icdh + icdhb)*kIcdhcat*ICIT/KIcdhICIT*(1 + ICIT/KIcdhICIT)^(nIcdh - 1)/((1 + ICIT/KIcdhICIT)^nIcdh + LIcdh*(1 + PEP/KIcdhPEP)^nIcdh)/default;
end

function Function_for_vEAceKph(AceK, IcdhP, KAceKIcdhP, KAceKphOAA, LAceKph, OAA, default, kAceKphcat, nAceKph)
  AceK*kAceKphcat*IcdhP/KAceKIcdhP*(1 + IcdhP/KAceKIcdhP)^(nAceKph - 1)/((1 + IcdhP/KAceKIcdhP)^nAceKph + LAceKph/(1 + OAA/KAceKphOAA)^nAceKph)/default;
end

function Function_for_vECya(EIIAP, KCyaEIIAP, default, vCyamax)
  vCyamax*EIIAP/(EIIAP + KCyaEIIAP)/default;
end

function Function_for_vEAceKki(AceK, Icdh, KAceKIcdh, KAceKOAA, LAceK, OAA, default, kAceKkicat, nAceK)
  AceK*kAceKkicat*Icdh/KAceKIcdh*(1 + Icdh/KAceKIcdh)^(nAceK - 1)/((1 + Icdh/KAceKIcdh)^nAceK + LAceK*(1 + OAA/KAceKOAA)^nAceK)/default;
end

function Function_for_vECS(AcCoA, Cs, KCsAcCoA, KCsOAA, KCsOAAAcCoA, KCsaKG, OAA, aKG, default, kCscat)
  Cs*kCscat*OAA*AcCoA/((1 + aKG/KCsaKG)*KCsOAAAcCoA*KCsAcCoA + KCsAcCoA*OAA + (1 + aKG/KCsaKG)*KCsOAA*AcCoA + OAA*AcCoA)/default;
end

function Function_for_vEAck(ACEex, ADP, ATP, AcP, KAckACEm, KAckADPm, KAckATPm, KAckAcPm, KAckeq, default, vAckmax)
  vAckmax*(1/(KAckADPm*KAckAcPm))*(AcP*ADP - ACEex*ATP/KAckeq)/((1 + AcP/KAckAcPm + ACEex/KAckACEm)*(1 + ADP/KAckADPm + ATP/KAckATPm))/default;
end

function Function_for_vEEda(GAP, KDPG, KEdaGAPm, KEdaKDPGm, KEdaPYRm, KEdaeq, PYR, QEdapH, default, vEdamax)
  vEdamax*QEdapH*(KDPG - GAP*PYR/KEdaeq)/(KEdaKDPGm + KDPG + KEdaKDPGm*(PYR/KEdaPYRm + GAP/KEdaGAPm + PYR*GAP/(KEdaPYRm*KEdaGAPm)))/default;
end

function Function_for_vEFba(FBP, Fba, GAP, KFbaDHAP, KFbaFBP, KFbaGAP, KFbaGAPinh, KFbaeq, VFbablf, default, kFbacat)
  Fba*kFbacat*(FBP - GAP^2/KFbaeq)/(KFbaFBP + FBP + KFbaGAP*GAP/(KFbaeq*VFbablf) + KFbaDHAP*GAP/(KFbaeq*VFbablf) + FBP*GAP/KFbaGAPinh + GAP^2/(KFbaeq*VFbablf))/default;
end

function Function_for_vEFbp(FBP, Fbp, KFbpFBP, KFbpPEP, LFbp, PEP, default, kFbpcat, nFbp)
  Fbp*kFbpcat*FBP/KFbpFBP*(1 + FBP/KFbpFBP)^(nFbp - 1)/((1 + FBP/KFbpFBP)^nFbp + LFbp/(1 + PEP/KFbpPEP)^nFbp)/default;
end

function Function_for_vEAcsmedium(X, default, rateOf_vEAcs, rho)
  rateOf_vEAcs*X/rho/default;
end

function Function_for_vEFum(FUM, KFumFUMm, KFumeq, MAL, default, vFum1max, vFum2max)
  vFum1max*vFum2max*(FUM - MAL/KFumeq)/(KFumFUMm*vFum2max + vFum2max*FUM + vFum1max*MAL/KFumeq)/default;
end

function Function_for_vEGapdh(GAP, Gapdh, KGapdhGAP, KGapdhNAD, KGapdhNADH, KGapdhPGP, KGapdheq, NAD, NADH, PEP, default, kGapdhcat)
  Gapdh*kGapdhcat*(GAP*NAD - PEP*NADH/KGapdheq)/((KGapdhGAP*(1 + PEP/KGapdhPGP) + GAP)*(KGapdhNAD*(1 + NADH/KGapdhNADH) + NAD))/default;
end

function Function_for_vEGlk(ATP, G6P, GLC, Glk, KGlkATPm, KGlkG6Pi, KGlkGLCm, default, kGlkcat)
  Glk*kGlkcat*(GLC/KGlkGLCm)*(ATP/(KGlkATPm*(1 + G6P/KGlkG6Pi)))/(1 + GLC/KGlkGLCm + ATP/(KGlkATPm*(1 + G6P/KGlkG6Pi)) + GLC*ATP/(KGlkGLCm*KGlkATPm*(1 + G6P/KGlkG6Pi)) + G6P/KGlkG6Pi)/default;
end

function Function_for_vEMS(AcCoA, GOX, KMsAcCoA, KMsGOX, KMsGOXAcCoA, Ms, default, kMscat)
  Ms*kMscat*GOX*AcCoA/(KMsGOXAcCoA*KMsAcCoA + KMsAcCoA*GOX + KMsGOX*AcCoA + GOX*AcCoA)/default;
end

function Function_for_vEPck(ADP, ATP, KPckADPi, KPckATPI, KPckATPi, KPckOAA, KPckOAAI, KPckPEP, KPckPEPi, OAA, PEP, Pck, default, kPckcat)
  Pck*kPckcat*OAA*ATP/ADP/(KPckOAA*ATP/ADP + OAA*ATP/ADP + KPckATPi*KPckOAA/KPckADPi + KPckATPi*KPckOAA/(KPckPEP*KPckADPi)*PEP + KPckATPi*KPckOAA/(KPckPEPi*KPckATPI)*ATP/ADP*PEP + KPckATPi*KPckOAA/(KPckADPi*KPckOAAI)*OAA)/default;
end

function Function_for_vEPfk(A, ADP, ATP, B, F6P, KPfkADPc, KPfkATPs, KPfkF6Ps, LPfk, Pfk, default, kPfkcat, nPfk)
  Pfk*kPfkcat*ATP*F6P/((ATP + KPfkATPs*(1 + ADP/KPfkADPc))*(F6P + KPfkF6Ps*A/B)*(1 + LPfk/(1 + F6P*B/(KPfkF6Ps*A))^nPfk))/default;
end

function Function_for_vEPgl(H, KPgl6PGLm, KPgl6PGm, KPgleq, KPglh1, KPglh2, default, sixPG, sixPGL, vPglmax)
  vPglmax*(sixPGL - sixPG/KPgleq)/((1 + H/KPglh1 + KPglh2/H)*(KPgl6PGLm + sixPGL + KPgl6PGLm/KPgl6PGm*sixPG))/default;
end

function Function_for_vEPps(KPpsPEP, KPpsPYR, LPps, PEP, PYR, Pps, default, kPpscat, nPps)
  Pps*kPpscat*PYR/KPpsPYR*(1 + PYR/KPpsPYR)^(nPps - 1)/((1 + PYR/KPpsPYR)^nPps + LPps*(1 + PEP/KPpsPEP)^nPps)/default;
end

function Function_for_vEPta(AcCoA, AcP, CoA, KPtaAcCoAi, KPtaAcPi, KPtaAcPm, KPtaCoAi, KPtaPii, KPtaPim, KPtaeq, Pi, default, vPtamax)
  vPtamax*(1/(KPtaAcCoAi*KPtaPim))*(AcCoA*Pi - AcP*CoA/KPtaeq)/(1 + AcCoA/KPtaAcCoAi + Pi/KPtaPii + AcP/KPtaAcPi + CoA/KPtaCoAi + AcCoA*Pi/(KPtaAcCoAi*KPtaPim) + AcP*CoA/(KPtaAcPm*KPtaCoAi))/default;
end

function Function_for_vEPyk(ADP, AMP, ATP, FBP, KPykADP, KPykAMP, KPykATP, KPykFBP, KPykPEP, LPyk, PEP, Pyk, default, kPykcat, nPyk)
  Pyk*kPykcat*PEP*(PEP/KPykPEP + 1)^(nPyk - 1)*ADP/(KPykPEP*(LPyk*((1 + ATP/KPykATP)/(FBP/KPykFBP + AMP/KPykAMP + 1))^nPyk + (PEP/KPykPEP + 1)^nPyk)*(ADP + KPykADP))/default;
end

function Function_for_vER5PI(KR5pieq, R5P, RU5P, default, vR5pimax)
  vR5pimax*(RU5P - R5P/KR5pieq)/default;
end

function Function_for_vGmdh(CrpcAMP, KmdhCrp, default, mu, vmdhCrpbound, vmdhCrpunbound)
  mu*((1 - CrpcAMP/(CrpcAMP + KmdhCrp))*vmdhCrpunbound + CrpcAMP/(CrpcAMP + KmdhCrp)*vmdhCrpbound)/default;
end

function Function_for_vGicdA(Cra, KicdACra, default, mu, vicdACrabound, vicdACraunbound)
  mu*((1 - Cra/(Cra + KicdACra))*vicdACraunbound + Cra/(Cra + KicdACra)*vicdACrabound)/default;
end

function Function_for_vGlpd(KlpdPdhR, PdhR, default, mu, vlpdPdhRbound, vlpdPdhRunbound)
  mu*((1 - PdhR/(PdhR + KlpdPdhR))*vlpdPdhRunbound + PdhR/(PdhR + KlpdPdhR)*vlpdPdhRbound)/default;
end

function Function_for_vGppsA(Cra, KppsACra, default, mu, vppsACrabound, vppsACraunbound)
  mu*((1 - Cra/(Cra + KppsACra))*vppsACraunbound + Cra/(Cra + KppsACra)*vppsACrabound)/default;
end

function Function_for_vGgapA(Cra, CrpcAMP, KgapACra, KgapACrp, default, mu, vgapACrabound, vgapACraunbound, vgapACrpbound, vgapACrpunbound)
  mu*((1 - Cra/(Cra + KgapACra))*vgapACraunbound + Cra/(Cra + KgapACra)*vgapACrabound + (1 - CrpcAMP/(CrpcAMP + KgapACrp))*vgapACrpunbound + CrpcAMP/(CrpcAMP + KgapACrp)*vgapACrpbound)/default;
end

function Function_for_vETal(E4P, F6P, GAP, KTaleq, S7P, default, vTalmax)
  vTalmax*(GAP*S7P - E4P*F6P/KTaleq)/default;
end

function Function_for_vGaceB(Cra, CrpcAMP, FactoraceB, GOX, IclRtotal, KaceBAKCra, KaceBAKCrp, KaceBAKDNA, KaceBAKGOX, KaceBAKPYR, KaceBAKPYRprime, Kmu, LaceBAK, PYR, aceBAKDNA, default, kaceBAKcatIclR, mu, nmu, vaceBAKCrabound, vaceBAKCraunbound, vaceBAKCrpbound, vaceBAKCrpunbound)
  FactoraceB*(mu*Kmu^nmu/(mu^nmu + Kmu^nmu))*((1 - Cra/(Cra + KaceBAKCra))*vaceBAKCraunbound + Cra/(Cra + KaceBAKCra)*vaceBAKCrabound + (1 - CrpcAMP/(CrpcAMP + KaceBAKCrp))*vaceBAKCrpunbound + CrpcAMP/(CrpcAMP + KaceBAKCrp)*vaceBAKCrpbound + (1 - aceBAKDNA/KaceBAKDNA*(1 + PYR/KaceBAKPYRprime)/(1 + 1/LaceBAK*(GOX/KaceBAKGOX)*(1 + GOX/KaceBAKGOX) + aceBAKDNA/KaceBAKDNA + PYR/KaceBAKPYR + aceBAKDNA/KaceBAKDNA*PYR/KaceBAKPYRprime))*kaceBAKcatIclR*IclRtotal)/default;
end

function Function_for_vGglk(Cra, KglkCra, default, mu, vglkCrabound, vglkCraunbound)
  mu*((1 - Cra/(Cra + KglkCra))*vglkCraunbound + Cra/(Cra + KglkCra)*vglkCrabound)/default;
end

function Function_for_vGgltA(CrpcAMP, KgltACrp, default, mu, ngltA, vgltACrpbound, vgltACrpunbound)
  mu*((1 - CrpcAMP^ngltA/(CrpcAMP^ngltA + KgltACrp^ngltA))*vgltACrpunbound + CrpcAMP^ngltA/(CrpcAMP^ngltA + KgltACrp^ngltA)*vgltACrpbound)/default;
end

function Function_for_vEcAMPdegr(KcAMPdegrcAMP, cAMP, default, vcAMPdegrmax)
  vcAMPdegrmax*cAMP/(cAMP + KcAMPdegrcAMP)/default;
end

function Function_for_vGfumABC(CrpcAMP, KfumABCCrp, default, mu, nfumABC, vfumABCCrpbound, vfumABCCrpunbound)
  mu*((1 - CrpcAMP^nfumABC/(CrpcAMP^nfumABC + KfumABCCrp^nfumABC))*vfumABCCrpunbound + CrpcAMP^nfumABC/(CrpcAMP^nfumABC + KfumABCCrp^nfumABC)*vfumABCCrpbound)/default;
end

function Function_for_vESdh(FUM, KSdhSUCm, KSdheq, SUC, default, vSdh1max, vSdh2max)
  vSdh1max*vSdh2max*(SUC - FUM/KSdheq)/(KSdhSUCm*vSdh2max + vSdh2max*SUC + vSdh1max*FUM/KSdheq)/default;
end

function Function_for_vGppc(SSPpc, default, mu)
  mu*SSPpc/default;
end

function Function_for_vGfbaA(Cra, CrpcAMP, KfbaACra, KfbaACrp, default, mu, vfbaACrabound, vfbaACraunbound, vfbaACrpbound, vfbaACrpunbound)
  mu*((1 - Cra/(Cra + KfbaACra))*vfbaACraunbound + Cra/(Cra + KfbaACra)*vfbaACrabound + (1 - CrpcAMP/(CrpcAMP + KfbaACrp))*vfbaACrpunbound + CrpcAMP/(CrpcAMP + KfbaACrp)*vfbaACrpbound)/default;
end

function Function_for_vGacs(CrpcAMP, KacsCrp, default, mu, nacs, vacsCrpbound, vacsCrpunbound)
  mu*((1 - CrpcAMP^nacs/(CrpcAMP^nacs + KacsCrp^nacs))*vacsCrpunbound + CrpcAMP^nacs/(CrpcAMP^nacs + KacsCrp^nacs)*vacsCrpbound)/default;
end

function Function_for_vEakgdh(CoA, KakgdhCoAm, KakgdhNADHI, KakgdhNADm, KakgdhSUCI, KakgdhZ, KakgdhaKGI, KakgdhaKGm, NAD, NADH, SUC, aKG, akgdh, default, kakgdhcat)
  akgdh*kakgdhcat*aKG*CoA*NAD/(KakgdhNADm*aKG*CoA + KakgdhCoAm*aKG*NAD + KakgdhaKGm*CoA*NAD + aKG*CoA*NAD + KakgdhaKGm*KakgdhZ*SUC*NADH/KakgdhSUCI + KakgdhNADm*aKG*CoA*NADH/KakgdhNADHI + KakgdhCoAm*aKG*NAD*SUC/KakgdhSUCI + KakgdhaKGm*KakgdhZ*aKG*SUC*NADH/(KakgdhaKGI*KakgdhSUCI))/default;
end

function Function_for_vGaceK(Cra, CrpcAMP, FactoraceK, GOX, IclRtotal, KaceBAKCra, KaceBAKCrp, KaceBAKDNA, KaceBAKGOX, KaceBAKPYR, KaceBAKPYRprime, Kmu, LaceBAK, PYR, aceBAKDNA, default, kaceBAKcatIclR, mu, nmu, vaceBAKCrabound, vaceBAKCraunbound, vaceBAKCrpbound, vaceBAKCrpunbound)
  FactoraceK*(mu*Kmu^nmu/(mu^nmu + Kmu^nmu))*((1 - Cra/(Cra + KaceBAKCra))*vaceBAKCraunbound + Cra/(Cra + KaceBAKCra)*vaceBAKCrabound + (1 - CrpcAMP/(CrpcAMP + KaceBAKCrp))*vaceBAKCrpunbound + CrpcAMP/(CrpcAMP + KaceBAKCrp)*vaceBAKCrpbound + (1 - aceBAKDNA/KaceBAKDNA*(1 + PYR/KaceBAKPYRprime)/(1 + 1/LaceBAK*(GOX/KaceBAKGOX)*(1 + GOX/KaceBAKGOX) + aceBAKDNA/KaceBAKDNA + PYR/KaceBAKPYR + aceBAKDNA/KaceBAKDNA*PYR/KaceBAKPYRprime))*kaceBAKcatIclR*IclRtotal)/default;
end

function Function_for_vGmaeB(SSMaeB, default, mu)
  mu*SSMaeB/default;
end

function Function_for_vGpfkA(Cra, KpfkACra, default, mu, vpfkACrabound, vpfkACraunbound)
  mu*((1 - Cra/(Cra + KpfkACra))*vpfkACraunbound + Cra/(Cra + KpfkACra)*vpfkACrabound)/default;
end

function Function_for_vETkt2(E4P, F6P, GAP, KTkt2eq, X5P, default, vTkt2max)
  vTkt2max*(X5P*E4P - F6P*GAP/KTkt2eq)/default;
end

function Function_for_vGfbp(Cra, KfbpCra, default, mu, vfbpCrabound, vfbpCraunbound)
  mu*((1 - Cra/(Cra + KfbpCra))*vfbpCraunbound + Cra/(Cra + KfbpCra)*vfbpCrabound)/default;
end

function Function_for_vETkt1(GAP, KTkt1eq, R5P, S7P, X5P, default, vTkt1max)
  vTkt1max*(R5P*X5P - S7P*GAP/KTkt1eq)/default;
end

function Function_for_vGpckA(Cra, KpckACra, default, mu, vpckACrabound, vpckACraunbound)
  mu*((1 - Cra/(Cra + KpckACra))*vpckACraunbound + Cra/(Cra + KpckACra)*vpckACrabound)/default;
end

function Function_for_vGaceA(Cra, CrpcAMP, GOX, IclRtotal, KaceBAKCra, KaceBAKCrp, KaceBAKDNA, KaceBAKGOX, KaceBAKPYR, KaceBAKPYRprime, Kmu, LaceBAK, PYR, aceBAKDNA, default, kaceBAKcatIclR, mu, nmu, vaceBAKCrabound, vaceBAKCraunbound, vaceBAKCrpbound, vaceBAKCrpunbound)
  mu*Kmu^nmu/(mu^nmu + Kmu^nmu)*((1 - Cra/(Cra + KaceBAKCra))*vaceBAKCraunbound + Cra/(Cra + KaceBAKCra)*vaceBAKCrabound + (1 - CrpcAMP/(CrpcAMP + KaceBAKCrp))*vaceBAKCrpunbound + CrpcAMP/(CrpcAMP + KaceBAKCrp)*vaceBAKCrpbound + (1 - aceBAKDNA/KaceBAKDNA*(1 + PYR/KaceBAKPYRprime)/(1 + 1/LaceBAK*(GOX/KaceBAKGOX)*(1 + GOX/KaceBAKGOX) + aceBAKDNA/KaceBAKDNA + PYR/KaceBAKPYR + aceBAKDNA/KaceBAKDNA*PYR/KaceBAKPYRprime))*kaceBAKcatIclR*IclRtotal)/default;
end

function Function_for_vPTS4medium(EIIAP, GLCex, KPtsEIIA, KPtsGLC, X, default, rho, vPts4max)
  vPts4max*EIIAP*GLCex/((KPtsEIIA + EIIAP)*(KPtsGLC + GLCex))*X/rho/default;
end

function Function_for_vGsucAB(CrpcAMP, KsucABCrp, default, mu, nsucAB, vsucABCrpbound, vsucABCrpunbound)
  mu*((1 - CrpcAMP^nsucAB/(CrpcAMP^nsucAB + KsucABCrp^nsucAB))*vsucABCrpunbound + CrpcAMP^nsucAB/(CrpcAMP^nsucAB + KsucABCrp^nsucAB)*vsucABCrpbound)/default;
end

function Function_for_vgrowth(X, default, mu)
  mu*X/default;
end

function Function_for_vGpykF(Cra, KpykFCra, default, mu, vpykFCrabound, vpykFCraunbound)
  mu*((1 - Cra/(Cra + KpykFCra))*vpykFCraunbound + Cra/(Cra + KpykFCra)*vpykFCrabound)/default;
end

function Function_for_vNonPTS(EIIA, GLCex, KNonptsI, KNonptsS, default, vNonptsmax)
  vNonptsmax*GLCex/(KNonptsS + (1 + EIIA/KNonptsI)*GLCex)/default;
end

function Function_for_vPTS1(EIIA, EIIAP, PEP, PYR, default, kPts1, kmPts1)
  (kPts1*PEP*EIIA - kmPts1*PYR*EIIAP)/default;
end

function Function_for_vGsdhCDAB(CrpcAMP, KsdhCDABCrp, default, mu, nsdhCDAB, vsdhCDABCrpbound, vsdhCDABCrpunbound)
  mu*((1 - CrpcAMP^nsdhCDAB/(CrpcAMP^nsdhCDAB + KsdhCDABCrp^nsdhCDAB))*vsdhCDABCrpunbound + CrpcAMP^nsdhCDAB/(CrpcAMP^nsdhCDAB + KsdhCDABCrp^nsdhCDAB)*vsdhCDABCrpbound)/default;
end

function Function_for_vNonPTSmedium(EIIA, GLCex, KNonptsI, KNonptsS, X, default, rho, vNonptsmax)
  vNonptsmax*GLCex/(KNonptsS + (1 + EIIA/KNonptsI)*GLCex)*X/rho/default;
end

function Function_for_vPTS4(EIIAP, GLCex, KPtsEIIA, KPtsGLC, default, vPts4max)
  vPts4max*EIIAP*GLCex/((KPtsEIIA + EIIAP)*(KPtsGLC + GLCex))/default;
end

model KurataWT_1()
  // KurataWT
  // model units - substance: substance, time: time, volume: volume, area: area, length: length, extent: substance

  // Compartments:
  compartment default = 1 volume;

  // Species:
  species ACEex in default = 0;
  species AcCoA in default = 0.6117/default;
  species AcP in default = 1.103/default;
  species AceK in default = 2.865e-5/default;
  species Acs in default = 0.0001689/default;
  species Cs in default = 0.002777/default;
  species E4P in default = 0.09702/default;
  species EIIAP in default = 0.01445/default;
  species F6P in default = 0.5684/default;
  species FBP in default = 15.03/default;
  species FUM in default = 0.1199/default;
  species Fba in default = 0.02342/default;
  species Fbp in default = 0.0002966/default;
  species Fum in default = 0.002105/default;
  species G6P in default = 3.479/default;
  species GAP in default = 0.2182/default;
  species GLC in default = 2.845/default;
  species GLCex in default = 21.44/default;
  species GLCfeed in default = 0;
  species GOX in default = 0.08051/default;
  species Gapdh in default = 0.04028/default;
  species Glk in default = 0.003066/default;
  species ICIT in default = 0.1099/default;
  species Icdh in default = 0.1721/default;
  species IcdhP in default = 0.1195/default;
  species Icl in default = 0.01204/default;
  species KDPG in default = 1.041/default;
  species MAL in default = 1.432/default;
  species MaeB in default = 0.0001869/default;
  species Mdh in default = 0.00735/default;
  species Ms in default = 0.003618/default;
  species OAA in default = 0.6507/default;
  species PEP in default = 0.4028/default;
  species PYR in default = 1.765/default;
  species Pck in default = 0.0006727/default;
  species Pdh in default = 0.00053/default;
  species Pfk in default = 0.001432/default;
  species Ppc in default = 3.417e-6/default;
  species Pps in default = 0.003863/default;
  species Pyk in default = 0;
  species R5P in default = 0.3979/default;
  species RU5P in default = 0.1586/default;
  species S7P in default = 0.06627/default;
  species SUC in default = 0.5734/default;
  species Sdh in default = 0.05954/default;
  species X in default = 0.012/default;
  species X5P in default = 0.1878/default;
  species aKG in default = 0.4418/default;
  species akgdh in default = 0.002612/default;
  species cAMP in default = 0.01963/default;
  species sixPG in default = 3.457/default;
  species sixPGL in default = 1.607/default;

  // Parameters:
  ADP = 0.56;
  AMP = 0.28;
  ATP = 9.6;
  CoA = 1.4;
  Cratotal = 0.0003;
  Crptotal = 0.0115;
  D = 0;
  EIIAtotal = 0.0769;
  FactoraceB = 0.309;
  FactoraceK = 0.0172;
  IclRtotal = 8.3e-5;
  K6Pgdh6PG = 0.101;
  K6PgdhATPinh = 3.01;
  K6PgdhNADP = 0.0208;
  K6PgdhNADPHinh = 0.0421;
  KAceKIcdh = 0.197;
  KAceKIcdhP = 7.26;
  KAceKOAA = 0.01;
  KAceKphOAA = 0.01;
  KAckACEm = 6.1;
  KAckADPm = 0.177;
  KAckATPm = 0.0886;
  KAckAcPm = 0.0463;
  KAckeq = 234;
  KAcsACE = 0.024;
  KCraFBP = 0.0294;
  KCrpcAMP = 0.42;
  KCsAcCoA = 0.0298;
  KCsOAA = 0.00176;
  KCsOAAAcCoA = 8.86e-5;
  KCsaKG = 0.187;
  KCyaEIIAP = 0.00208;
  KEdaGAPm = 1.18;
  KEdaKDPGm = 0.15;
  KEdaPYRm = 7.7;
  KEdaeq = 0.502;
  KEdd6PGm = 0.118;
  KEddKDPGm = 2.02;
  KEddeq = 1000;
  KFbaDHAP = 0.088;
  KFbaFBP = 0.0839;
  KFbaGAP = 0.154;
  KFbaGAPinh = 0.6;
  KFbaeq = 0.372;
  KFbpFBP = 0.00892;
  KFbpPEP = 0.488;
  KFumFUMm = 0.0965;
  KFumeq = 12.9;
  KG6pdhG6P = 0.356;
  KG6pdhNADP = 0.00382;
  KG6pdhNADPHg6pinh = 0.193;
  KG6pdhNADPHnadpinh = 0.0815;
  KGapdhGAP = 0.152;
  KGapdhNAD = 0.45;
  KGapdhNADH = 0.0208;
  KGapdhPGP = 0.134;
  KGapdheq = 0.3;
  KGlkATPm = 0.712;
  KGlkG6Pi = 15;
  KGlkGLCm = 0.154;
  KIcdhICIT = 0.000201;
  KIcdhPEP = 0.0548;
  KIcl3PG = 0.522;
  KIclICIT = 0.00755;
  KIclPEP = 0.0163;
  KIclaKG = 0.834;
  KMaeBAcCoA = 1.82;
  KMaeBMAL = 0.00146;
  KMaeBcAMP = 4.55;
  KMdhMALI = 0.346;
  KMdhMALm = 0.177;
  KMdhNADHI = 0.0248;
  KMdhNADHm = 0.0313;
  KMdhNADI = 0.114;
  KMdhNADII = 0.945;
  KMdhNADm = 0.0522;
  KMdhOAAI = 0.344;
  KMdhOAAII = 0.0732;
  KMdhOAAm = 0.208;
  KMdheq = 0.75;
  KMsAcCoA = 0.0462;
  KMsGOX = 1.11;
  KMsGOXAcCoA = 0.0396;
  KNonptsI = 0.01;
  KNonptsS = 1.55;
  KPckADPi = 0.0198;
  KPckATPI = 0.0398;
  KPckATPi = 0.0401;
  KPckOAA = 0.578;
  KPckOAAI = 0.347;
  KPckPEP = 0.0701;
  KPckPEPi = 0.06;
  KPdhAcCoAm = 0.008;
  KPdhCoAm = 0.00482;
  KPdhNADHm = 0.0471;
  KPdhNADm = 0.401;
  KPdhPYRm = 1;
  KPdhRPYR = 0.0434;
  KPdhi = 68.3;
  KPfkADPa = 277;
  KPfkADPb = 0.256;
  KPfkADPc = 0.448;
  KPfkAMPa = 10.1;
  KPfkAMPb = 0.0255;
  KPfkATPs = 0.161;
  KPfkF6Ps = 0.0211;
  KPfkPEP = 1.74;
  KPgiF6P = 0.342;
  KPgiF6P6pginh = 0.199;
  KPgiG6P = 2.46;
  KPgiG6P6pginh = 0.181;
  KPgieq = 1.44;
  KPgl6PGLm = 0.023;
  KPgl6PGm = 10;
  KPgleq = 42.7;
  KPglh1 = 0.00437;
  KPglh2 = 9.7e-6;
  KPpcFBP = 0.189;
  KPpcPEP = 0.0272;
  KPpsPEP = 0.000216;
  KPpsPYR = 0.000713;
  KPtaAcCoAi = 0.201;
  KPtaAcPi = 0.32;
  KPtaAcPm = 0.229;
  KPtaCoAi = 0.081;
  KPtaPii = 2.11;
  KPtaPim = 0.687;
  KPtaeq = 0.0284;
  KPtsEIIA = 0.00211;
  KPtsGLC = 0.0049;
  KPykADP = 0.21;
  KPykAMP = 0.255;
  KPykATP = 20.2;
  KPykFBP = 0.253;
  KPykPEP = 0.31;
  KR5pieq = 0.477;
  KRpeeq = 1.41;
  KSdhSUCm = 0.169;
  KSdheq = 29.7;
  KTaleq = 1.05;
  KTkt1eq = 1.2;
  KTkt2eq = 9.97;
  KaceBAKCra = 0.00054;
  KaceBAKCrp = 0.526;
  KaceBAKDNA = 9.51e-7;
  KaceBAKGOX = 0.00225;
  KaceBAKPYR = 2.01;
  KaceBAKPYRprime = 0.00272;
  KacsCrp = 0.00136;
  KakgdhCoAm = 0.0031;
  KakgdhNADHI = 0.0179;
  KakgdhNADm = 0.0552;
  KakgdhSUCI = 2.07;
  KakgdhZ = 4.17;
  KakgdhaKGI = 1;
  KakgdhaKGm = 0.237;
  KcAMPdegrcAMP = 0.0483;
  KfbaACra = 0.00326;
  KfbaACrp = 0.00948;
  KfbpCra = 3.75e-5;
  KfumABCCrp = 0.149;
  KgapACra = 0.0161;
  KgapACrp = 0.0475;
  KglkCra = 1.22e-8;
  KgltACrp = 0.0565;
  KicdACra = 2.92e-5;
  KlpdPdhR = 2.46e-5;
  KmdhCrp = 0.214;
  Kmu = 0.6;
  KpckACra = 0.000152;
  KpfkACra = 9.87e-9;
  KppsACra = 0.000488;
  KpykFCra = 7.26e-5;
  KsdhCDABCrp = 0.0856;
  KsucABCrp = 0.309;
  LAceK = 283000000;
  LAceKph = 70000;
  LFbp = 4410000;
  LIcdh = 92.6;
  LIcl = 191000;
  LMaeB = 239000;
  LPfk = 1770000;
  LPpc = 5650000;
  LPps = 1.04e-79;
  LPyk = 997;
  LaceBAK = 412;
  NAD = 2.6;
  NADH = 0.083;
  NADP = 0.0021;
  NADPH = 0.12;
  POratio = 3.48;
  POratioprime = 1.49;
  PdhRtotal = 6.66e-5;
  Pi = 10;
  SSMaeB = 0.0075;
  SSPpc = 0.0074;
  VFbablf = 1.54;
  aceBAKDNA = 5.15e-7;
  alphaACE = 0;
  alphaGLC = 1;
  icdhb = 6e-7;
  kATP = 1.26e-5;
  kAceKkicat = 1e16;
  kAceKphcat = 600;
  kAcscat = 129000;
  kBMGLCAcCoA = 1659;
  kBMGLCE4P = 1510;
  kBMGLCF6P = 1270;
  kBMGLCFUM = 3470;
  kBMGLCG6P = 48.9;
  kBMGLCGAP = 102;
  kBMGLCOAA = 23100;
  kBMGLCPEP = 957;
  kBMGLCPYR = 851;
  kBMGLCR5P = 308;
  kBMGLCSUC = 190;
  kBMGLCaKG = 300;
  kCscat = 5430000;
  kFbacat = 695000000;
  kFbpcat = 78600000;
  kFum1cat = 3820000;
  kFum2cat = 3820000;
  kGapdhcat = 5050000000;
  kGlkcat = 20100000;
  kIcdhcat = 34320000;
  kIclcat = 94200000;
  kMaeBcat = 18400000;
  kMdh1cat = 23000000;
  kMdh2cat = 23000000;
  kMscat = 17000000000;
  kPckcat = 34500000;
  kPdhcat = 48300000;
  kPfkcat = 249000000000;
  kPpccat = 485100;
  kPpscat = 249000;
  kPts1 = 66000;
  kPykcat = 816000;
  kSdh1cat = 1960000;
  kSdh2cat = 1960000;
  kaceBAKcatIclR = 0.32;
  kakgdhcat = 702000;
  kdegr = 0.33;
  kmPts1 = 27700;
  nAceK = 5;
  nAceKph = 5;
  nCraFBP = 2;
  nCrpcAMP = 1;
  nFbp = 4;
  nIcdh = 2;
  nIcl = 4;
  nMaeB = 1.99;
  nPdhRPYR = 1;
  nPfk = 4;
  nPpc = 5;
  nPps = 2;
  nPyk = 4;
  nacs = 2.31;
  nfumABC = 0.74;
  ngltA = 1.07;
  nmu = 4;
  nsdhCDAB = 0.74;
  nsucAB = 0.74;
  pH = 7.5;
  pHEdam = 10.4;
  pHEddm = 7.53;
  pKEda = 37;
  pKEdd = 8.74;
  rho = 564;
  v6Pgdhmax = 248000;
  vAckmax = 195000;
  vCyamax = 9.45;
  vEdamax = 667;
  vEddmax = 515;
  vG6pdhmax = 16600;
  vNonptsmax = 4000;
  vPgimax = 3560000;
  vPglmax = 22800;
  vPtamax = 5360;
  vPts4max = 3940;
  vR5pimax = 32100;
  vRpemax = 12700;
  vTalmax = 71700;
  vTkt1max = 8870;
  vTkt2max = 380000;
  vaceBAKCrabound = 0.0037;
  vaceBAKCraunbound = 1.27e-5;
  vaceBAKCrpbound = 1.58e-6;
  vaceBAKCrpunbound = 0.000251;
  vacsCrpbound = 0.00262;
  vacsCrpunbound = 0;
  vcAMPdegrmax = 9.21;
  vfbaACrabound = 0;
  vfbaACraunbound = 0.00183;
  vfbaACrpbound = 0.00113;
  vfbaACrpunbound = 0;
  vfbpCrabound = 0.00103;
  vfbpCraunbound = 0;
  vfumABCCrpbound = 0.0376;
  vfumABCCrpunbound = 0;
  vgapACrabound = 0;
  vgapACraunbound = 0.0016;
  vgapACrpbound = 0.00218;
  vgapACrpunbound = 0;
  vglkCrabound = 0.00113;
  vglkCraunbound = 0.15;
  vgltACrpbound = 0.0205;
  vgltACrpunbound = 0;
  vicdACrabound = 0.00142;
  vicdACraunbound = 0.000513;
  vlpdPdhRbound = 5.45e-5;
  vlpdPdhRunbound = 0.00929;
  vmdhCrpbound = 0.0733;
  vmdhCrpunbound = 0;
  vpckACrabound = 0.00995;
  vpckACraunbound = 0;
  vpfkACrabound = 0.00103;
  vpfkACraunbound = 0.0375;
  vppsACrabound = 0.00386;
  vppsACraunbound = 0;
  vpykFCrabound = 0;
  vpykFCraunbound = 0;
  vsdhCDABCrpbound = 0.0177;
  vsdhCDABCrpunbound = 0;
  vsucABCrpbound = 0.174;
  vsucABCrpunbound = 0;

  // Assignment rules:
  A := 1 + ADP/KPfkADPb + AMP/KPfkAMPb + PEP/KPfkPEP;
  B := 1 + ADP/KPfkADPa + AMP/KPfkAMPa;
  CraFBP := Cratotal*FBP^nCraFBP/(KCraFBP^nCraFBP + FBP^nCraFBP);
  H := 10^(3 - pH);
  EIIA := EIIAtotal - EIIAP;
  Cra := -CraFBP + Cratotal;
  CrpcAMP := Crptotal*cAMP^nCrpcAMP/(KCrpcAMP^nCrpcAMP + cAMP^nCrpcAMP);
  Crp := -CrpcAMP + Crptotal;
  OPFADH2 := POratioprime*vESdh;
  OPNADH := POratio*(vEakgdh + vEGapdh + vEMdh + vEPdh);
  PdhRPYR := PdhRtotal*PYR^nPdhRPYR/(KPdhRPYR^nPdhRPYR + PYR^nPdhRPYR);
  PdhR := -PdhRPYR + PdhRtotal;
  QEdapH := 1 + 2^(1 + pHEdam - pKEda)*5^(pHEdam - pKEda)/(1 + 10^(pH - pKEda) + 10^(-pH + 2*pHEdam - pKEda));
  QEddpH := 1 + 2^(1 + pHEddm - pKEdd)*5^(pHEddm - pKEdd)/(1 + 10^(pH - pKEdd) + 10^(-pH + 2*pHEddm - pKEdd));
  vATP := OPFADH2 + OPNADH - vEAceKki + vEAck - vEAcs + vEakgdh - vECya + vEGapdh - vEGlk - vEPck - vEPfk - vEPps + vEPyk;
  mu := kATP*vATP;
  vFum2max := kFum2cat*Fum;
  vMdh2max := kMdh2cat*Mdh;
  vSdh2max := kSdh2cat*Sdh;
  vMdh1max := kMdh1cat*Mdh;
  vSdh1max := kSdh1cat*Sdh;
  vFum1max := kFum1cat*Fum;
  rateOf_vEAck := vEAck;
  rateOf_vEAcs := vEAcs;

  // Reactions:
  vBMAcCoA: AcCoA -> ; default*Function_for_vBMAcCoA(AcCoA, default, kBMGLCAcCoA);
  vBME4P: E4P -> ; default*Function_for_vBME4P(E4P, default, kBMGLCE4P);
  vBMF6P: F6P -> ; default*Function_for_vBMF6P(F6P, default, kBMGLCF6P);
  vBMFUM: FUM -> ; default*Function_for_vBMFUM(FUM, default, kBMGLCFUM);
  vBMG6P: G6P -> ; default*Function_for_vBMG6P(G6P, default, kBMGLCG6P);
  vBMGAP: GAP -> ; default*Function_for_vBMGAP(GAP, default, kBMGLCGAP);
  vBMOAA: OAA -> ; default*Function_for_vBMOAA(OAA, default, kBMGLCOAA);
  vBMPEP: PEP -> ; default*Function_for_vBMPEP(PEP, default, kBMGLCPEP);
  vBMPYR: PYR -> ; default*Function_for_vBMPYR(PYR, default, kBMGLCPYR);
  vBMR5P: R5P -> ; default*Function_for_vBMR5P(R5P, default, kBMGLCR5P);
  vBMSUC: SUC -> ; default*Function_for_vBMSUC(SUC, default, kBMGLCSUC);
  vBMaKG: aKG -> ; default*Function_for_vBMaKG(aKG, default, kBMGLCaKG);
  vD6PG: sixPG -> ; default*Function_for_vD6PG(default, mu, sixPG);
  vD6PGL: sixPGL -> ; default*Function_for_vD6PGL(default, mu, sixPGL);
  vDACEex: ACEex -> ; default*Function_for_vDACEex(ACEex, D, default);
  vDAcCoA: AcCoA -> ; default*Function_for_vDAcCoA(AcCoA, default, mu);
  vDAcP: AcP -> ; default*Function_for_vDAcP(AcP, default, mu);
  vDAceK: AceK -> ; default*Function_for_vDAceK(AceK, default, kdegr, mu);
  vDAcs: Acs -> ; default*Function_for_vDAcs(Acs, default, kdegr, mu);
  vDCS: Cs -> ; default*Function_for_vDCS(Cs, default, kdegr, mu);
  vDE4P: E4P -> ; default*Function_for_vDE4P(E4P, default, mu);
  vDF6P: F6P -> ; default*Function_for_vDF6P(F6P, default, mu);
  vDFBP: FBP -> ; default*Function_for_vDFBP(FBP, default, mu);
  vDFUM: FUM -> ; default*Function_for_vDFUM(FUM, default, mu);
  vDFba: Fba -> ; default*Function_for_vDFba(Fba, default, kdegr, mu);
  vDFbp: Fbp -> ; default*Function_for_vDFbp(Fbp, default, kdegr, mu);
  vDFum: Fum -> ; default*Function_for_vDFum(Fum, default, kdegr, mu);
  vDG6P: G6P -> ; default*Function_for_vDG6P(G6P, default, mu);
  vDGAP: GAP -> ; default*Function_for_vDGAP(GAP, default, mu);
  vDGAPDH: Gapdh -> ; default*Function_for_vDGAPDH(Gapdh, default, kdegr, mu);
  vDGLC: GLC -> ; default*Function_for_vDGLC(GLC, default, mu);
  vDGLCex: GLCex -> ; default*Function_for_vDGLCex(D, GLCex, default);
  vDGLCfeed: GLCfeed -> ; default*Function_for_vDGLCfeed(D, GLCfeed, default);
  vDGOX: GOX -> ; default*Function_for_vDGOX(GOX, default, mu);
  vDGlk: Glk -> ; default*Function_for_vDGlk(Glk, default, kdegr, mu);
  vDICDH: Icdh -> ; default*Function_for_vDICDH(Icdh, default, kdegr, mu);
  vDICDHP: IcdhP -> ; default*Function_for_vDICDHP(IcdhP, default, kdegr, mu);
  vDICIT: ICIT -> ; default*Function_for_vDICIT(ICIT, default, mu);
  vDIcl: Icl -> ; default*Function_for_vDIcl(Icl, default, kdegr, mu);
  vDKDPG: KDPG -> ; default*Function_for_vDKDPG(KDPG, default, mu);
  vDMAL: MAL -> ; default*Function_for_vDMAL(MAL, default, mu);
  vDMDH: Mdh -> ; default*Function_for_vDMDH(Mdh, default, kdegr, mu);
  vDMS: Ms -> ; default*Function_for_vDMS(Ms, default, kdegr, mu);
  vDMaeB: MaeB -> ; default*Function_for_vDMaeB(MaeB, default, kdegr, mu);
  vDOAA: OAA -> ; default*Function_for_vDOAA(OAA, default, mu);
  vDPDH: Pdh -> ; default*Function_for_vDPDH(Pdh, default, kdegr, mu);
  vDPEP: PEP -> ; default*Function_for_vDPEP(PEP, default, mu);
  vDPYR: PYR -> ; default*Function_for_vDPYR(PYR, default, mu);
  vDPck: Pck -> ; default*Function_for_vDPck(Pck, default, kdegr, mu);
  vDPfk: Pfk -> ; default*Function_for_vDPfk(Pfk, default, kdegr, mu);
  vDPpc: Ppc -> ; default*Function_for_vDPpc(Ppc, default, kdegr, mu);
  vDPps: Pps -> ; default*Function_for_vDPps(Pps, default, kdegr, mu);
  vDPyk: Pyk -> ; default*Function_for_vDPyk(Pyk, default, kdegr, mu);
  vDR5P: R5P -> ; default*Function_for_vDR5P(R5P, default, mu);
  vDRU5P: RU5P -> ; default*Function_for_vDRU5P(RU5P, default, mu);
  vDS7P: S7P -> ; default*Function_for_vDS7P(S7P, default, mu);
  vDSDH: Sdh -> ; default*Function_for_vDSDH(Sdh, default, kdegr, mu);
  vDSUC: SUC -> ; default*Function_for_vDSUC(SUC, default, mu);
  vDX: X -> ; default*Function_for_vDX(D, X, default);
  vDX5P: X5P -> ; default*Function_for_vDX5P(X5P, default, mu);
  vDaKG: aKG -> ; default*Function_for_vDaKG(aKG, default, mu);
  vDaKGDH: akgdh -> ; default*Function_for_vDaKGDH(akgdh, default, kdegr, mu);
  vDcAMP: cAMP -> ; default*Function_for_vDcAMP(cAMP, default, mu);
  vE6PGDH: sixPG -> RU5P; default*Function_for_vE6PGDH(ATP, K6Pgdh6PG, K6PgdhATPinh, K6PgdhNADP, K6PgdhNADPHinh, NADP, NADPH, default, sixPG, v6Pgdhmax);
  vEAceKki: Icdh -> IcdhP; default*Function_for_vEAceKki(AceK, Icdh, KAceKIcdh, KAceKOAA, LAceK, OAA, default, kAceKkicat, nAceK);  // modifiers: OAA, AceK
  vEAceKph: IcdhP -> Icdh; default*Function_for_vEAceKph(AceK, IcdhP, KAceKIcdhP, KAceKphOAA, LAceKph, OAA, default, kAceKphcat, nAceKph);  // modifiers: OAA, AceK
  vEAck: AcP -> ; default*Function_for_vEAck(ACEex, ADP, ATP, AcP, KAckACEm, KAckADPm, KAckATPm, KAckAcPm, KAckeq, default, vAckmax);  // modifiers: ACEex
  vEAckmedium: -> ACEex; default*Function_for_vEAckmedium(X, default, rateOf_vEAck, rho);  // modifiers: X
  vEAcs: -> AcCoA; default*Function_for_vEAcs(ACEex, Acs, KAcsACE, default, kAcscat);  // modifiers: ACEex, Acs
  vEAcsmedium: ACEex -> ; default*Function_for_vEAcsmedium(X, default, rateOf_vEAcs, rho);  // modifiers: X
  vECS: OAA + AcCoA -> ICIT; default*Function_for_vECS(AcCoA, Cs, KCsAcCoA, KCsOAA, KCsOAAAcCoA, KCsaKG, OAA, aKG, default, kCscat);  // modifiers: aKG, Cs
  vECya: -> cAMP; default*Function_for_vECya(EIIAP, KCyaEIIAP, default, vCyamax);  // modifiers: EIIAP
  vEEda: KDPG -> PYR + GAP; default*Function_for_vEEda(GAP, KDPG, KEdaGAPm, KEdaKDPGm, KEdaPYRm, KEdaeq, PYR, QEdapH, default, vEdamax);
  vEEdd: sixPG -> KDPG; default*Function_for_vEEdd(KDPG, KEdd6PGm, KEddKDPGm, KEddeq, QEddpH, default, sixPG, vEddmax);
  vEFba: FBP -> 2 GAP; default*Function_for_vEFba(FBP, Fba, GAP, KFbaDHAP, KFbaFBP, KFbaGAP, KFbaGAPinh, KFbaeq, VFbablf, default, kFbacat);  // modifiers: Fba
  vEFbp: FBP -> F6P; default*Function_for_vEFbp(FBP, Fbp, KFbpFBP, KFbpPEP, LFbp, PEP, default, kFbpcat, nFbp);  // modifiers: PEP, Fbp
  vEFum: FUM -> MAL; default*Function_for_vEFum(FUM, KFumFUMm, KFumeq, MAL, default, vFum1max, vFum2max);
  vEG6PDH: G6P -> sixPGL; default*Function_for_vEG6PDH(G6P, KG6pdhG6P, KG6pdhNADP, KG6pdhNADPHg6pinh, KG6pdhNADPHnadpinh, NADP, NADPH, default, vG6pdhmax);
  vEGapdh: GAP -> PEP; default*Function_for_vEGapdh(GAP, Gapdh, KGapdhGAP, KGapdhNAD, KGapdhNADH, KGapdhPGP, KGapdheq, NAD, NADH, PEP, default, kGapdhcat);  // modifiers: Gapdh
  vEGlk: GLC -> G6P; default*Function_for_vEGlk(ATP, G6P, GLC, Glk, KGlkATPm, KGlkG6Pi, KGlkGLCm, default, kGlkcat);  // modifiers: Glk
  vEICDH: ICIT -> aKG; default*Function_for_vEICDH(ICIT, Icdh, KIcdhICIT, KIcdhPEP, LIcdh, PEP, default, icdhb, kIcdhcat, nIcdh);  // modifiers: PEP, Icdh
  vEIcl: ICIT -> SUC + GOX; default*Function_for_vEIcl(GAP, ICIT, Icl, KIcl3PG, KIclICIT, KIclPEP, KIclaKG, LIcl, PEP, aKG, default, kIclcat, nIcl);  // modifiers: aKG, GAP, PEP, Icl
  vEMS: AcCoA + GOX -> MAL; default*Function_for_vEMS(AcCoA, GOX, KMsAcCoA, KMsGOX, KMsGOXAcCoA, Ms, default, kMscat);  // modifiers: Ms
  vEMaeB: MAL -> PYR; default*Function_for_vEMaeB(AcCoA, KMaeBAcCoA, KMaeBMAL, KMaeBcAMP, LMaeB, MAL, MaeB, cAMP, default, kMaeBcat, nMaeB);  // modifiers: AcCoA, cAMP, MaeB
  vEMdh: MAL -> OAA; default*Function_for_vEMdh(KMdhMALI, KMdhMALm, KMdhNADHI, KMdhNADHm, KMdhNADI, KMdhNADII, KMdhNADm, KMdhOAAI, KMdhOAAII, KMdhOAAm, KMdheq, MAL, NAD, NADH, OAA, default, vMdh1max, vMdh2max);
  vEPck: OAA -> PEP; default*Function_for_vEPck(ADP, ATP, KPckADPi, KPckATPI, KPckATPi, KPckOAA, KPckOAAI, KPckPEP, KPckPEPi, OAA, PEP, Pck, default, kPckcat);  // modifiers: Pck
  vEPdh: PYR -> AcCoA; default*Function_for_vEPdh(AcCoA, CoA, KPdhAcCoAm, KPdhCoAm, KPdhNADHm, KPdhNADm, KPdhPYRm, KPdhi, NAD, NADH, PYR, Pdh, default, kPdhcat);  // modifiers: Pdh
  vEPfk: F6P -> FBP; default*Function_for_vEPfk(A, ADP, ATP, B, F6P, KPfkADPc, KPfkATPs, KPfkF6Ps, LPfk, Pfk, default, kPfkcat, nPfk);  // modifiers: Pfk
  vEPgi: G6P -> F6P; default*Function_for_vEPgi(F6P, G6P, KPgiF6P, KPgiF6P6pginh, KPgiG6P, KPgiG6P6pginh, KPgieq, default, sixPG, vPgimax);  // modifiers: sixPG
  vEPgl: sixPGL -> sixPG; default*Function_for_vEPgl(H, KPgl6PGLm, KPgl6PGm, KPgleq, KPglh1, KPglh2, default, sixPG, sixPGL, vPglmax);
  vEPpc: PEP -> OAA; default*Function_for_vEPpc(FBP, KPpcFBP, KPpcPEP, LPpc, PEP, Ppc, default, kPpccat, nPpc);  // modifiers: FBP, Ppc
  vEPps: PYR -> PEP; default*Function_for_vEPps(KPpsPEP, KPpsPYR, LPps, PEP, PYR, Pps, default, kPpscat, nPps);  // modifiers: Pps
  vEPta: AcCoA -> AcP; default*Function_for_vEPta(AcCoA, AcP, CoA, KPtaAcCoAi, KPtaAcPi, KPtaAcPm, KPtaCoAi, KPtaPii, KPtaPim, KPtaeq, Pi, default, vPtamax);
  vEPyk: PEP -> PYR; default*Function_for_vEPyk(ADP, AMP, ATP, FBP, KPykADP, KPykAMP, KPykATP, KPykFBP, KPykPEP, LPyk, PEP, Pyk, default, kPykcat, nPyk);  // modifiers: Pyk, FBP
  vER5PI: RU5P -> R5P; default*Function_for_vER5PI(KR5pieq, R5P, RU5P, default, vR5pimax);
  vERPE: RU5P -> X5P; default*Function_for_vERPE(KRpeeq, RU5P, X5P, default, vRpemax);
  vESdh: SUC -> FUM; default*Function_for_vESdh(FUM, KSdhSUCm, KSdheq, SUC, default, vSdh1max, vSdh2max);
  vETal: GAP + S7P -> F6P + E4P; default*Function_for_vETal(E4P, F6P, GAP, KTaleq, S7P, default, vTalmax);
  vETkt1: R5P + X5P -> S7P + GAP; default*Function_for_vETkt1(GAP, KTkt1eq, R5P, S7P, X5P, default, vTkt1max);
  vETkt2: E4P + X5P -> GAP + F6P; default*Function_for_vETkt2(E4P, F6P, GAP, KTkt2eq, X5P, default, vTkt2max);
  vEakgdh: aKG -> SUC; default*Function_for_vEakgdh(CoA, KakgdhCoAm, KakgdhNADHI, KakgdhNADm, KakgdhSUCI, KakgdhZ, KakgdhaKGI, KakgdhaKGm, NAD, NADH, SUC, aKG, akgdh, default, kakgdhcat);  // modifiers: akgdh
  vEcAMPdegr: cAMP -> ; default*Function_for_vEcAMPdegr(KcAMPdegrcAMP, cAMP, default, vcAMPdegrmax);
  vGaceA: -> Icl; default*Function_for_vGaceA(Cra, CrpcAMP, GOX, IclRtotal, KaceBAKCra, KaceBAKCrp, KaceBAKDNA, KaceBAKGOX, KaceBAKPYR, KaceBAKPYRprime, Kmu, LaceBAK, PYR, aceBAKDNA, default, kaceBAKcatIclR, mu, nmu, vaceBAKCrabound, vaceBAKCraunbound, vaceBAKCrpbound, vaceBAKCrpunbound);  // modifiers: GOX, PYR
  vGaceB: -> Ms; default*Function_for_vGaceB(Cra, CrpcAMP, FactoraceB, GOX, IclRtotal, KaceBAKCra, KaceBAKCrp, KaceBAKDNA, KaceBAKGOX, KaceBAKPYR, KaceBAKPYRprime, Kmu, LaceBAK, PYR, aceBAKDNA, default, kaceBAKcatIclR, mu, nmu, vaceBAKCrabound, vaceBAKCraunbound, vaceBAKCrpbound, vaceBAKCrpunbound);  // modifiers: PYR, GOX
  vGaceK: -> AceK; default*Function_for_vGaceK(Cra, CrpcAMP, FactoraceK, GOX, IclRtotal, KaceBAKCra, KaceBAKCrp, KaceBAKDNA, KaceBAKGOX, KaceBAKPYR, KaceBAKPYRprime, Kmu, LaceBAK, PYR, aceBAKDNA, default, kaceBAKcatIclR, mu, nmu, vaceBAKCrabound, vaceBAKCraunbound, vaceBAKCrpbound, vaceBAKCrpunbound);  // modifiers: PYR, GOX
  vGacs: -> Acs; default*Function_for_vGacs(CrpcAMP, KacsCrp, default, mu, nacs, vacsCrpbound, vacsCrpunbound);
  vGfbaA: -> Fba; default*Function_for_vGfbaA(Cra, CrpcAMP, KfbaACra, KfbaACrp, default, mu, vfbaACrabound, vfbaACraunbound, vfbaACrpbound, vfbaACrpunbound);
  vGfbp: -> Fbp; default*Function_for_vGfbp(Cra, KfbpCra, default, mu, vfbpCrabound, vfbpCraunbound);
  vGfumABC: -> Fum; default*Function_for_vGfumABC(CrpcAMP, KfumABCCrp, default, mu, nfumABC, vfumABCCrpbound, vfumABCCrpunbound);
  vGgapA: -> GAP; default*Function_for_vGgapA(Cra, CrpcAMP, KgapACra, KgapACrp, default, mu, vgapACrabound, vgapACraunbound, vgapACrpbound, vgapACrpunbound);
  vGglk: -> Glk; default*Function_for_vGglk(Cra, KglkCra, default, mu, vglkCrabound, vglkCraunbound);
  vGgltA: -> Cs; default*Function_for_vGgltA(CrpcAMP, KgltACrp, default, mu, ngltA, vgltACrpbound, vgltACrpunbound);
  vGicdA: -> Icdh; default*Function_for_vGicdA(Cra, KicdACra, default, mu, vicdACrabound, vicdACraunbound);
  vGlpd: -> Pdh; default*Function_for_vGlpd(KlpdPdhR, PdhR, default, mu, vlpdPdhRbound, vlpdPdhRunbound);
  vGmaeB: -> MaeB; default*Function_for_vGmaeB(SSMaeB, default, mu);
  vGmdh: -> Mdh; default*Function_for_vGmdh(CrpcAMP, KmdhCrp, default, mu, vmdhCrpbound, vmdhCrpunbound);
  vGpckA: -> Pck; default*Function_for_vGpckA(Cra, KpckACra, default, mu, vpckACrabound, vpckACraunbound);
  vGpfkA: -> Pfk; default*Function_for_vGpfkA(Cra, KpfkACra, default, mu, vpfkACrabound, vpfkACraunbound);
  vGppc: -> Ppc; default*Function_for_vGppc(SSPpc, default, mu);
  vGppsA: -> Pps; default*Function_for_vGppsA(Cra, KppsACra, default, mu, vppsACrabound, vppsACraunbound);
  vGpykF: -> Pyk; default*Function_for_vGpykF(Cra, KpykFCra, default, mu, vpykFCrabound, vpykFCraunbound);
  vGsdhCDAB: -> Sdh; default*Function_for_vGsdhCDAB(CrpcAMP, KsdhCDABCrp, default, mu, nsdhCDAB, vsdhCDABCrpbound, vsdhCDABCrpunbound);
  vGsucAB: -> akgdh; default*Function_for_vGsucAB(CrpcAMP, KsucABCrp, default, mu, nsucAB, vsucABCrpbound, vsucABCrpunbound);
  vNonPTS: -> GLC; default*Function_for_vNonPTS(EIIA, GLCex, KNonptsI, KNonptsS, default, vNonptsmax);  // modifiers: GLCex
  vNonPTSmedium: GLCex -> ; default*Function_for_vNonPTSmedium(EIIA, GLCex, KNonptsI, KNonptsS, X, default, rho, vNonptsmax);  // modifiers: X
  vPTS1: PEP -> PYR + EIIAP; default*Function_for_vPTS1(EIIA, EIIAP, PEP, PYR, default, kPts1, kmPts1);
  vPTS4: EIIAP -> G6P; default*Function_for_vPTS4(EIIAP, GLCex, KPtsEIIA, KPtsGLC, default, vPts4max);  // modifiers: GLCex
  vPTS4medium: GLCex -> ; default*Function_for_vPTS4medium(EIIAP, GLCex, KPtsEIIA, KPtsGLC, X, default, rho, vPts4max);  // modifiers: X, EIIAP
  vgrowth: -> X; default*Function_for_vgrowth(X, default, mu);

  // Unit definitions:
  unit length = metre;
  unit volume = litre;
  unit area = metre^2;
  unit time = 3600 second;
  unit substance = 1e-3 mole;
end
