// SBML level 2 version 4

model BIOMD0000000010()
  // Kholodenko2000 - Ultrasensitivity and negative feedback bring oscillations in MAPK cascade
  // The combination of ultrasensitivity and negative feedback bring sustained oscillations in the mitogen-activated protein kinase cascades.
  // This model is described in the article:
  // Negative feedback and ultrasensitivity can bring about oscillations in the mitogen-activated protein kinase cascades.
  // Kholodenko BN
  // Eur. J. Biochem. 2000; 267(6):1583-8
  // Abstract:
  // Functional organization of signal transduction into protein phosphorylation cascades, such as the mitogen-activated protein kinase (MAPK) cascades, greatly enhances the sensitivity of cellular targets to external stimuli. The sensitivity increases multiplicatively with the number of cascade levels, so that a tiny change in a stimulus results in a large change in the response, the phenomenon referred to as ultrasensitivity. In a variety of cell types, the MAPK cascades are imbedded in long feedback loops, positive or negative, depending on whether the terminal kinase stimulates or inhibits the activation of the initial level. Here we demonstrate that a negative feedback loop combined with intrinsic ultrasensitivity of the MAPK cascade can bring about sustained oscillations in MAPK phosphorylation. Based on recent kinetic data on the MAPK cascades, we predict that the period of oscillations can range from minutes to hours. The phosphorylation level can vary between the base level and almost 100% of the total protein. The oscillations of the phosphorylation cascades and slow protein diffusion in the cytoplasm can lead to intracellular waves of phospho-proteins.
  // This model is hosted on BioModels Database and identified by: BIOMD0000000010 .
  // To cite BioModels Database, please use: BioModels Database: An enhanced, curated and annotated resource for published quantitative kinetic models .
  // To the extent possible under law, all copyright and related or neighbouring rights to this encoded model have been dedicated to the public domain worldwide. Please refer to CC0 Public Domain Dedication for more information.
  // biomodels.db:MODEL6615119181
  // biomodels.db:BIOMD0000000010
  // isDescribedBy pubmed:10712587
  // isVersionOf GO:0000165
  // isHomologTo reactome:REACT_634
  // hasTaxon taxonomy:8355

  // Compartments:
  compartment uVol = 1;

  // Species:
  species MKKK in uVol = 90/uVol; MKKK is "Mos";  // isVersionOf uniprot:P09560
  species MKKK_P in uVol = 10/uVol; MKKK_P is "Mos-P";  // isVersionOf uniprot:P09560
  species MKK in uVol = 280/uVol; MKK is "Mek1";  // isVersionOf uniprot:Q05116
  species MKK_P in uVol = 10/uVol; MKK_P is "Mek1-P";  // isVersionOf uniprot:Q05116
  species MKK_PP in uVol = 10/uVol; MKK_PP is "Mek1-PP";  // isVersionOf uniprot:Q05116
  species MAPK in uVol = 280/uVol; MAPK is "Erk2";  // isVersionOf uniprot:P26696
  species MAPK_P in uVol = 10/uVol; MAPK_P is "Erk2-P";  // isVersionOf uniprot:P26696
  species MAPK_PP in uVol = 10/uVol; MAPK_PP is "Erk2-PP";  // isVersionOf uniprot:P26696

  // Parameters:
  J0_K1 = 10;
  J0_n = 1;
  J0_Ki = 9;
  J0_V1 = 2.5;
  J1_KK2 = 8;
  J1_V2 = 0.25;
  J2_KK3 = 15;
  J2_k3 = 0.025;
  J3_KK4 = 15;
  J3_k4 = 0.025;
  J4_KK5 = 15;
  J4_V5 = 0.75;
  J5_KK6 = 15;
  J5_V6 = 0.75;
  J6_KK7 = 15;
  J6_k7 = 0.025;
  J7_KK8 = 15;
  J7_k8 = 0.025;
  J8_KK9 = 15;
  J8_V9 = 0.5;
  J9_KK10 = 15;
  J9_V10 = 0.5;

  // Reactions:
  J0: MKKK => MKKK_P; uVol*J0_V1*MKKK/((1 + (MAPK_PP/J0_Ki)^J0_n)*(J0_K1 + MKKK)); J0 is "MAPKKK activation";  // modifiers: MAPK_PP; isHomologTo reactome:REACT_525; isVersionOf ec-code:2.7.11.1 GO:0000185 GO:0008349
  J1: MKKK_P => MKKK; uVol*J1_V2*MKKK_P/(J1_KK2 + MKKK_P); J1 is "MAPKKK inactivation";  // isVersionOf ec-code:3.1.3.16 GO:0051390 GO:0006470
  J2: MKK => MKK_P; uVol*J2_k3*MKKK_P*MKK/(J2_KK3 + MKK); J2 is "phosphorylation of MAPKK";  // modifiers: MKKK_P; isHomologTo reactome:REACT_614; isVersionOf ec-code:2.7.11.25 GO:0004709 GO:0006468
  J3: MKK_P => MKK_PP; uVol*J3_k4*MKKK_P*MKK_P/(J3_KK4 + MKK_P); J3 is "phosphorylation of MAPKK-P";  // modifiers: MKKK_P; isHomologTo reactome:REACT_614; isVersionOf ec-code:2.7.11.25 GO:0000186 GO:0006468 GO:0004709
  J4: MKK_PP => MKK_P; uVol*J4_V5*MKK_PP/(J4_KK5 + MKK_PP); J4 is "dephosphorylation of MAPKK-PP";  // isVersionOf ec-code:3.1.3.16 GO:0006470 GO:0051389
  J5: MKK_P => MKK; uVol*J5_V6*MKK_P/(J5_KK6 + MKK_P); J5 is "dephosphorylation of MAPKK-P";  // isVersionOf ec-code:3.1.3.16 GO:0006470
  J6: MAPK => MAPK_P; uVol*J6_k7*MKK_PP*MAPK/(J6_KK7 + MAPK); J6 is "phosphorylation of MAPK";  // modifiers: MKK_PP; hasVersion reactome:REACT_136 reactome:REACT_2247; isVersionOf ec-code:2.7.12.2 GO:0004708 GO:0006468
  J7: MAPK_P => MAPK_PP; uVol*J7_k8*MKK_PP*MAPK_P/(J7_KK8 + MAPK_P); J7 is "phosphorylation of MAPK-P";  // modifiers: MKK_PP; hasVersion reactome:REACT_136 reactome:REACT_2247; isVersionOf ec-code:2.7.12.2 GO:0006468 GO:0004708 GO:0000187
  J8: MAPK_PP => MAPK_P; uVol*J8_V9*MAPK_PP/(J8_KK9 + MAPK_PP); J8 is "dephosphorylation of MAPK-PP";  // isVersionOf ec-code:3.1.3.16 GO:0000188 GO:0006470
  J9: MAPK_P => MAPK; uVol*J9_V10*MAPK_P/(J9_KK10 + MAPK_P); J9 is "dephosphorylation of MAPK-P";  // isVersionOf ec-code:3.1.3.16 GO:0006470

  // Unit definitions:
  unit substance = 1e-9 mole; substance is "nanomole";
end
