// SBML level 2 version 4

model Chen_MSB2009()
  // PEtab implementation of the model from Chen et al. (2009), Mol Syst Biol. ;5:239
  // isDescribedBy doi:10.1038/msb.2008.74

  // Compartments:
  compartment cyt = 1;

  // Species:
  species c2 in cyt = 0; c2 is "ErbB1:ATP";
  species c3 in cyt = 0; c3 is "EGF:ErbB1:ATP";
  species ErbB2_ErbB3 in cyt = 0; ErbB2_ErbB3 is "(ErbB2:ErbB3)";
  species c335 in cyt = 0; c335 is "(ErbB3:ErbB2)_P";
  species ErbB2_ErbB4 in cyt = 0; ErbB2_ErbB4 is "ErbB2:ErbB4";
  species c336 in cyt = 0; c336 is "(ErbB4:ErbB2)_P";
  species ErbB1_Inh in cyt = 0; ErbB1_Inh is "ErbB1:Inh";
  species EGF_ErbB1_Inh in cyt = 0; EGF_ErbB1_Inh is "EGF:ErbB1:Inh";
  species EGF_ErbB1_ATP_EGF_ErbB1_Inh in cyt = 0; EGF_ErbB1_ATP_EGF_ErbB1_Inh is "(EGF:ErbB1:ATP::EGF:ErbB1:Inh)";
  species _2_EGF_ErbB1_Inh in cyt = 0; _2_EGF_ErbB1_Inh is "2(EGF:ErbB1:Inh)";
  species c4 in cyt = 0; c4 is "2(EGF:ErbB1:ATP)";
  species c10 in cyt = 0; c10 is "EGF:ErbB1:ATP";
  species c11 in cyt = 0; c11 is "2(EGF:ErbB1:ATP)";
  species c141 in cyt = 462000/cyt; c141 is "ErbB2";
  species c145 in cyt = 0; c145 is "EGF:ErbB1:ErbB2";
  species c140 in cyt = 6230/cyt; c140 is "ErbB3";
  species c146 in cyt = 0; c146 is "EGF:ErbB1:ErbB3";
  species c143 in cyt = 794/cyt; c143 is "ErbB4";
  species c147 in cyt = 0; c147 is "EGF:ErbB1:ErbB4";
  species c155 in cyt = 0; c155 is "ErbB2";
  species c159 in cyt = 0; c159 is "(EGF:ErbB1:ErbB2)";
  species c154 in cyt = 0; c154 is "ErbB3";
  species c160 in cyt = 0; c160 is "(EGF:ErbB1:ErbB3)";
  species c156 in cyt = 0; c156 is "ErbB4";
  species c161 in cyt = 0; c161 is "(EGF:ErbB1:ErbB4)";
  species EGF_ErbB1_Inh_ErB2 in cyt = 0; EGF_ErbB1_Inh_ErB2 is "EGF:ErbB1:Inh:ErB2";
  species EGF_ErbB1_Inh_ErB3 in cyt = 0; EGF_ErbB1_Inh_ErB3 is "EGF:ErbB1:Inh:ErB3";
  species EGF_ErbB1_Inh_ErB4 in cyt = 0; EGF_ErbB1_Inh_ErB4 is "EGF:ErbB1:Inh:ErB4";
  species c502 in cyt = 0; c502 is "ErbB2:Inh";
  species EGF_ErbB1_ErbB2_Inh in cyt = 0; EGF_ErbB1_ErbB2_Inh is "(EGF:ErbB1:ErbB2):Inh";
  species c503 in cyt = 0; c503 is "ErbB4:Inh";
  species c505 in cyt = 0; c505 is "(EGF:ErbB1:ErbB3)_P:Inh";
  species ErbB3_Inh in cyt = 0; ErbB3_Inh is "ErbB3:Inh";
  species c507 in cyt = 0; c507 is "(EGF:ErbB1:ErbB3)_P:Inh";
  species ATP_1_2e9 in cyt = 1200000000/cyt; ATP_1_2e9 is "ATP 1.2e9";
  species c123 in cyt = 0; c123 is "(EGF:ErbB1:ErbB2):ATP";
  species c124 in cyt = 0; c124 is "(EGF:ErbB1:ErbB3):ATP";
  species c125 in cyt = 0; c125 is "(EGF:ErbB1:ErbB4):ATP";
  species c126 in cyt = 0; c126 is "2(EGF:ErbB1):ATP";
  species _2_EGF_ErbB1_ATP_FullActive in cyt = 0; _2_EGF_ErbB1_ATP_FullActive is "2(EGF:ErbB1:ATP)-FullActive";
  species c122 in cyt = 0; c122 is "EGF:ErbB1:ErbB2:ATP";
  species c127 in cyt = 0; c127 is "EGF:ErbB1:ErbB3:ATP";
  species c128 in cyt = 0; c128 is "EGF:ErbB1:ErbB4:ATP";
  species ErbB2_ErbB2_P in cyt = 0; ErbB2_ErbB2_P is "ErbB2:ErbB2_P";
  species ErbB2_ErbB2_P_ATP in cyt = 0; ErbB2_ErbB2_P_ATP is "ErbB2:ErbB2_P:ATP";
  species ErbB1_ErbB2__P_GAP_Grb2_Gab1 in cyt = 0; ErbB1_ErbB2__P_GAP_Grb2_Gab1 is "(ErbB1:ErbB2)_P:GAP:Grb2:Gab1";
  species ErbB1_ErbB2__P_GAP_Grb2_Gab1_ATP in cyt = 0; ErbB1_ErbB2__P_GAP_Grb2_Gab1_ATP is "(ErbB1:ErbB2)_P:GAP:Grb2:Gab1:ATP";
  species ErbB1_ErbB3__P_GAP_Grb2_Gab1 in cyt = 0; ErbB1_ErbB3__P_GAP_Grb2_Gab1 is "(ErbB1:ErbB3)_P:GAP:Grb2:Gab1";
  species ErbB1_ErbB3__P_GAP_Grb2_Gab1_ATP in cyt = 0; ErbB1_ErbB3__P_GAP_Grb2_Gab1_ATP is "(ErbB1:ErbB3)_P:GAP:Grb2:Gab1:ATP";
  species ErbB1_ErbB4__P_GAP_Grb2_Gab1 in cyt = 0; ErbB1_ErbB4__P_GAP_Grb2_Gab1 is "(ErbB1:ErbB4)_P:GAP:Grb2:Gab1";
  species ErbB1_ErbB4__P_GAP_Grb2_Gab1_ATP in cyt = 0; ErbB1_ErbB4__P_GAP_Grb2_Gab1_ATP is "(ErbB1:ErbB4)_P:GAP:Grb2:Gab1:ATP";
  species _2_ErbB2__P_GAP_Grb2_Gab1 in cyt = 0; _2_ErbB2__P_GAP_Grb2_Gab1 is "2(ErbB2)_P:GAP:Grb2:Gab1";
  species _2_ErbB2__P_GAP_Grb2_Gab1_ATP in cyt = 0; _2_ErbB2__P_GAP_Grb2_Gab1_ATP is "2(ErbB2)_P:GAP:Grb2:Gab1:ATP";
  species ErbB3_ErbB2__P_GAP_Grb2_Gab1 in cyt = 0; ErbB3_ErbB2__P_GAP_Grb2_Gab1 is "(ErbB3:ErbB2)_P:GAP:Grb2:Gab1";
  species ErbB3_ErbB2__P_GAP_Grb2_Gab1_ATP in cyt = 0; ErbB3_ErbB2__P_GAP_Grb2_Gab1_ATP is "(ErbB3:ErbB2)_P:GAP:Grb2:Gab1:ATP";
  species ErbB4_ErbB2__P_GAP_Grb2_Gab1 in cyt = 0; ErbB4_ErbB2__P_GAP_Grb2_Gab1 is "(ErbB4:ErbB2)_P:GAP:Grb2:Gab1";
  species ErbB4_ErbB2__P_GAP_Grb2_Gab1_ATP in cyt = 0; ErbB4_ErbB2__P_GAP_Grb2_Gab1_ATP is "(ErbB4:ErbB2)_P:GAP:Grb2:Gab1:ATP";
  species _2_EGF_ErbB1__P_GAP_Grb2_Gab1 in cyt = 0; _2_EGF_ErbB1__P_GAP_Grb2_Gab1 is "2(EGF:ErbB1)_P:GAP:Grb2:Gab1";
  species _2_EGF_ErbB1__P_GAP_Grb2_Gab1_ATP in cyt = 0; _2_EGF_ErbB1__P_GAP_Grb2_Gab1_ATP is "2(EGF:ErbB1)_P:GAP:Grb2:Gab1:ATP";
  species c516 in cyt = 0; c516 is "(HRG:ErbB3:ErbB1)";
  species HRG_ErbB3_ErbB1_ATP in cyt = 0; HRG_ErbB3_ErbB1_ATP is "(HRG:ErbB3:ErbB1):ATP";
  species c517 in cyt = 0; c517 is "(HRG:ErbB4:ErbB1)";
  species HRG_ErbB4_ErbB1_ATP in cyt = 0; HRG_ErbB4_ErbB1_ATP is "(HRG:ErbB4:ErbB1):ATP";
  species c345 in cyt = 0; c345 is "(HRG:ErbB4):ErbB2";
  species c139 in cyt = 0; c139 is "(HRG:ErbB4):ErbB2:ATP";
  species c355 in cyt = 0; c355 is "(HRG:ErbB3):ErbB2";
  species c168 in cyt = 0; c168 is "(HRG:ErbB3):ErbB2:ATP";
  species c421 in cyt = 0; c421 is "(HRG:ErbB3):ErbB2)";
  species c169 in cyt = 0; c169 is "((HRG:ErbB3):ErbB2):ATP";
  species c422 in cyt = 0; c422 is "((HRG:ErbB4):ErbB2)";
  species c170 in cyt = 0; c170 is "((HRG:ErbB4):ErbB2):ATP";
  species c23 in cyt = 0; c23 is "2(EGF:ErbB1)_P:GAP:Grb2";
  species c12 in cyt = 4498.73/cyt; c12 is "cPP";
  species _2_EGF_ErbB1__P_GAP_Grb2_cPP in cyt = 0; _2_EGF_ErbB1__P_GAP_Grb2_cPP is "2(EGF:ErbB1)_P:GAP:Grb2:cPP";
  species c25 in cyt = 0; c25 is "2(EGF:ErbB1)_P:GAP:Grb2:Sos";
  species _2_EGF_ErbB1__P_GAP_Grb2_Sos_cPP in cyt = 0; _2_EGF_ErbB1__P_GAP_Grb2_Sos_cPP is "2(EGF:ErbB1)_P:GAP:Grb2:Sos:cPP";
  species c27 in cyt = 0; c27 is "2(EGF:ErbB1)_P:GAP:Grb2:Sos:(Ras:GDP)";
  species c89 in cyt = 0; c89 is "2(EGF:ErbB1)_P:GAP:Grb2:Sos:(Ras:GDP):cPP";
  species c29 in cyt = 0; c29 is "2(EGF:ErbB1)_P:GAP:Grb2:Sos:(Ras:GTP)";
  species c90 in cyt = 0; c90 is "2(EGF:ErbB1)_P:GAP:Grb2:Sos:(Ras:GTP):cPP";
  species c34 in cyt = 0; c34 is "2(EGF:ErbB1)_P:GAP:(Shc_P):Grb2";
  species c91 in cyt = 0; c91 is "2(EGF:ErbB1)_P:GAP:(Shc_P):Grb2:cPP";
  species c35 in cyt = 0; c35 is "2(EGF:ErbB1)_P:GAP:(Shc_P):Grb2:Sos";
  species c92 in cyt = 0; c92 is "2(EGF:ErbB1)_P:GAP:(Shc_P):Grb2:Sos:cPP";
  species c36 in cyt = 0; c36 is "2(EGF:ErbB1)_P:GAP:(Shc_P):Grb2:Sos:(Ras:GDP)";
  species c93 in cyt = 0; c93 is "2(EGF:ErbB1)_P:GAP:(Shc_P):Grb2:Sos:(Ras:GDP):cPP";
  species c37 in cyt = 0; c37 is "2(EGF:ErbB1)_P:GAP:(Shc_P):Grb2:Sos:(Ras:GTP)";
  species c94 in cyt = 0; c94 is "2(EGF:ErbB1)_P:GAP:(Shc_P):Grb2:Sos:(Ras:GTP):cPP";
  species c189 in cyt = 0; c189 is "(ErbB1:ErbB2)_P:GAP:(Shc_P):Grb2";
  species c195 in cyt = 0; c195 is "(ErbB1:ErbB2)_P:GAP:(Shc_P):Grb2:cPP";
  species c190 in cyt = 0; c190 is "(ErbB1:ErbB3)_P:GAP:(Shc_P):Grb2";
  species c196 in cyt = 0; c196 is "(ErbB1:ErbB3)_P:GAP:(Shc_P):Grb2:cPP";
  species c191 in cyt = 0; c191 is "(ErbB1:ErbB4)_P:GAP:(Shc_P):Grb2";
  species c197 in cyt = 0; c197 is "(ErbB1:ErbB4)_P:GAP:(Shc_P):Grb2:cPP";
  species c198 in cyt = 0; c198 is "(ErbB1:ErbB2)_P:GAP:(Shc_P):Grb2:Sos";
  species c204 in cyt = 0; c204 is "(ErbB1:ErbB2)_P:GAP:(Shc_P):Grb2:Sos:cPP";
  species c199 in cyt = 0; c199 is "(ErbB1:ErbB3)_P:GAP:(Shc_P):Grb2:Sos";
  species c205 in cyt = 0; c205 is "(ErbB1:ErbB3)_P:GAP:(Shc_P):Grb2:Sos:cPP";
  species c200 in cyt = 0; c200 is "(ErbB1:ErbB4)_P:GAP:(Shc_P):Grb2:Sos";
  species c206 in cyt = 0; c206 is "(ErbB1:ErbB4)_P:GAP:(Shc_P):Grb2:Sos:cPP";
  species c207 in cyt = 0; c207 is "(ErbB1:ErbB2)_P:GAP:(Shc_P):Grb2:Sos:(Ras:GDP)";
  species c213 in cyt = 0; c213 is "(ErbB1:ErbB2)_P:GAP:(Shc_P):Grb2:Sos:(Ras:GDP):cPP";
  species c208 in cyt = 0; c208 is "(ErbB1:ErbB3)_P:GAP:(Shc_P):Grb2:Sos:(Ras:GDP)";
  species c214 in cyt = 0; c214 is "(ErbB1:ErbB3)_P:GAP:(Shc_P):Grb2:Sos:(Ras:GDP):cPP";
  species c209 in cyt = 0; c209 is "(ErbB1:ErbB4)_P:GAP:(Shc_P):Grb2:Sos:(Ras:GDP)";
  species c215 in cyt = 0; c215 is "(ErbB1:ErbB4)_P:GAP:(Shc_P):Grb2:Sos:(Ras:GDP):cPP";
  species c216 in cyt = 0; c216 is "(ErbB1:ErbB2)_P:GAP:(Shc_P):Grb2:Sos:(Ras:GTP)";
  species c222 in cyt = 0; c222 is "(ErbB1:ErbB2)_P:GAP:(Shc_P):Grb2:Sos:(Ras:GTP):cPP";
  species c217 in cyt = 0; c217 is "(ErbB1:ErbB3)_P:GAP:(Shc_P):Grb2:Sos:(Ras:GTP)";
  species c223 in cyt = 0; c223 is "(ErbB1:ErbB3)_P:GAP:(Shc_P):Grb2:Sos:(Ras:GTP):cPP";
  species c218 in cyt = 0; c218 is "(ErbB1:ErbB4)_P:GAP:(Shc_P):Grb2:Sos:(Ras:GTP)";
  species c224 in cyt = 0; c224 is "(ErbB1:ErbB4)_P:GAP:(Shc_P):Grb2:Sos:(Ras:GTP):cPP";
  species c225 in cyt = 0; c225 is "(ErbB1:ErbB2)_P:GAP:Grb2";
  species ErbB1_ErbB2__P_GAP_Grb2_cPP in cyt = 0; ErbB1_ErbB2__P_GAP_Grb2_cPP is "(ErbB1:ErbB2)_P:GAP:Grb2:cPP";
  species c226 in cyt = 0; c226 is "(ErbB1:ErbB3)_P:GAP:Grb2";
  species ErbB1_ErbB3__P_GAP_Grb2_cPP in cyt = 0; ErbB1_ErbB3__P_GAP_Grb2_cPP is "(ErbB1:ErbB3)_P:GAP:Grb2:cPP";
  species c227 in cyt = 0; c227 is "(ErbB1:ErbB4)_P:GAP:Grb2";
  species ErbB1_ErbB4__P_GAP_Grb2_cPP in cyt = 0; ErbB1_ErbB4__P_GAP_Grb2_cPP is "(ErbB1:ErbB4)_P:GAP:Grb2:cPP";
  species c243 in cyt = 0; c243 is "(ErbB1:ErbB2)_P:GAP:Grb2:Sos:(Ras:GDP)";
  species c249 in cyt = 0; c249 is "(ErbB1:ErbB2)_P:GAP:Grb2:Sos:(Ras:GDP):cPP";
  species c244 in cyt = 0; c244 is "(ErbB1:ErbB3)_P:GAP:Grb2:Sos:(Ras:GDP)";
  species c250 in cyt = 0; c250 is "(ErbB1:ErbB3)_P:GAP:Grb2:Sos:(Ras:GDP):cPP";
  species c245 in cyt = 0; c245 is "(ErbB1:ErbB4)_P:GAP:Grb2:Sos:(Ras:GDP)";
  species c251 in cyt = 0; c251 is "(ErbB1:ErbB4)_P:GAP:Grb2:Sos:(Ras:GDP):cPP";
  species c252 in cyt = 0; c252 is "(ErbB1:ErbB2)_P:GAP:Grb2:Sos:(Ras:GTP)";
  species c258 in cyt = 0; c258 is "(ErbB1:ErbB2)_P:GAP:Grb2:Sos:(Ras:GTP):cPP";
  species c253 in cyt = 0; c253 is "(ErbB1:ErbB3)_P:GAP:Grb2:Sos:(Ras:GTP)";
  species c259 in cyt = 0; c259 is "(ErbB1:ErbB3)_P:GAP:Grb2:Sos:(Ras:GTP):cPP";
  species c254 in cyt = 0; c254 is "(ErbB1:ErbB4)_P:GAP:Grb2:Sos:(Ras:GTP)";
  species c260 in cyt = 0; c260 is "(ErbB1:ErbB4)_P:GAP:Grb2:Sos:(Ras:GTP):cPP";
  species c234 in cyt = 0; c234 is "(ErbB1:ErbB2)_P:GAP:Grb2:Sos";
  species ErbB1_ErbB2__P_GAP_Grb2_Sos_cPP in cyt = 0; ErbB1_ErbB2__P_GAP_Grb2_Sos_cPP is "(ErbB1:ErbB2)_P:GAP:Grb2:Sos:cPP";
  species c235 in cyt = 0; c235 is "(ErbB1:ErbB3)_P:GAP:Grb2:Sos";
  species ErbB1_ErbB3__P_GAP_Grb2_Sos_cPP in cyt = 0; ErbB1_ErbB3__P_GAP_Grb2_Sos_cPP is "(ErbB1:ErbB3)_P:GAP:Grb2:Sos:cPP";
  species c236 in cyt = 0; c236 is "(ErbB1:ErbB4)_P:GAP:Grb2:Sos";
  species ErbB1_ErbB4__P_GAP_Grb2_Sos_cPP in cyt = 0; ErbB1_ErbB4__P_GAP_Grb2_Sos_cPP is "(ErbB1:ErbB4)_P:GAP:Grb2:Sos:cPP";
  species c300 in cyt = 0; c300 is "2(ErbB2)_P:GAP:(Shc_P):Grb2";
  species _2_ErbB2__P_GAP_Shc_P_Grb2_cPP in cyt = 0; _2_ErbB2__P_GAP_Shc_P_Grb2_cPP is "2(ErbB2)_P:GAP:(Shc_P):Grb2:cPP";
  species c303 in cyt = 0; c303 is "2(ErbB2)_P:GAP:(Shc_P):Grb2:Sos";
  species c304 in cyt = 0; c304 is "2(ErbB2)_P:GAP:(Shc_P):Grb2:Sos:cPP";
  species c306 in cyt = 0; c306 is "2(ErbB2)_P:GAP:(Shc_P):Grb2:Sos:(Ras:GDP)";
  species c307 in cyt = 0; c307 is "2(ErbB2)_P:GAP:(Shc_P):Grb2:Sos:(Ras:GDP):cPP";
  species c309 in cyt = 0; c309 is "2(ErbB2)_P:GAP:(Shc_P):Grb2:Sos:(Ras:GTP)";
  species c310 in cyt = 0; c310 is "2(ErbB2)_P:GAP:(Shc_P):Grb2:Sos:(Ras:GTP):cPP";
  species c312 in cyt = 0; c312 is "2(ErbB2)_P:GAP:Grb2";
  species _2_ErbB2__P_GAP_Grb2_cPP in cyt = 0; _2_ErbB2__P_GAP_Grb2_cPP is "2(ErbB2)_P:GAP:Grb2:cPP";
  species c315 in cyt = 0; c315 is "2(ErbB2)_P:GAP:Grb2:Sos";
  species _2_ErbB2__P_GAP_Grb2_Sos_cPP in cyt = 0; _2_ErbB2__P_GAP_Grb2_Sos_cPP is "2(ErbB2)_P:GAP:Grb2:Sos:cPP";
  species c318 in cyt = 0; c318 is "2(ErbB2)_P:GAP:Grb2:Sos:(Ras:GDP)";
  species c319 in cyt = 0; c319 is "2(ErbB2)_P:GAP:Grb2:Sos:(Ras:GDP):cPP";
  species c321 in cyt = 0; c321 is "2(ErbB2)_P:GAP:Grb2:Sos:(Ras:GTP)";
  species c322 in cyt = 0; c322 is "2(ErbB2)_P:GAP:Grb2:Sos:(Ras:GTP):cPP";
  species c357 in cyt = 0; c357 is "(ErbB3:ErbB2)_P:GAP:(Shc_P):Grb2";
  species c358 in cyt = 0; c358 is "(ErbB3:ErbB2)_P:GAP:(Shc_P):Grb2:cPP";
  species c360 in cyt = 0; c360 is "(ErbB4:ErbB2)_P:GAP:(Shc_P):Grb2";
  species c361 in cyt = 0; c361 is "(ErbB4:ErbB2)_P:GAP:(Shc_P):Grb2:cPP";
  species c366 in cyt = 0; c366 is "(ErbB4:ErbB2)_P:GAP:(Shc_P):Grb2:Sos";
  species c367 in cyt = 0; c367 is "(ErbB4:ErbB2)_P:GAP:(Shc_P):Grb2:Sos:cPP";
  species c369 in cyt = 0; c369 is "(ErbB3:ErbB2)_P:GAP:(Shc_P):Grb2:Sos:(Ras:GDP)";
  species c370 in cyt = 0; c370 is "(ErbB3:ErbB2)_P:GAP:(Shc_P):Grb2:Sos:(Ras:GDP):cPP";
  species c372 in cyt = 0; c372 is "(ErbB4:ErbB2)_P:GAP:(Shc_P):Grb2:Sos:(Ras:GDP)";
  species c373 in cyt = 0; c373 is "(ErbB4:ErbB2)_P:GAP:(Shc_P):Grb2:Sos:(Ras:GDP):cPP";
  species c375 in cyt = 0; c375 is "(ErbB3:ErbB2)_P:GAP:(Shc_P):Grb2:Sos:(Ras:GTP)";
  species c376 in cyt = 0; c376 is "(ErbB3:ErbB2)_P:GAP:(Shc_P):Grb2:Sos:(Ras:GTP):cPP";
  species c378 in cyt = 0; c378 is "(ErbB4:ErbB2)_P:GAP:(Shc_P):Grb2:Sos:(Ras:GTP)";
  species c379 in cyt = 0; c379 is "(ErbB4:ErbB2)_P:GAP:(Shc_P):Grb2:Sos:(Ras:GTP):cPP";
  species c381 in cyt = 0; c381 is "(ErbB3:ErbB2)_P:GAP:Grb2";
  species ErbB3_ErbB2__P_GAP_Grb2_cPP in cyt = 0; ErbB3_ErbB2__P_GAP_Grb2_cPP is "(ErbB3:ErbB2)_P:GAP:Grb2:cPP";
  species c363 in cyt = 0; c363 is "(ErbB3:ErbB2)_P:GAP:(Shc_P):Grb2:Sos";
  species c364 in cyt = 0; c364 is "(ErbB3:ErbB2)_P:GAP:(Shc_P):Grb2:Sos:cPP";
  species c384 in cyt = 0; c384 is "(ErbB4:ErbB2)_P:GAP:Grb2";
  species ErbB4_ErbB2__P_GAP_Grb2_cPP in cyt = 0; ErbB4_ErbB2__P_GAP_Grb2_cPP is "(ErbB4:ErbB2)_P:GAP:Grb2:cPP";
  species c387 in cyt = 0; c387 is "(ErbB3:ErbB2)_P:GAP:Grb2:Sos";
  species ErbB3_ErbB2__P_GAP_Grb2_Sos_cPP in cyt = 0; ErbB3_ErbB2__P_GAP_Grb2_Sos_cPP is "(ErbB3:ErbB2)_P:GAP:Grb2:Sos:cPP";
  species c390 in cyt = 0; c390 is "(ErbB4:ErbB2)_P:GAP:Grb2:Sos";
  species ErbB4_ErbB2__P_GAP_Grb2_Sos_cPP in cyt = 0; ErbB4_ErbB2__P_GAP_Grb2_Sos_cPP is "(ErbB4:ErbB2)_P:GAP:Grb2:Sos:cPP";
  species c393 in cyt = 0; c393 is "(ErbB3:ErbB2)_P:GAP:Grb2:Sos:(Ras:GDP)";
  species c394 in cyt = 0; c394 is "(ErbB3:ErbB2)_P:GAP:Grb2:Sos:(Ras:GDP):cPP";
  species c396 in cyt = 0; c396 is "(ErbB4:ErbB2)_P:GAP:Grb2:Sos:(Ras:GDP)";
  species c397 in cyt = 0; c397 is "(ErbB4:ErbB2)_P:GAP:Grb2:Sos:(Ras:GDP):cPP";
  species c399 in cyt = 0; c399 is "(ErbB3:ErbB2)_P:GAP:Grb2:Sos:(Ras:GTP)";
  species c400 in cyt = 0; c400 is "(ErbB3:ErbB2)_P:GAP:Grb2:Sos:(Ras:GTP):cPP";
  species c402 in cyt = 0; c402 is "(ErbB4:ErbB2)_P:GAP:Grb2:Sos:(Ras:GTP)";
  species c403 in cyt = 0; c403 is "(ErbB4:ErbB2)_P:GAP:Grb2:Sos:(Ras:GTP):cPP";
  species c9 in cyt = 0; c9 is "cPP";
  species c404 in cyt = 0; c404 is "(ErbB4:ErbB2)_P:GAP:Grb2:Sos:(Ras:GTP)";
  species c401 in cyt = 0; c401 is "(ErbB3:ErbB2)_P:GAP:Grb2:Sos:(Ras:GTP)";
  species c398 in cyt = 0; c398 is "(ErbB4:ErbB2)_P:GAP:Grb2:Sos:(Ras:GDP)";
  species c395 in cyt = 0; c395 is "(ErbB3:ErbB2)_P:GAP:Grb2:Sos:(Ras:GDP)";
  species c392 in cyt = 0; c392 is "(ErbB4:ErbB2)_P:GAP:Grb2:Sos";
  species c389 in cyt = 0; c389 is "(ErbB3:ErbB2)_P:GAP:Grb2:Sos";
  species c386 in cyt = 0; c386 is "(ErbB4:ErbB2)_P:GAP:Grb2";
  species c365 in cyt = 0; c365 is "(ErbB3:ErbB2)_P:GAP:(Shc_P):Grb2:Sos";
  species c383 in cyt = 0; c383 is "(ErbB3:ErbB2)_P:GAP:Grb2";
  species c380 in cyt = 0; c380 is "(ErbB4:ErbB2)_P:GAP:(Shc_P):Grb2:Sos:(Ras:GTP)";
  species c377 in cyt = 0; c377 is "(ErbB3:ErbB2)_P:GAP:(Shc_P):Grb2:Sos:(Ras:GTP)";
  species c374 in cyt = 0; c374 is "(ErbB4:ErbB2)_P:GAP:(Shc_P):Grb2:Sos:(Ras:GDP)";
  species c371 in cyt = 0; c371 is "(ErbB3:ErbB2)_P:GAP:(Shc_P):Grb2:Sos:(Ras:GDP)";
  species c368 in cyt = 0; c368 is "(ErbB4:ErbB2)_P:GAP:(Shc_P):Grb2:Sos";
  species c362 in cyt = 0; c362 is "(ErbB4:ErbB2)_P:GAP:(Shc_P):Grb2";
  species c359 in cyt = 0; c359 is "(ErbB3:ErbB2)_P:GAP:(Shc_P):Grb2";
  species c323 in cyt = 0; c323 is "2(ErbB2)_P:GAP:Grb2:Sos:(Ras:GTP)";
  species c320 in cyt = 0; c320 is "2(ErbB2)_P:GAP:Grb2:Sos:(Ras:GDP)";
  species c317 in cyt = 0; c317 is "2(ErbB2)_P:GAP:Grb2:Sos";
  species c314 in cyt = 0; c314 is "2(ErbB2)_P:GAP:Grb2";
  species c311 in cyt = 0; c311 is "2(ErbB2)_P:GAP:(Shc_P):Grb2:Sos:(Ras:GTP)";
  species c308 in cyt = 0; c308 is "2(ErbB2)_P:GAP:(Shc_P):Grb2:Sos:(Ras:GDP)";
  species c305 in cyt = 0; c305 is "2(ErbB2)_P:GAP:(Shc_P):Grb2:Sos";
  species c302 in cyt = 0; c302 is "2(ErbB2)_P:GAP:(Shc_P):Grb2";
  species c239 in cyt = 0; c239 is "(ErbB1:ErbB4)_P:GAP:Grb2:Sos";
  species c238 in cyt = 0; c238 is "(ErbB1:ErbB3)_P:GAP:Grb2:Sos";
  species c237 in cyt = 0; c237 is "(ErbB1:ErbB2)_P:GAP:Grb2:Sos";
  species c257 in cyt = 0; c257 is "(ErbB1:ErbB4)_P:GAP:Grb2:Sos:(Ras:GTP)";
  species c256 in cyt = 0; c256 is "(ErbB1:ErbB3)_P:GAP:Grb2:Sos:(Ras:GTP)";
  species c255 in cyt = 0; c255 is "(ErbB1:ErbB2)_P:GAP:Grb2:Sos:(Ras:GTP)";
  species c248 in cyt = 0; c248 is "(ErbB1:ErbB4)_P:GAP:Grb2:Sos:(Ras:GDP)";
  species c247 in cyt = 0; c247 is "(ErbB1:ErbB3)_P:GAP:Grb2:Sos:(Ras:GDP)";
  species c246 in cyt = 0; c246 is "(ErbB1:ErbB2)_P:GAP:Grb2:Sos:(Ras:GDP)";
  species c230 in cyt = 0; c230 is "(ErbB1:ErbB4)_P:GAP:Grb2";
  species c229 in cyt = 0; c229 is "(ErbB1:ErbB3)_P:GAP:Grb2";
  species c228 in cyt = 0; c228 is "(ErbB1:ErbB2)_P:GAP:Grb2";
  species c221 in cyt = 0; c221 is "(ErbB1:ErbB4)_P:GAP:(Shc_P):Grb2:Sos:(Ras:GTP)";
  species c220 in cyt = 0; c220 is "(ErbB1:ErbB3)_P:GAP:(Shc_P):Grb2:Sos:(Ras:GTP)";
  species c219 in cyt = 0; c219 is "(ErbB1:ErbB2)_P:GAP:(Shc_P):Grb2:Sos:(Ras:GTP)";
  species c212 in cyt = 0; c212 is "(ErbB1:ErbB4)_P:GAP:(Shc_P):Grb2:Sos:(Ras:GDP)";
  species c211 in cyt = 0; c211 is "(ErbB1:ErbB3)_P:GAP:(Shc_P):Grb2:Sos:(Ras:GDP)";
  species c210 in cyt = 0; c210 is "(ErbB1:ErbB2)_P:GAP:(Shc_P):Grb2:Sos:(Ras:GDP)";
  species c203 in cyt = 0; c203 is "(ErbB1:ErbB4)_P:GAP:(Shc_P):Grb2:Sos";
  species c202 in cyt = 0; c202 is "(ErbB1:ErbB3)_P:GAP:(Shc_P):Grb2:Sos";
  species c201 in cyt = 0; c201 is "(ErbB1:ErbB2)_P:GAP:(Shc_P):Grb2:Sos";
  species c194 in cyt = 0; c194 is "(ErbB1:ErbB4)_P:GAP:(Shc_P):Grb2";
  species c193 in cyt = 0; c193 is "(ErbB1:ErbB3)_P:GAP:(Shc_P):Grb2";
  species c192 in cyt = 0; c192 is "(ErbB1:ErbB2)_P:GAP:(Shc_P):Grb2";
  species c68 in cyt = 0; c68 is "2(EGF:ErbB1)_P:GAP:(Shc_P):Grb2:Sos:(Ras:GTP)";
  species c67 in cyt = 0; c67 is "2(EGF:ErbB1)_P:GAP:(Shc_P):Grb2:Sos:(Ras:GDP)";
  species c66 in cyt = 0; c66 is "2(EGF:ErbB1)_P:GAP:(Shc_P):Grb2:Sos";
  species c65 in cyt = 0; c65 is "2(EGF:ErbB1)_P:GAP:(Shc_P):Grb2";
  species c21 in cyt = 0; c21 is "2(EGF:ErbB1)_P:GAP:Grb2:Sos:(Ras:GTP)";
  species c20 in cyt = 0; c20 is "2(EGF:ErbB1)_P:GAP:Grb2:Sos:(Ras:GDP)";
  species c18 in cyt = 0; c18 is "2(EGF:ErbB1)_P:GAP:Grb2";
  species c19 in cyt = 0; c19 is "2(EGF:ErbB1)_P:GAP:Grb2:Sos";
  species c6 in cyt = 0; c6 is "ErbB1:ATP";
  species c5 in cyt = 0; c5 is "2(EGF:ErbB1)_P";
  species c8 in cyt = 0; c8 is "2(EGF:ErbB1)_P";
  species c15 in cyt = 0; c15 is "2(EGF:ErbB1)_P:GAP";
  species c17 in cyt = 0; c17 is "2(EGF:ErbB1)_P:GAP";
  species c32 in cyt = 0; c32 is "2(EGF:ErbB1)_P:GAP:Shc";
  species c63 in cyt = 0; c63 is "2(EGF:ErbB1)_P:GAP:Shc";
  species c33 in cyt = 0; c33 is "2(EGF:ErbB1)_P:GAP:(Shc_P)";
  species c64 in cyt = 0; c64 is "2(EGF:ErbB1)_P:GAP:(Shc_P)";
  species c347 in cyt = 0; c347 is "(ErbB3:ErbB2)_P:GAP:Shc";
  species c349 in cyt = 0; c349 is "(ErbB3:ErbB2)_P:GAP:Shc";
  species c348 in cyt = 0; c348 is "(ErbB4:ErbB2)_P:GAP:Shc";
  species c350 in cyt = 0; c350 is "(ErbB4:ErbB2)_P:GAP:Shc";
  species c351 in cyt = 0; c351 is "(ErbB3:ErbB2)_P:GAP:(Shc_P)";
  species c353 in cyt = 0; c353 is "(ErbB3:ErbB2)_P:GAP:(Shc_P)";
  species c508 in cyt = 0; c508 is "ErbB2:Inh";
  species c512 in cyt = 0; c512 is "ErbB4:Inh";
  species c354 in cyt = 0; c354 is "(ErbB4:ErbB2)_P:GAP:(Shc_P)";
  species c356 in cyt = 0; c356 is "(ErbB4:ErbB2)_P:GAP:(Shc_P)";
  species c148 in cyt = 0; c148 is "(ErbB1:ErbB2)_P";
  species c162 in cyt = 0; c162 is "(ErbB1:ErbB2)_P";
  species c149 in cyt = 0; c149 is "(ErbB1:ErbB3)_P";
  species c163 in cyt = 0; c163 is "(ErbB1:ErbB3)_P";
  species c150 in cyt = 0; c150 is "(ErbB1:ErbB4)_P";
  species c164 in cyt = 0; c164 is "(ErbB1:ErbB4)_P";
  species c289 in cyt = 0; c289 is "2(ErbB2)_P";
  species c290 in cyt = 0; c290 is "2(ErbB2)_P";
  species c337 in cyt = 0; c337 is "(ErbB3:ErbB2)_P";
  species c338 in cyt = 0; c338 is "(ErbB4:ErbB2)_P";
  species c291 in cyt = 0; c291 is "2(ErbB2)_P:GAP";
  species c293 in cyt = 0; c293 is "2(ErbB2)_P:GAP";
  species c294 in cyt = 0; c294 is "2(ErbB2)_P:GAP:Shc";
  species c296 in cyt = 0; c296 is "2(ErbB2)_P:GAP:Shc";
  species c297 in cyt = 0; c297 is "2(ErbB2)_P:GAP:(Shc_P)";
  species c299 in cyt = 0; c299 is "2(ErbB2)_P:GAP:(Shc_P)";
  species GAP in cyt = 534751/cyt;
  species c165 in cyt = 0; c165 is "(ErbB1:ErbB2)_P:GAP";
  species c166 in cyt = 0; c166 is "(ErbB1:ErbB3)_P:GAP";
  species c167 in cyt = 0; c167 is "(ErbB1:ErbB4)_P:GAP";
  species c151 in cyt = 0; c151 is "(ErbB1:ErbB2)_P:GAP";
  species c152 in cyt = 0; c152 is "(ErbB1:ErbB3)_P:GAP";
  species c153 in cyt = 0; c153 is "(ErbB1:ErbB4)_P:GAP";
  species c341 in cyt = 0; c341 is "(ErbB3:ErbB2)_P:GAP";
  species c344 in cyt = 0; c344 is "(ErbB4:ErbB2)_P:GAP";
  species c343 in cyt = 0; c343 is "(ErbB3:ErbB2)_P:GAP";
  species c346 in cyt = 0; c346 is "(ErbB4:ErbB2)_P:GAP";
  species EGF in cyt = 0;
  species c157 in cyt = 0; c157 is "(HRG:ErbB3)";
  species Grb2 in cyt = 1264.91/cyt;
  species Shc_P in cyt = 0; Shc_P is "(Shc_P)";
  species Shc_P_Grb2 in cyt = 0; Shc_P_Grb2 is "(Shc_P):Grb2";
  species c180 in cyt = 0; c180 is "(ErbB1:ErbB2)_P:GAP:(Shc_P)";
  species c181 in cyt = 0; c181 is "(ErbB1:ErbB3)_P:GAP:(Shc_P)";
  species c182 in cyt = 0; c182 is "(ErbB1:ErbB4)_P:GAP:(Shc_P)";
  species c183 in cyt = 0; c183 is "(ErbB1:ErbB2)_P:GAP:(Shc_P)";
  species c184 in cyt = 0; c184 is "(ErbB1:ErbB3)_P:GAP:(Shc_P)";
  species c185 in cyt = 0; c185 is "(ErbB1:ErbB4)_P:GAP:(Shc_P)";
  species Sos in cyt = 0;
  species Ras_GDP in cyt = 58095.2/cyt; Ras_GDP is "Ras:GDP";
  species Ras_GTP in cyt = 0; Ras_GTP is "Ras:GTP";
  species Ras_GTP__i in cyt = 0; Ras_GTP__i is "(Ras:GTP)_i";
  species Ras_activated_GTP in cyt = 0; Ras_activated_GTP is "Ras_activated:GTP";
  species Ras_activated_GTP__i in cyt = 0; Ras_activated_GTP__i is "(Ras_activated:GTP)_i";
  species Shc in cyt = 1100000/cyt;
  species c171 in cyt = 0; c171 is "(ErbB1:ErbB2)_P:GAP:Shc";
  species c172 in cyt = 0; c172 is "(ErbB1:ErbB3)_P:GAP:Shc";
  species c173 in cyt = 0; c173 is "(ErbB1:ErbB4)_P:GAP:Shc";
  species c174 in cyt = 0; c174 is "(ErbB1:ErbB2)_P:GAP:Shc";
  species c175 in cyt = 0; c175 is "(ErbB1:ErbB3)_P:GAP:Shc";
  species c176 in cyt = 0; c176 is "(ErbB1:ErbB4)_P:GAP:Shc";
  species Raf in cyt = 71131.2/cyt;
  species Raf_Ras_GTP in cyt = 0; Raf_Ras_GTP is "Raf:Ras:GTP";
  species Raf_Ras_GTP__i in cyt = 0; Raf_Ras_GTP__i is "(Raf:Ras:GTP)_i";
  species Raf_P__i in cyt = 0; Raf_P__i is "(Raf_P)_i";
  species Raf_P in cyt = 0;
  species Shc_P_Grb2_Sos in cyt = 0; Shc_P_Grb2_Sos is "(Shc_P):Grb2:Sos";
  species Grb2_Sos in cyt = 88914000/cyt; Grb2_Sos is "Grb2:Sos";
  species Pase1 in cyt = 50000/cyt;
  species Raf_P_Pase1__i in cyt = 0; Raf_P_Pase1__i is "(Raf_P:Pase1)_i";
  species Raf_P_Pase1 in cyt = 0; Raf_P_Pase1 is "Raf_P:Pase1";
  species MEK_P__i in cyt = 0; MEK_P__i is "(MEK_P)_i";
  species MEK_P_Raf_P__i in cyt = 0; MEK_P_Raf_P__i is "(MEK_P:Raf_P)_i";
  species MEK in cyt = 3020000/cyt;
  species MEK_Raf_P__i in cyt = 0; MEK_Raf_P__i is "(MEK:Raf_P)_i";
  species MEK_Raf_P in cyt = 0; MEK_Raf_P is "MEK:Raf_P";
  species MEK_P in cyt = 0;
  species MEK_P_Raf_P in cyt = 0; MEK_P_Raf_P is "MEK_P:Raf_P";
  species MEK_PP in cyt = 0;
  species MEK_PP__i in cyt = 0; MEK_PP__i is "(MEK_PP)_i";
  species Pase2 in cyt = 124480/cyt;
  species MEK_PP_Pase2__i in cyt = 0; MEK_PP_Pase2__i is "(MEK_PP:Pase2)_i";
  species MEK_PP_Pase2 in cyt = 0; MEK_PP_Pase2 is "MEK_PP:Pase2";
  species MEK_P_Pase2 in cyt = 0; MEK_P_Pase2 is "MEK_P:Pase2";
  species MEK_P_Pase2__i in cyt = 0; MEK_P_Pase2__i is "(MEK_P:Pase2)_i";
  species ERK in cyt = 695000/cyt;
  species ERK_MEK_PP in cyt = 0; ERK_MEK_PP is "ERK:MEK_PP";
  species ERK_P in cyt = 0;
  species ERK_P_MEK_PP in cyt = 0; ERK_P_MEK_PP is "ERK_P:MEK_PP";
  species MEK_PP_ERK in cyt = 0; MEK_PP_ERK is "MEK_PP:ERK";
  species ERK_P__i in cyt = 0; ERK_P__i is "(ERK_P)_i";
  species MEK_PP_ERK_P in cyt = 0; MEK_PP_ERK_P is "MEK_PP:ERK_P";
  species ERK_PP in cyt = 0;
  species ERK_PP__i in cyt = 0; ERK_PP__i is "(ERK_PP)_i";
  species Pase3 in cyt = 16870.2/cyt;
  species ERK_PP_Pase3 in cyt = 0; ERK_PP_Pase3 is "ERK_PP:Pase3";
  species ERK_PP_Pase3__i in cyt = 0; ERK_PP_Pase3__i is "(ERK_PP:Pase3)_i";
  species ERK_P_Pase3 in cyt = 0; ERK_P_Pase3 is "ERK_P:Pase3";
  species ERK_P_Pase3__i in cyt = 0; ERK_P_Pase3__i is "(ERK_P:Pase3)_i";
  species R_degraded in cyt = 0;
  species _2_ErbB2 in cyt = 0; _2_ErbB2 is "2(ErbB2)";
  species EGF_degraded in cyt = 0;
  species c518 in cyt = 0; c518 is "(HRG:ErbB3:ErbB1)";
  species c519 in cyt = 0; c519 is "(HRG:ErbB4:ErbB1)";
  species ErbB3_ErbB2 in cyt = 0; ErbB3_ErbB2 is "(ErbB3:ErbB2)";
  species ErbB4_ErbB2 in cyt = 0; ErbB4_ErbB2 is "(ErbB4:ErbB2)";
  species c95 in cyt = 0; c95 is "2(EGF:ErbB1)_P:GAP:Grb2:Sos:(ERK_PP)";
  species c96 in cyt = 0; c96 is "2(EGF:ErbB1)_P:GAP:Grb2:Sos:(ERK_PP)";
  species c97 in cyt = 0; c97 is "2(EGF:ErbB1)_P:GAP:(Shc_P):Grb2:Sos:ERK_PP";
  species c98 in cyt = 0; c98 is "2(EGF:ErbB1)_P:GAP:(Shc_P):Grb2:Sos:(ERK_PP)";
  species ERK_PP_Sos in cyt = 0; ERK_PP_Sos is "(ERK_PP):Sos";
  species ERK_PP_Sos__i in cyt = 0; ERK_PP_Sos__i is "((ERK_PP):Sos)_i";
  species c99 in cyt = 0; c99 is "2(EGF:ErbB1)_P:GAP:Grb2:Sos_P";
  species c419 in cyt = 0; c419 is "2(EGF:ErbB1)_P:GAP:(Shc_P):Grb2:(Sos_P)";
  species Sos_P in cyt = 0;
  species c100 in cyt = 0; c100 is "2(EGF:ErbB1)_P:GAP:Grb2:(Sos_P)";
  species c420 in cyt = 0; c420 is "2(EGF:ErbB1)_P:GAP:(Shc_P):Grb2:(Sos_P)";
  species c287 in cyt = 35565600/cyt; c287 is "PI3K";
  species _2_EGF_ErbB1__P_GAP_Grb2_Gab1_P in cyt = 0; _2_EGF_ErbB1__P_GAP_Grb2_Gab1_P is "2(EGF:ErbB1)_P:GAP:Grb2:(Gab1_P#)";
  species c104 in cyt = 0; c104 is "2(EGF:ErbB1)_P:GAP:Grb2:Gab1_P:PI3K";
  species c447 in cyt = 0; c447 is "(ErbB1:ErbB4)_P:GAP:Grb2:Gab1_P";
  species c263 in cyt = 0; c263 is "(ErbB1:ErbB4)_P:GAP:Grb2:Gab1_P:PI3K";
  species ErbB1_ErbB2__P_GAP_Grb2_Gab1_P in cyt = 0; ErbB1_ErbB2__P_GAP_Grb2_Gab1_P is "(ErbB1:ErbB2)_P:GAP:Grb2:Gab1_P";
  species c261 in cyt = 0; c261 is "(ErbB1:ErbB2)_P:GAP:Grb2:Gab1_P:PI3K";
  species c446 in cyt = 0; c446 is "(ErbB1:ErbB3)_P:GAP:Grb2:Gab1_P";
  species c262 in cyt = 0; c262 is "(ErbB1:ErbB3)_P:GAP:Grb2:Gab1_P:PI3K";
  species _2_ErbB2__P_GAP_Grb2_Gab1_P in cyt = 0; _2_ErbB2__P_GAP_Grb2_Gab1_P is "2(ErbB2)_P:GAP:Grb2:Gab1_P";
  species _2_ErbB2__P_GAP_Grb2_Gab1_P_PI3K in cyt = 0; _2_ErbB2__P_GAP_Grb2_Gab1_P_PI3K is "2(ErbB2)_P:GAP:Grb2:Gab1_P:PI3K";
  species ErbB3_ErbB2__P_GAP_Grb2_Gab1_P in cyt = 0; ErbB3_ErbB2__P_GAP_Grb2_Gab1_P is "(ErbB3:ErbB2)_P:GAP:Grb2:Gab1_P";
  species c405 in cyt = 0; c405 is "(ErbB3:ErbB2)_P:GAP:Grb2:Gab1_P:PI3K";
  species ErbB4_ErbB2__P_GAP_Grb2_Gab1_P in cyt = 0; ErbB4_ErbB2__P_GAP_Grb2_Gab1_P is "(ErbB4:ErbB2)_P:GAP:Grb2:Gab1_P";
  species c408 in cyt = 0; c408 is "(ErbB4:ErbB2)_P:GAP:Grb2:Gab1_P:PI3K";
  species PIP3 in cyt = 0;
  species c453 in cyt = 0; c453 is "(ErbB3:ErbB2)_P:GAP:Grb2:Gab1_P:PI3K:PIP2";
  species c452 in cyt = 0; c452 is "2(ErbB2)_P:GAP:Grb2:Gab1_P:PI3K:PIP2";
  species c448 in cyt = 0; c448 is "2(EGF:ErbB1)_P:GAP:Grb2:Gab1_P:PI3K:PIP2";
  species c449 in cyt = 0; c449 is "(ErbB1:ErbB2)_P:GAP:Grb2:Gab1_P:PI3K:PIP2";
  species c450 in cyt = 0; c450 is "(ErbB1:ErbB3)_P:GAP:Grb2:Gab1_P:PI3K:PIP2";
  species c451 in cyt = 0; c451 is "(ErbB1:ErbB4)_P:GAP:Grb2:Gab1_P:PI3K:PIP2";
  species c467 in cyt = 0; c467 is "(ErbB3:ErbB2)_P:GAP:Grb2:Gab1_P:PI3K:(PIP2)2";
  species c468 in cyt = 0; c468 is "(ErbB3:ErbB2)_P:GAP:Grb2:Gab1_P:PI3K:(PIP2)3";
  species c469 in cyt = 0; c469 is "(ErbB3:ErbB2)_P:GAP:Grb2:Gab1_P:PI3K:(PIP2)4";
  species c470 in cyt = 0; c470 is "(ErbB3:ErbB2)_P:GAP:Grb2:Gab1_P:PI3K:(PIP2)5";
  species c471 in cyt = 0; c471 is "(ErbB3:ErbB2)_P:GAP:Grb2:Gab1_P:PI3K:(PIP2)6";
  species AKT in cyt = 905000/cyt;
  species PIP3_AKT in cyt = 0; PIP3_AKT is "PIP3:AKT";
  species AKT_P in cyt = 0;
  species PIP3_AKT_P in cyt = 0; PIP3_AKT_P is "PIP3:AKT_P";
  species PDK1 in cyt = 300416000/cyt;
  species PIP3_AKT_P_PDK1 in cyt = 0; PIP3_AKT_P_PDK1 is "PIP3:AKT_P:PDK1";
  species PIP3_AKT_PDK1 in cyt = 0; PIP3_AKT_PDK1 is "PIP3:AKT:PDK1";
  species PIP3_PDK1 in cyt = 0; PIP3_PDK1 is "PIP3:PDK1";
  species AKT_P_P in cyt = 0; AKT_P_P is "AKT:P:P";
  species Pase4 in cyt = 450000/cyt;
  species AKT_P_P_Pase4 in cyt = 0; AKT_P_P_Pase4 is "AKT:P:P:Pase4";
  species AKT_P_Pase4 in cyt = 0; AKT_P_Pase4 is "AKT_P:Pase4";
  species RTK_Pase in cyt = 70000/cyt;
  species ErbB1_ErbB3__P_RTK_Pase in cyt = 0; ErbB1_ErbB3__P_RTK_Pase is "(ErbB1:ErbB3)_P:RTK_Pase";
  species ErbB1_ErbB4__P_RTK_Pase in cyt = 0; ErbB1_ErbB4__P_RTK_Pase is "(ErbB1:ErbB4)_P:RTK_Pase";
  species _2_EGF_ErbB1__P_RTK_Pase in cyt = 0; _2_EGF_ErbB1__P_RTK_Pase is "2(EGF:ErbB1)_P:RTK_Pase";
  species _2_ErbB2__P_RTK_Pase in cyt = 0; _2_ErbB2__P_RTK_Pase is "2(ErbB2)_P:RTK_Pase";
  species ErbB2_ErbB3__P_RTK_Pase in cyt = 0; ErbB2_ErbB3__P_RTK_Pase is "(ErbB2:ErbB3)_P:RTK_Pase";
  species ErbB2_ErbB4__P_RTK_Pase in cyt = 0; ErbB2_ErbB4__P_RTK_Pase is "(ErbB2:ErbB4)_P:RTK_Pase";
  species ErbB1_ErbB2__P_RTK_Pase in cyt = 0; ErbB1_ErbB2__P_RTK_Pase is "(ErbB1:ErbB2)_P:RTK_Pase";
  species ErbB2_P in cyt = 0;
  species ErbB1 in cyt = 1080000/cyt;
  species EGF_ErbB1_P in cyt = 0; EGF_ErbB1_P is "EGF:ErbB1_P";
  species ErbB3_P in cyt = 0;
  species ErbB4_P in cyt = 0;
  species ErbB2_ErbB2_Inh in cyt = 0; ErbB2_ErbB2_Inh is "ErbB2:ErbB2:Inh";
  species ErbB3_ErbB2_Inh in cyt = 0; ErbB3_ErbB2_Inh is "ErbB3:ErbB2:Inh";
  species ErbB4_ErbB2_Inh in cyt = 0; ErbB4_ErbB2_Inh is "ErbB4:ErbB2:Inh";
  species ErbB4_Inh_ErbB2 in cyt = 0; ErbB4_Inh_ErbB2 is "ErbB4:Inh:ErbB2";
  species Shp in cyt = 2213.59/cyt;
  species PIP2 in cyt = 393639/cyt;
  species PIP3_Shp in cyt = 0; PIP3_Shp is "PIP3:Shp";
  species PTEN in cyt = 56100.9/cyt;
  species PIP3_PTEN in cyt = 0; PIP3_PTEN is "PIP3:PTEN";
  species Gab1 in cyt = 94868.3/cyt;
  species c455 in cyt = 0; c455 is "PI3K";
  species Shp2 in cyt = 1000000/cyt;
  species c464 in cyt = 0; c464 is "(ErbB1:ErbB2)_P:GAP:Grb2:Gab1_P:Shp2";
  species c465 in cyt = 0; c465 is "(ErbB1:ErbB3)_P:GAP:Grb2:Gab1_P:Shp2";
  species c466 in cyt = 0; c466 is "(ErbB1:ErbB4)_P:GAP:Grb2:Gab1_P:Shp2";
  species _2_ErbB2__P_GAP_Grb2_Gab1_P_Shp2 in cyt = 0; _2_ErbB2__P_GAP_Grb2_Gab1_P_Shp2 is "2(ErbB2)_P:GAP:Grb2:Gab1_P:Shp2";
  species c476 in cyt = 0; c476 is "(ErbB3:ErbB2)_P:GAP:Grb2:Gab1_P:Shp2";
  species c479 in cyt = 0; c479 is "(ErbB4:ErbB2)_P:GAP:Grb2:Gab1_P:Shp2";
  species c489 in cyt = 0; c489 is "2(EGF:ErbB1)_P:GAP:Grb2:(Gab1_P):Shp2";
  species c431 in cyt = 0; c431 is "2(EGF:ErbB1)_P:GAP:Grb2:(Gab1_P):ERK_PP";
  species c432 in cyt = 0; c432 is "2(EGF:ErbB1)_P:GAP:Grb2:(Gab1_P):ERK_PP_i";
  species c433 in cyt = 0; c433 is "(ErbB1:ErbB2)_P:GAP:Grb2:Gab1_P:ERK_PP";
  species c434 in cyt = 0; c434 is "(ErbB1:ErbB2)_P:GAP:Grb2:Gab1_P:ERK_PP_i";
  species c435 in cyt = 0; c435 is "(ErbB1:ErbB3)_P:GAP:Grb2:Gab1_P:ERK_PP";
  species c437 in cyt = 0; c437 is "(ErbB1:ErbB3)_P:GAP:Grb2:Gab1_P:ERK_PP_i";
  species c438 in cyt = 0; c438 is "(ErbB1:ErbB4)_P:GAP:Grb2:Gab1_P_ERK_PP";
  species c440 in cyt = 0; c440 is "(ErbB1:ErbB4)_P:GAP:Grb2:Gab1_P:ERK_PP_i";
  species c474 in cyt = 0; c474 is "2(ErbB2)_P:GAP:Grb2:Gab1_P:ERK_PP";
  species c475 in cyt = 0; c475 is "2(ErbB2)_P:GAP:Grb2:Gab1_P:ERK_PP_i";
  species c477 in cyt = 0; c477 is "(ErbB3:ErbB2)_P:GAP:Grb2:Gab1_P:ERK_PP";
  species c478 in cyt = 0; c478 is "(ErbB3:ErbB2)_P:GAP:Grb2:Gab1_P:ERK_PP_i";
  species c480 in cyt = 0; c480 is "(ErbB4:ErbB2)_P:GAP:Grb2:Gab1_P:ERK_PP";
  species c481 in cyt = 0; c481 is "(ErbB4:ErbB2)_P:GAP:Grb2:Gab1_P:ERK_PP_i";
  species ErbB3_4_ErbB2_Gab1_P in cyt = 0; ErbB3_4_ErbB2_Gab1_P is "ErbB3/4:ErbB2:Gab1_P#";
  species _2_ErbB2_2_Gab1_P in cyt = 0; _2_ErbB2_2_Gab1_P is "2(ErbB2)2:Gab1_P#";
  species c410 in cyt = 0; c410 is "(ErbB1:ErbB4)_P:GAP:Grb2:Gab1_P";
  species c409 in cyt = 0; c409 is "(ErbB1:ErbB3)_P:GAP:Grb2:Gab1_P";
  species ErbB1_ErbB_Gab1_P in cyt = 0; ErbB1_ErbB_Gab1_P is "ErbB1:ErbB:Gab1_P#";
  species _2_EGF_ErbB1_Gab1_P in cyt = 0; _2_EGF_ErbB1_Gab1_P is "2(EGF:ErbB1):Gab1_P#";
  species ErbB4_ErbB2__P_GAP_Grb2_Gab1__PP in cyt = 0; ErbB4_ErbB2__P_GAP_Grb2_Gab1__PP is "(ErbB4:ErbB2)_P:GAP:Grb2:Gab1:_PP";
  species c264 in cyt = 0; c264 is "2(EGF:ErbB1)_P:GAP:Grb2:(Gab1_P):PI3K:Ras:GDP";
  species c265 in cyt = 0; c265 is "(ErbB1:ErbB2)_P:GAP:Grb2:Gab1_P:PI3K:Ras:GDP";
  species c266 in cyt = 0; c266 is "(ErbB1:ErbB3)_P:GAP:Grb2:Gab1_P:PI3K:Ras:GDP";
  species c267 in cyt = 0; c267 is "(ErbB1:ErbB4)_P:GAP:Grb2:Gab1_P:PI3K:Ras:GDP";
  species c268 in cyt = 0; c268 is "2(ErbB2)_P:GAP:Grb2:Gab1_P:PI3K:Ras:GDP";
  species c269 in cyt = 0; c269 is "(ErbB3:ErbB2)_P:GAP:Grb2:Gab1_P:PI3K:Ras:GDP";
  species c325 in cyt = 0; c325 is "(ErbB4:ErbB2)_P:GAP:Grb2:Gab1_P:PI3K:Ras:GDP";
  species AKT_P_P_Raf_P_Ser in cyt = 0; AKT_P_P_Raf_P_Ser is "AKT:P:P:Raf:P:Ser";
  species AKT_P_P_Raf_P_Ser_i in cyt = 0; AKT_P_P_Raf_P_Ser_i is "AKT:P:P:Raf:P:Ser_i";
  species Raf_P_Ser in cyt = 0; Raf_P_Ser is "Raf:P:Ser";
  species MKP_deg in cyt = 0;
  species Pase9t in cyt = 0;
  species _2_EGF_ErbB1_Gab1_P_Pase9t in cyt = 0; _2_EGF_ErbB1_Gab1_P_Pase9t is "2(EGF:ErbB1):Gab1_P#:Pase9t";
  species _2_ErbB2_2_Gab1_P_Pase9t in cyt = 0; _2_ErbB2_2_Gab1_P_Pase9t is "2(ErbB2)2:Gab1_P#:Pase9t";
  species c411 in cyt = 0; c411 is "(ErbB1:ErbB3)_P:GAP:Grb2:Gab1_P:Pase9t";
  species c412 in cyt = 0; c412 is "(ErbB1:ErbB4)_P:GAP:Grb2:Gab1_P:Pase9t";
  species ErbB3_4_ErbB2_Gab1_P_Pase9t in cyt = 0; ErbB3_4_ErbB2_Gab1_P_Pase9t is "ErbB3/4:ErbB2:Gab1_P#:Pase9t";
  species ErbB1_ErbB_Gab1_P_Pase9t in cyt = 0; ErbB1_ErbB_Gab1_P_Pase9t is "ErbB1:ErbB:Gab1_P#:Pase9t";
  species c407 in cyt = 0; c407 is "(ErbB4:ErbB2)_P:GAP:Grb2:Gab1:_PP:Pase9t";
  species c142 in cyt = 0; c142 is "HRG:ErbB3";
  species c144 in cyt = 0; c144 is "HRG:ErbB4";
  species c158 in cyt = 0; c158 is "(HRG:ErbB4)";
  species ErbB1_h in cyt = 0;
  species ErbB1_h_Inh in cyt = 0; ErbB1_h_Inh is "ErbB1_h:Inh";
  species EGF_ErbB1_h_Inh in cyt = 0; EGF_ErbB1_h_Inh is "EGF:ErbB1_h:Inh";
  species c527 in cyt = 0; c527 is "(EGF:ErbB1:ATP::EGF:ErbB1_h:Inh)";
  species _2_EGF_ErbB1_h_Inh in cyt = 0; _2_EGF_ErbB1_h_Inh is "2(EGF:ErbB1_h:Inh)";
  species c524 in cyt = 0; c524 is "ErbB1_h:ATP";
  species EGF_ErbB1_h_ATP in cyt = 0; EGF_ErbB1_h_ATP is "EGF:ErbB1_h:ATP";
  species c530 in cyt = 0; c530 is "ErbB1_h:ATP";
  species c115 in cyt = 0; c115 is "(EGF:ErbB1:ATP::EGF:ErbB1:Inh)-HalfActive";
  species c121 in cyt = 0; c121 is "(EGF:ErbB1:ATP::EGF:ErbB1_h:Inh)-HalfActive";
  species EGF_ErbB1_ATP_EGF_ErbB1_h_ATP in cyt = 0; EGF_ErbB1_ATP_EGF_ErbB1_h_ATP is "(EGF:ErbB1:ATP::EGF:ErbB1_h:ATP)";
  species EGF_ErbB1_Inh_EGF_ErbB1_h_ATP in cyt = 0; EGF_ErbB1_Inh_EGF_ErbB1_h_ATP is "(EGF:ErbB1:Inh::EGF:ErbB1_h:ATP)";
  species c552 in cyt = 0; c552 is "2(EGF:ErbB1_h:ATP)-FullActive";
  species c553 in cyt = 0; c553 is "(EGF:ErbB1:ATP::EGF:ErbB1_h:Inh)";
  species EGF_ErbB1_Inh_EGF_ErbB1_h_Inh in cyt = 0; EGF_ErbB1_Inh_EGF_ErbB1_h_Inh is "(EGF:ErbB1:Inh::EGF:ErbB1_h:Inh)";
  species c555 in cyt = 0; c555 is "(EGF:ErbB1:ATP::EGF:ErbB1_h:ATP)-FullActive";
  species c556 in cyt = 0; c556 is "(EGF:ErbB1:Inh::EGF:ErbB1_h:ATP)-HalfActive";
  species c557 in cyt = 0; c557 is "2(EGF:ErbB1_h:ATP)-FullActive";
  species c558 in cyt = 0; c558 is "(EGF:ErbB1:ATP::EGF:ErbB1_h:Inh)-HalfActive";

  // Parameters:
  k101 = 8.33e-7;
  k102 = 5e-7;
  k103 = 8.36983e-9;
  k104 = 0;
  k105 = 6.67e-5;
  k106 = 1.33e-5;
  k106b = 2.63418e-8;
  k107 = 3.33e-5;
  k108 = 0;
  k109 = 5e-6;
  k10b = 0.05426;
  k110 = 0.000333;
  k111 = 0;
  k112 = 0.0047067;
  k113 = 0;
  k114 = 4.98816e-6;
  k115 = 0;
  k117 = 8.33e-8;
  k118 = 0;
  k120 = 1.48131e-8;
  k120b = 5.92538e-11;
  k123 = 0;
  k123h = 0;
  k15 = 1.667e-8;
  k16 = 1.67e-5;
  k17 = 1.67e-5;
  k18 = 2.5e-5;
  k19 = 1.667e-7;
  k1d = 518;
  k2 = 7.44622e-6;
  k20 = 1.1068e-5;
  k21 = 3.67e-7;
  k22 = 1.39338e-7;
  k23 = 6;
  k25 = 1.67e-5;
  k28 = 5e-6;
  k29 = 1.17e-6;
  k2b = 3.73632e-8;
  k32 = 4e-7;
  k33 = 3.5e-5;
  k34 = 7.5e-6;
  k35 = 7.5e-6;
  k36 = 0.005;
  k37 = 1.5e-6;
  k4 = 6.73e-6;
  k40 = 5e-5;
  k41 = 5e-5;
  k42 = 6e-5;
  k43 = 0;
  k44 = 1.07e-5;
  k45 = 0;
  k47 = 0;
  k48 = 2.37e-5;
  k49 = 0;
  k4b = 0;
  k5 = 0;
  k50 = 4.74801e-8;
  k52 = 8.85125e-6;
  k53 = 0;
  k55 = 0;
  k56 = 0.000397392;
  k57 = 0;
  k58 = 8.33e-7;
  k5b = 0;
  k6 = 0.013;
  k60 = 0.00266742;
  k60b = 0.0471248;
  k60c = 0.00052;
  k61 = 0.00057;
  k62b = 0.000416;
  k64 = 1.67e-5;
  k65 = 0;
  k66 = 1.5e-5;
  k67 = 5e-5;
  k68 = 0;
  k69 = 3.33e-5;
  k6b = 0;
  k7 = 5e-5;
  k70 = 6.67e-7;
  k71 = 0;
  k72 = 0;
  k73 = 0.00374845;
  k74 = 6.36184e-7;
  k75 = 0;
  k76 = 0;
  k8 = 5.91474e-7;
  k8b = 9.34641e-6;
  k94 = 5e-5;
  k94b = 5e-5;
  k95 = 0;
  k96 = 1.67e-6;
  kd10 = 0.011;
  kd100 = 0.001;
  kd101 = 0.03;
  kd102 = 5.61009;
  kd103 = 0.016;
  kd104 = 0.2;
  kd105 = 0.1;
  kd106 = 0.1;
  kd106b = 0.1;
  kd107 = 0.1;
  kd108 = 5;
  kd109 = 0.1;
  kd110 = 0.1;
  kd111 = 6.57;
  kd112 = 0.1;
  kd113 = 177.828;
  kd114 = 0.1;
  kd115 = 1;
  kd116 = 0;
  kd117 = 0.1;
  kd118 = 0.03;
  kd119 = 0.0103115;
  kd120 = 0.1;
  kd123 = 0.177828;
  kd123h = 0.1;
  kd15 = 0;
  kd17 = 0.06;
  kd18 = 1.3;
  kd19 = 0.5;
  kd2 = 0.16;
  kd20 = 0.4;
  kd21 = 0.23;
  kd22 = 0.1;
  kd22b = 0.1;
  kd23 = 0.06;
  kd24 = 0.55;
  kd25 = 0.0214;
  kd28 = 0.0053;
  kd29 = 3.1;
  kd2b = 0.016;
  kd32 = 0.1;
  kd33 = 0.2;
  kd34 = 0.03;
  kd35 = 0.0015;
  kd36 = 0;
  kd37 = 0.3;
  kd4 = 0.000166;
  kd40 = 0.064;
  kd41 = 0.0429;
  kd42 = 0.0141589;
  kd43 = 31.6228;
  kd44 = 0.01833;
  kd45 = 1.9;
  kd47 = 0.8;
  kd48 = 0.79;
  kd49 = 0.112387;
  kd5 = 0.80833;
  kd50 = 0.252982;
  kd52 = 0.033;
  kd53 = 0.28;
  kd55 = 70.1662;
  kd56 = 5;
  kd57 = 0.0076;
  kd58 = 56.7862;
  kd5b = 0.0080833;
  kd60 = 0;
  kd60b = 0;
  kd61 = 0;
  kd63 = 0.275;
  kd64 = 0.3;
  kd65 = 0.2;
  kd66 = 0.2;
  kd67 = 0.02;
  kd68 = 0.2;
  kd68b = 20.5;
  kd69 = 0.1;
  kd6b = 0;
  kd7 = 0.000138;
  kd70 = 0.1;
  kd71 = 25.2;
  kd72 = 5.01187;
  kd73 = 0.5;
  kd74 = 0.355656;
  kd75 = 0.00633957;
  kd76 = 142.262;
  kd8 = 0.2;
  kd8b = 0.02;
  kd94 = 0.01;
  kd95 = 33;
  kd96 = 0.1;
  kd97 = 0.015;
  kd97c = 0.001;
  kd98 = 0.001;
  kd99 = 0.5;
  c1 = 0;
  c514 = 0;
  Step0 = 0;

  // Assignment rules:
  c515 := 0;
  c285 := 0;
  Step10Mio := 10000000*piecewise(0, time - 1800 < 0, 1) + sin(50*pi*(time - 1799.99))*(10000000*piecewise(0, time - 1799.99 < 0, 1) - 10000000*piecewise(0, time - 1800 < 0, 1));
  Step33 := 0.0033*piecewise(0, time - 1800 < 0, 1) + sin(50*pi*(time - 1799.99))*(0.0033*piecewise(0, time - 1799.99 < 0, 1) - 0.0033*piecewise(0, time - 1800 < 0, 1));
  Step1 := piecewise(0, time - 1800 < 0, 1) + sin(50*pi*(time - 1799.99))*(piecewise(0, time - 1799.99 < 0, 1) - piecewise(0, time - 1800 < 0, 1));
  StepMini := 1.8704e-8*piecewise(0, time - 1800 < 0, 1) + sin(50*pi*(time - 1799.99))*(1.8704e-8*piecewise(0, time - 1799.99 < 0, 1) - 1.8704e-8*piecewise(0, time - 1800 < 0, 1));
  Step5 := 5e-5*piecewise(0, time - 1800 < 0, 1) + sin(50*pi*(time - 1799.99))*(5e-5*piecewise(0, time - 1799.99 < 0, 1) - 5e-5*piecewise(0, time - 1800 < 0, 1));
  StepLate := 0.0150356*piecewise(0, time - 2660 < 0, 1) + sin(50*pi*(time - 2659.99))*(0.0150356*piecewise(0, time - 2659.99 < 0, 1) - 0.0150356*piecewise(0, time - 2660 < 0, 1));

  // Reactions:
  v1_v1: c2 -> c3; cyt*(c1*Step10Mio*c2 - Step33*c3);
  v2_v2: ErbB2_ErbB3 -> c335; cyt*(c1*Step0*ErbB2_ErbB3 - Step0*c335);
  v3_v3: ErbB2_ErbB4 -> c336; cyt*(c1*ErbB2_ErbB4*k1d - Step0*c336);
  v4_v4: ErbB1_Inh -> EGF_ErbB1_Inh; cyt*(c1*Step10Mio*ErbB1_Inh - Step33*EGF_ErbB1_Inh);
  v5_v5: c3 + EGF_ErbB1_Inh -> EGF_ErbB1_ATP_EGF_ErbB1_Inh; cyt*(c3*EGF_ErbB1_Inh*k2 - EGF_ErbB1_ATP_EGF_ErbB1_Inh*kd2);
  v6_v6: 2 EGF_ErbB1_Inh -> _2_EGF_ErbB1_Inh; cyt*(EGF_ErbB1_Inh^2*k2 - _2_EGF_ErbB1_Inh*kd2);
  v7_v7: 2 c3 -> c4; cyt*(c3^2*k2 - c4*kd2);
  v8_v8: 2 c10 -> c11; cyt*(c10^2*k2 - c11*kd2);
  v9_v9: c3 + c141 -> c145; cyt*(c3*c141*k2b - c145*kd2b);
  v10_v10: c3 + c140 -> c146; cyt*(c3*c140*k2b - c146*kd2b);
  v11_v11: c3 + c143 -> c147; cyt*(c3*c143*k2b - c147*kd2b);
  v12_v12: c10 + c155 -> c159; cyt*(c10*c155*k2b - c159*kd2b);
  v13_v13: c10 + c154 -> c160; cyt*(c10*c154*k2b - c160*kd2b);
  v14_v14: c10 + c156 -> c161; cyt*(c10*c156*k2b - c161*kd2b);
  v15_v15: EGF_ErbB1_Inh + c141 -> EGF_ErbB1_Inh_ErB2; cyt*(c141*EGF_ErbB1_Inh*k2b - EGF_ErbB1_Inh_ErB2*kd2b);
  v16_v16: EGF_ErbB1_Inh + c140 -> EGF_ErbB1_Inh_ErB3; cyt*(c140*EGF_ErbB1_Inh*k2b - EGF_ErbB1_Inh_ErB3*kd2b);
  v17_v17: EGF_ErbB1_Inh + c143 -> EGF_ErbB1_Inh_ErB4; cyt*(c143*EGF_ErbB1_Inh*k2b - EGF_ErbB1_Inh_ErB4*kd2b);
  v18_v18: c3 + c502 -> EGF_ErbB1_ErbB2_Inh; cyt*(c3*c502*k2b - EGF_ErbB1_ErbB2_Inh*kd2b);
  v19_v19: c3 + c503 -> c505; cyt*(c3*c503*k2b - c505*kd2b);
  v20_v20: c3 + ErbB3_Inh -> c507; cyt*(c3*ErbB3_Inh*k2b - c507*kd2b);
  v21_v21: c159 + ATP_1_2e9 -> c123; cyt*(StepMini*ATP_1_2e9*c159 - Step1*c123);
  v22_v22: c160 + ATP_1_2e9 -> c124; cyt*(StepMini*ATP_1_2e9*c160 - Step1*c124);
  v23_v23: c161 + ATP_1_2e9 -> c125; cyt*(StepMini*ATP_1_2e9*c161 - Step1*c125);
  v24_v24: c11 + ATP_1_2e9 -> c126; cyt*(StepMini*c11*ATP_1_2e9 - Step1*c126);
  v25_v25: c4 + ATP_1_2e9 -> _2_EGF_ErbB1_ATP_FullActive; cyt*(StepMini*c4*ATP_1_2e9 - Step1*_2_EGF_ErbB1_ATP_FullActive);
  v26_v26: c145 + ATP_1_2e9 -> c122; cyt*(StepMini*ATP_1_2e9*c145 - Step1*c122);
  v27_v27: c146 + ATP_1_2e9 -> c127; cyt*(StepMini*ATP_1_2e9*c146 - Step1*c127);
  v28_v28: c147 + ATP_1_2e9 -> c128; cyt*(StepMini*ATP_1_2e9*c147 - Step1*c128);
  v29_v29: ATP_1_2e9 + ErbB2_ErbB2_P -> ErbB2_ErbB2_P_ATP; cyt*(StepMini*ATP_1_2e9*ErbB2_ErbB2_P - Step1*ErbB2_ErbB2_P_ATP);
  v30_v30: ATP_1_2e9 + ErbB1_ErbB2__P_GAP_Grb2_Gab1 -> ErbB1_ErbB2__P_GAP_Grb2_Gab1_ATP; cyt*(StepMini*ATP_1_2e9*ErbB1_ErbB2__P_GAP_Grb2_Gab1 - Step1*ErbB1_ErbB2__P_GAP_Grb2_Gab1_ATP);
  v31_v31: ATP_1_2e9 + ErbB1_ErbB3__P_GAP_Grb2_Gab1 -> ErbB1_ErbB3__P_GAP_Grb2_Gab1_ATP; cyt*(StepMini*ATP_1_2e9*ErbB1_ErbB3__P_GAP_Grb2_Gab1 - Step1*ErbB1_ErbB3__P_GAP_Grb2_Gab1_ATP);
  v32_v32: ATP_1_2e9 + ErbB1_ErbB4__P_GAP_Grb2_Gab1 -> ErbB1_ErbB4__P_GAP_Grb2_Gab1_ATP; cyt*(StepMini*ATP_1_2e9*ErbB1_ErbB4__P_GAP_Grb2_Gab1 - Step1*ErbB1_ErbB4__P_GAP_Grb2_Gab1_ATP);
  v33_v33: ATP_1_2e9 + _2_ErbB2__P_GAP_Grb2_Gab1 -> _2_ErbB2__P_GAP_Grb2_Gab1_ATP; cyt*(StepMini*ATP_1_2e9*_2_ErbB2__P_GAP_Grb2_Gab1 - Step1*_2_ErbB2__P_GAP_Grb2_Gab1_ATP);
  v34_v34: ATP_1_2e9 + ErbB3_ErbB2__P_GAP_Grb2_Gab1 -> ErbB3_ErbB2__P_GAP_Grb2_Gab1_ATP; cyt*(StepMini*ATP_1_2e9*ErbB3_ErbB2__P_GAP_Grb2_Gab1 - Step1*ErbB3_ErbB2__P_GAP_Grb2_Gab1_ATP);
  v35_v35: ATP_1_2e9 + ErbB4_ErbB2__P_GAP_Grb2_Gab1 -> ErbB4_ErbB2__P_GAP_Grb2_Gab1_ATP; cyt*(StepMini*ATP_1_2e9*ErbB4_ErbB2__P_GAP_Grb2_Gab1 - Step1*ErbB4_ErbB2__P_GAP_Grb2_Gab1_ATP);
  v36_v36: ATP_1_2e9 + _2_EGF_ErbB1__P_GAP_Grb2_Gab1 -> _2_EGF_ErbB1__P_GAP_Grb2_Gab1_ATP; cyt*(StepMini*ATP_1_2e9*_2_EGF_ErbB1__P_GAP_Grb2_Gab1 - Step1*_2_EGF_ErbB1__P_GAP_Grb2_Gab1_ATP);
  v37_v37: ATP_1_2e9 + c516 -> HRG_ErbB3_ErbB1_ATP; cyt*(StepMini*ATP_1_2e9*c516 - Step1*HRG_ErbB3_ErbB1_ATP);
  v38_v38: ATP_1_2e9 + c517 -> HRG_ErbB4_ErbB1_ATP; cyt*(StepMini*ATP_1_2e9*c517 - Step1*HRG_ErbB4_ErbB1_ATP);
  v39_v39: ATP_1_2e9 + c345 -> c139; cyt*(StepMini*ATP_1_2e9*c345 - Step1*c139);
  v40_v40: ATP_1_2e9 + c355 -> c168; cyt*(StepMini*ATP_1_2e9*c355 - Step1*c168);
  v41_v41: ATP_1_2e9 + c421 -> c169; cyt*(StepMini*ATP_1_2e9*c421 - Step1*c169);
  v42_v42: ATP_1_2e9 + c422 -> c170; cyt*(StepMini*ATP_1_2e9*c422 - Step1*c170);
  v43_v43: c23 + c12 -> _2_EGF_ErbB1__P_GAP_Grb2_cPP; cyt*(c12*c23*k4 - _2_EGF_ErbB1__P_GAP_Grb2_cPP*kd4);
  v44_v44: c12 + c25 -> _2_EGF_ErbB1__P_GAP_Grb2_Sos_cPP; cyt*(c12*c25*k4 - _2_EGF_ErbB1__P_GAP_Grb2_Sos_cPP*kd4);
  v45_v45: c12 + c27 -> c89; cyt*(c12*c27*k4 - c89*kd4);
  v46_v46: c12 + c29 -> c90; cyt*(c12*c29*k4 - c90*kd4);
  v47_v47: c12 + c34 -> c91; cyt*(c12*c34*k4 - c91*kd4);
  v48_v48: c12 + c35 -> c92; cyt*(c12*c35*k4 - c92*kd4);
  v49_v49: c12 + c36 -> c93; cyt*(c12*c36*k4 - c93*kd4);
  v50_v50: c12 + c37 -> c94; cyt*(c12*c37*k4 - c94*kd4);
  v51_v52: c12 + c189 -> c195; cyt*(c12*c189*k4b - c195*kd4);
  v52_v53: c12 + c190 -> c196; cyt*(c12*c190*k4b - c196*kd4);
  v53_v54: c12 + c191 -> c197; cyt*(c12*c191*k4b - c197*kd4);
  v54_v55: c12 + c198 -> c204; cyt*(c12*c198*k4b - c204*kd4);
  v55_v56: c12 + c199 -> c205; cyt*(c12*c199*k4b - c205*kd4);
  v56_v57: c12 + c200 -> c206; cyt*(c12*c200*k4b - c206*kd4);
  v57_v58: c12 + c207 -> c213; cyt*(c12*c207*k4b - c213*kd4);
  v58_v59: c12 + c208 -> c214; cyt*(c12*c208*k4b - c214*kd4);
  v59_v60: c12 + c209 -> c215; cyt*(c12*c209*k4b - c215*kd4);
  v60_v61: c12 + c216 -> c222; cyt*(c12*c216*k4b - c222*kd4);
  v61_v62: c12 + c217 -> c223; cyt*(c12*c217*k4b - c223*kd4);
  v62_v63: c12 + c218 -> c224; cyt*(c12*c218*k4b - c224*kd4);
  v63_v64: c12 + c225 -> ErbB1_ErbB2__P_GAP_Grb2_cPP; cyt*(c12*c225*k4b - ErbB1_ErbB2__P_GAP_Grb2_cPP*kd4);
  v64_v65: c12 + c226 -> ErbB1_ErbB3__P_GAP_Grb2_cPP; cyt*(c12*c226*k4b - ErbB1_ErbB3__P_GAP_Grb2_cPP*kd4);
  v65_v66: c12 + c227 -> ErbB1_ErbB4__P_GAP_Grb2_cPP; cyt*(c12*c227*k4b - ErbB1_ErbB4__P_GAP_Grb2_cPP*kd4);
  v66_v67: c12 + c243 -> c249; cyt*(c12*c243*k4b - c249*kd4);
  v67_v68: c12 + c244 -> c250; cyt*(c12*c244*k4b - c250*kd4);
  v68_v69: c12 + c245 -> c251; cyt*(c12*c245*k4b - c251*kd4);
  v69_v70: c12 + c252 -> c258; cyt*(c12*c252*k4 - c258*kd4);
  v70_v71: c12 + c253 -> c259; cyt*(c12*c253*k4 - c259*kd4);
  v71_v72: c12 + c254 -> c260; cyt*(c12*c254*k4 - c260*kd4);
  v72_v75: c12 + c234 -> ErbB1_ErbB2__P_GAP_Grb2_Sos_cPP; cyt*(c12*c234*k4b - ErbB1_ErbB2__P_GAP_Grb2_Sos_cPP*kd4);
  v73_v76: c12 + c235 -> ErbB1_ErbB3__P_GAP_Grb2_Sos_cPP; cyt*(c12*c235*k4b - ErbB1_ErbB3__P_GAP_Grb2_Sos_cPP*kd4);
  v74_v77: c12 + c236 -> ErbB1_ErbB4__P_GAP_Grb2_Sos_cPP; cyt*(c12*c236*k4b - ErbB1_ErbB4__P_GAP_Grb2_Sos_cPP*kd4);
  v75_v78: c12 + c300 -> _2_ErbB2__P_GAP_Shc_P_Grb2_cPP; cyt*(c12*c300*k4b - _2_ErbB2__P_GAP_Shc_P_Grb2_cPP*kd4);
  v76_v79: c12 + c303 -> c304; cyt*(c12*c303*k4b - c304*kd4);
  v77_v80: c12 + c306 -> c307; cyt*(c12*c306*k4b - c307*kd4);
  v78_v81: c12 + c309 -> c310; cyt*(c12*c309*k4b - c310*kd4);
  v79_v82: c12 + c312 -> _2_ErbB2__P_GAP_Grb2_cPP; cyt*(c12*c312*k4b - _2_ErbB2__P_GAP_Grb2_cPP*kd4);
  v80_v83: c12 + c315 -> _2_ErbB2__P_GAP_Grb2_Sos_cPP; cyt*(c12*c315*k4b - _2_ErbB2__P_GAP_Grb2_Sos_cPP*kd4);
  v81_v84: c12 + c318 -> c319; cyt*(c12*c318*k4b - c319*kd4);
  v82_v85: c12 + c321 -> c322; cyt*(c12*c321*k4b - c322*kd4);
  v83_v87: c12 + c357 -> c358; cyt*(c12*c357*k4b - c358*kd4);
  v84_v88: c12 + c360 -> c361; cyt*(c12*c360*k4b - c361*kd4);
  v85_v89: c12 + c366 -> c367; cyt*(c12*c366*k4b - c367*kd4);
  v86_v90: c12 + c369 -> c370; cyt*(c12*c369*k4b - c370*kd4);
  v87_v91: c12 + c372 -> c373; cyt*(c12*c372*k4b - c373*kd4);
  v88_v92: c12 + c375 -> c376; cyt*(c12*c375*k4b - c376*kd4);
  v89_v93: c12 + c378 -> c379; cyt*(c12*c378*k4b - c379*kd4);
  v90_v94: c12 + c381 -> ErbB3_ErbB2__P_GAP_Grb2_cPP; cyt*(c12*c381*k4b - ErbB3_ErbB2__P_GAP_Grb2_cPP*kd4);
  v91_v95: c12 + c363 -> c364; cyt*(c12*c363*k4b - c364*kd4);
  v92_v96: c12 + c384 -> ErbB4_ErbB2__P_GAP_Grb2_cPP; cyt*(c12*c384*k4b - ErbB4_ErbB2__P_GAP_Grb2_cPP*kd4);
  v93_v97: c12 + c387 -> ErbB3_ErbB2__P_GAP_Grb2_Sos_cPP; cyt*(c12*c387*k4b - ErbB3_ErbB2__P_GAP_Grb2_Sos_cPP*kd4);
  v94_v98: c12 + c390 -> ErbB4_ErbB2__P_GAP_Grb2_Sos_cPP; cyt*(c12*c390*k4b - ErbB4_ErbB2__P_GAP_Grb2_Sos_cPP*kd4);
  v95_v99: c12 + c393 -> c394; cyt*(c12*c393*k4b - c394*kd4);
  v96_v100: c12 + c396 -> c397; cyt*(c12*c396*k4b - c397*kd4);
  v97_v101: c12 + c399 -> c400; cyt*(c12*c399*k4b - c400*kd4);
  v98_v102: c12 + c402 -> c403; cyt*(c12*c402*k4b - c403*kd4);
  v99_v103: c9 + c404 -> c403; cyt*(c9*c404*k5b - c403*kd5b);
  v100_v104: c9 + c401 -> c400; cyt*(c9*c401*k5b - c400*kd5b);
  v101_v105: c9 + c398 -> c397; cyt*(c9*c398*k5b - c397*kd5b);
  v102_v106: c9 + c395 -> c394; cyt*(c9*c395*k5b - c394*kd5b);
  v103_v107: c9 + c392 -> ErbB4_ErbB2__P_GAP_Grb2_Sos_cPP; cyt*(c9*c392*k5b - ErbB4_ErbB2__P_GAP_Grb2_Sos_cPP*kd5b);
  v104_v108: c9 + c389 -> ErbB3_ErbB2__P_GAP_Grb2_Sos_cPP; cyt*(c9*c389*k5b - ErbB3_ErbB2__P_GAP_Grb2_Sos_cPP*kd5b);
  v105_v109: c9 + c386 -> ErbB4_ErbB2__P_GAP_Grb2_cPP; cyt*(c9*c386*k5b - ErbB4_ErbB2__P_GAP_Grb2_cPP*kd5b);
  v106_v110: c9 + c365 -> c364; cyt*(c9*c365*k5b - c364*kd5b);
  v107_v111: c9 + c383 -> ErbB3_ErbB2__P_GAP_Grb2_cPP; cyt*(c9*c383*k5b - ErbB3_ErbB2__P_GAP_Grb2_cPP*kd5b);
  v108_v112: c9 + c380 -> c379; cyt*(c9*c380*k5b - c379*kd5b);
  v109_v113: c9 + c377 -> c376; cyt*(c9*c377*k5b - c376*kd5b);
  v110_v114: c9 + c374 -> c373; cyt*(c9*c374*k5b - c373*kd5b);
  v111_v115: c9 + c371 -> c370; cyt*(c9*c371*k5b - c370*kd5b);
  v112_v116: c9 + c368 -> c367; cyt*(c9*c368*k5b - c367*kd5b);
  v113_v117: c9 + c362 -> c361; cyt*(c9*c362*k5b - c361*kd5b);
  v114_v118: c9 + c359 -> c358; cyt*(c9*c359*k5b - c358*kd5b);
  v115_v120: c9 + c323 -> c322; cyt*(c9*c323*k5 - c322*kd5b);
  v116_v121: c9 + c320 -> c319; cyt*(c9*c320*k5 - c319*kd5b);
  v117_v122: c9 + c317 -> _2_ErbB2__P_GAP_Grb2_Sos_cPP; cyt*(c9*c317*k5 - _2_ErbB2__P_GAP_Grb2_Sos_cPP*kd5b);
  v118_v123: c9 + c314 -> _2_ErbB2__P_GAP_Grb2_cPP; cyt*(c9*c314*k5 - _2_ErbB2__P_GAP_Grb2_cPP*kd5b);
  v119_v124: c9 + c311 -> c310; cyt*(c9*c311*k5 - c310*kd5b);
  v120_v125: c9 + c308 -> c307; cyt*(c9*c308*k5 - c307*kd5b);
  v121_v126: c9 + c305 -> c304; cyt*(c9*c305*k5 - c304*kd5b);
  v122_v127: c9 + c302 -> _2_ErbB2__P_GAP_Shc_P_Grb2_cPP; cyt*(c9*c302*k5 - _2_ErbB2__P_GAP_Shc_P_Grb2_cPP*kd5b);
  v123_v128: c9 + c239 -> ErbB1_ErbB4__P_GAP_Grb2_Sos_cPP; cyt*(c9*c239*k5 - ErbB1_ErbB4__P_GAP_Grb2_Sos_cPP*kd5b);
  v124_v129: c9 + c238 -> ErbB1_ErbB3__P_GAP_Grb2_Sos_cPP; cyt*(c9*c238*k5 - ErbB1_ErbB3__P_GAP_Grb2_Sos_cPP*kd5b);
  v125_v130: c9 + c237 -> ErbB1_ErbB2__P_GAP_Grb2_Sos_cPP; cyt*(c9*c237*k5 - ErbB1_ErbB2__P_GAP_Grb2_Sos_cPP*kd5b);
  v126_v133: c9 + c257 -> c260; cyt*(c9*c257*k5 - c260*kd5b);
  v127_v134: c9 + c256 -> c259; cyt*(c9*c256*k5 - c259*kd5b);
  v128_v135: c9 + c255 -> c258; cyt*(c9*c255*k5 - c258*kd5b);
  v129_v136: c9 + c248 -> c251; cyt*(c9*c248*k5 - c251*kd5b);
  v130_v137: c9 + c247 -> c250; cyt*(c9*c247*k5 - c250*kd5b);
  v131_v138: c9 + c246 -> c249; cyt*(c9*c246*k5 - c249*kd5b);
  v132_v139: c9 + c230 -> ErbB1_ErbB4__P_GAP_Grb2_cPP; cyt*(c9*c230*k5 - ErbB1_ErbB4__P_GAP_Grb2_cPP*kd5b);
  v133_v140: c9 + c229 -> ErbB1_ErbB3__P_GAP_Grb2_cPP; cyt*(c9*c229*k5 - ErbB1_ErbB3__P_GAP_Grb2_cPP*kd5b);
  v134_v141: c9 + c228 -> ErbB1_ErbB2__P_GAP_Grb2_cPP; cyt*(c9*c228*k5 - ErbB1_ErbB2__P_GAP_Grb2_cPP*kd5b);
  v135_v142: c9 + c221 -> c224; cyt*(c9*c221*k5 - c224*kd5b);
  v136_v143: c9 + c220 -> c223; cyt*(c9*c220*k5 - c223*kd5b);
  v137_v144: c9 + c219 -> c222; cyt*(c9*c219*k5 - c222*kd5b);
  v138_v145: c9 + c212 -> c215; cyt*(c9*c212*k5 - c215*kd5b);
  v139_v146: c9 + c211 -> c214; cyt*(c9*c211*k5 - c214*kd5b);
  v140_v147: c9 + c210 -> c213; cyt*(c9*c210*k5 - c213*kd5b);
  v141_v148: c9 + c203 -> c206; cyt*(c9*c203*k5 - c206*kd5b);
  v142_v149: c9 + c202 -> c205; cyt*(c9*c202*k5 - c205*kd5b);
  v143_v150: c9 + c201 -> c204; cyt*(c9*c201*k5 - c204*kd5b);
  v144_v151: c9 + c194 -> c197; cyt*(c9*c194*k5 - c197*kd5b);
  v145_v152: c9 + c193 -> c196; cyt*(c9*c193*k5 - c196*kd5b);
  v146_v153: c9 + c192 -> c195; cyt*(c9*c192*k5 - c195*kd5b);
  v147_v155: c9 + c68 -> c94; cyt*(c9*c68*k5 - c94*kd5);
  v148_v156: c9 + c67 -> c93; cyt*(c9*c67*k5 - c93*kd5);
  v149_v157: c9 + c66 -> c92; cyt*(c9*c66*k5 - c92*kd5);
  v150_v158: c9 + c65 -> c91; cyt*(c9*c65*k5 - c91*kd5);
  v151_v159: c9 + c21 -> c90; cyt*(c9*c21*k5 - c90*kd5);
  v152_v160: c9 + c20 -> c89; cyt*(c9*c20*k5 - c89*kd5);
  v153_v161: c9 + c18 -> _2_EGF_ErbB1__P_GAP_Grb2_cPP; cyt*(c9*c18*k5 - _2_EGF_ErbB1__P_GAP_Grb2_cPP*kd5);
  v154_v162: c9 + c19 -> _2_EGF_ErbB1__P_GAP_Grb2_Sos_cPP; cyt*(c9*c19*k5 - _2_EGF_ErbB1__P_GAP_Grb2_Sos_cPP*kd5);
  v155_v163: c27 -> c20; cyt*(c27*k6 - Step5*c20);
  v156_v164: c2 -> c6; cyt*(c2*k6 - Step5*c6);
  v157_v165: c5 -> c8; cyt*(c5*k6 - Step5*c8);
  v158_v166: c15 -> c17; cyt*(c15*k6 - Step5*c17);
  v159_v167: c32 -> c63; cyt*(c32*k6 - Step5*c63);
  v160_v168: c33 -> c64; cyt*(c33*k6 - Step5*c64);
  v161_v169: c25 -> c19; cyt*(c25*k6 - Step5*c19);
  v162_v170: c29 -> c21; cyt*(c29*k6 - Step5*c21);
  v163_v171: c34 -> c65; cyt*(c34*k6 - Step5*c65);
  v164_v172: c35 -> c66; cyt*(c35*k6 - Step5*c66);
  v165_v173: c36 -> c67; cyt*(c36*k6 - Step5*c67);
  v166_v174: c37 -> c68; cyt*(c37*k6 - Step5*c68);
  v167_v175: c23 -> c18; cyt*(c23*k6 - Step5*c18);
  v168_v176: c140 -> c154; cyt*(c140*k6b - c154*kd6b);
  v169_v177: c141 -> c155; cyt*(c141*k6b - c155*kd6b);
  v170_v178: c143 -> c156; cyt*(c143*k6b - c156*kd6b);
  v171_v179: c347 -> c349; cyt*(c347*k6b - c349*kd6b);
  v172_v180: c348 -> c350; cyt*(c348*k6 - Step5*c350);
  v173_v181: c351 -> c353; cyt*(c351*k6b - c353*kd6b);
  v174_v182: c502 -> c508; cyt*(c502*k6b - c508*kd6b);
  v175_v183: c503 -> c512; cyt*(c503*k6b - c512*kd6b);
  v176_v184: c354 -> c356; cyt*(c354*k6b - c356*kd6b);
  v177_v185: c148 -> c162; cyt*(c148*k7 - c162*kd7);
  v178_v186: c149 -> c163; cyt*(c149*k7 - c163*kd7);
  v179_v187: c150 -> c164; cyt*(c150*k7 - c164*kd7);
  v180_v188: c289 -> c290; cyt*(c289*k7 - c290*kd7);
  v181_v189: c335 -> c337; cyt*(c335*k7 - c337*kd7);
  v182_v190: c336 -> c338; cyt*(c336*k7 - c338*kd7);
  v183_v191: c291 -> c293; cyt*(c291*k7 - c293*kd7);
  v184_v192: c294 -> c296; cyt*(c294*k7 - c296*kd7);
  v185_v193: c297 -> c299; cyt*(c297*k7 - c299*kd7);
  v186_v194: c162 + GAP -> c165; cyt*(GAP*c162*k8b - c165*kd8b);
  v187_v195: c163 + GAP -> c166; cyt*(GAP*c163*k8b - c166*kd8b);
  v188_v196: c164 + GAP -> c167; cyt*(GAP*c164*k8b - c167*kd8b);
  v189_v197: c8 + GAP -> c17; cyt*(c8*GAP*k8 - c17*kd8);
  v190_v198: c5 + GAP -> c15; cyt*(c5*GAP*k8 - c15*kd8);
  v191_v199: c148 + GAP -> c151; cyt*(GAP*c148*k8 - c151*kd8);
  v192_v200: c149 + GAP -> c152; cyt*(GAP*c149*k8b - c152*kd8b);
  v193_v201: c150 + GAP -> c153; cyt*(GAP*c150*k8b - c153*kd8b);
  v194_v202: c335 + GAP -> c341; cyt*(GAP*c335*k8 - c341*kd8);
  v195_v203: c336 + GAP -> c344; cyt*(GAP*c336*k8 - c344*kd8);
  v196_v204: c337 + GAP -> c343; cyt*(GAP*c337*k8 - c343*kd8);
  v197_v205: c338 + GAP -> c346; cyt*(GAP*c338*k8 - c346*kd8);
  v198_v206: c290 + GAP -> c293; cyt*(GAP*c290*k8 - c293*kd8);
  v199_v207: c289 + GAP -> c291; cyt*(GAP*c289*k8 - c291*kd8);
  v200_v208: c6 + EGF -> c10; cyt*(c6*EGF*k10b - c10*kd10);
  v201_v209: c154 -> c157; cyt*(-c157)*kd10;
  v202_v211: c9 -> c12; cyt*(c9*k15 - c12*kd15);
  v203_v212: c15 + Grb2 -> c23; cyt*(c15*Grb2*k16 - c23*kd63);
  v204_v213: Grb2 + Shc_P -> Shc_P_Grb2; cyt*(Grb2*Shc_P*k16 - Shc_P_Grb2*kd24);
  v205_v214: c33 + Grb2 -> c34; cyt*(Grb2*c33*k16 - c34*kd24);
  v206_v215: c17 + Grb2 -> c18; cyt*(c17*Grb2*k16 - c18*kd63);
  v207_v216: c64 + Grb2 -> c65; cyt*(Grb2*c64*k16 - c65*kd24);
  v208_v217: c151 + Grb2 -> c225; cyt*(Grb2*c151*k16 - c225*kd24);
  v209_v218: c152 + Grb2 -> c226; cyt*(Grb2*c152*k16 - c226*kd24);
  v210_v219: c153 + Grb2 -> c227; cyt*(Grb2*c153*k16 - c227*kd24);
  v211_v220: c165 + Grb2 -> c228; cyt*(Grb2*c165*k16 - c228*kd24);
  v212_v221: c166 + Grb2 -> c229; cyt*(Grb2*c166*k16 - c229*kd24);
  v213_v222: c167 + Grb2 -> c230; cyt*(Grb2*c167*k16 - c230*kd24);
  v214_v223: Grb2 + c180 -> c189; cyt*(Grb2*c180*k16 - c189*kd24);
  v215_v224: Grb2 + c181 -> c190; cyt*(Grb2*c181*k16 - c190*kd24);
  v216_v225: Grb2 + c182 -> c191; cyt*(Grb2*c182*k16 - c191*kd24);
  v217_v226: Grb2 + c183 -> c192; cyt*(Grb2*c183*k16 - c192*kd24);
  v218_v227: Grb2 + c184 -> c193; cyt*(Grb2*c184*k16 - c193*kd24);
  v219_v228: Grb2 + c185 -> c194; cyt*(Grb2*c185*k16 - c194*kd24);
  v220_v229: c297 + Grb2 -> c300; cyt*(Grb2*c297*k16 - c300*kd24);
  v221_v230: c299 + Grb2 -> c302; cyt*(Grb2*c299*k16 - c302*kd24);
  v222_v231: c291 + Grb2 -> c312; cyt*(Grb2*c291*k16 - c312*kd63);
  v223_v232: c293 + Grb2 -> c314; cyt*(Grb2*c293*k16 - c314*kd63);
  v224_v233: c351 + Grb2 -> c357; cyt*(Grb2*c351*k16 - c357*kd24);
  v225_v234: c353 + Grb2 -> c359; cyt*(Grb2*c353*k16 - c359*kd24);
  v226_v235: c354 + Grb2 -> c360; cyt*(Grb2*c354*k16 - c360*kd24);
  v227_v236: c356 + Grb2 -> c362; cyt*(Grb2*c356*k16 - c362*kd24);
  v228_v237: c341 + Grb2 -> c381; cyt*(Grb2*c341*k16 - c381*kd63);
  v229_v238: c343 + Grb2 -> c383; cyt*(Grb2*c343*k16 - c383*kd24);
  v230_v239: c344 + Grb2 -> c384; cyt*(Grb2*c344*k16 - c384*kd24);
  v231_v240: c346 + Grb2 -> c386; cyt*(Grb2*c346*k16 - c386*kd63);
  v232_v241: c381 + Sos -> c387; cyt*(Sos*c381*k17 - c387*kd17);
  v233_v242: c383 + Sos -> c389; cyt*(Sos*c383*k17 - c389*kd17);
  v234_v243: c384 + Sos -> c390; cyt*(Sos*c384*k17 - c390*kd17);
  v235_v244: c386 + Sos -> c392; cyt*(Sos*c386*k17 - c392*kd17);
  v236_v245: c312 + Sos -> c315; cyt*(Sos*c312*k17 - c315*kd17);
  v237_v246: c314 + Sos -> c317; cyt*(Sos*c314*k17 - c317*kd17);
  v238_v247: c18 + Sos -> c19; cyt*(c18*Sos*k17 - c19*kd17);
  v239_v248: c23 + Sos -> c25; cyt*(c23*Sos*k17 - c25*kd17);
  v240_v249: c225 + Sos -> c234; cyt*(Sos*c225*k17 - c234*kd17);
  v241_v250: c226 + Sos -> c235; cyt*(Sos*c226*k17 - c235*kd17);
  v242_v251: c227 + Sos -> c236; cyt*(Sos*c227*k17 - c236*kd17);
  v243_v252: c228 + Sos -> c237; cyt*(Sos*c228*k17 - c237*kd17);
  v244_v253: c229 + Sos -> c238; cyt*(Sos*c229*k17 - c238*kd17);
  v245_v254: c230 + Sos -> c239; cyt*(Sos*c230*k17 - c239*kd17);
  v246_v255: c25 + Ras_GDP -> c27; cyt*(c25*Ras_GDP*k18 - c27*kd18);
  v247_v256: c35 + Ras_GDP -> c36; cyt*(Ras_GDP*c35*k18 - c36*kd18);
  v248_v257: c19 + Ras_GDP -> c20; cyt*(c19*Ras_GDP*k18 - c20*kd18);
  v249_v258: c66 + Ras_GDP -> c67; cyt*(Ras_GDP*c66*k18 - c67*kd18);
  v250_v259: c198 + Ras_GDP -> c207; cyt*(Ras_GDP*c198*k18 - c207*kd18);
  v251_v260: c199 + Ras_GDP -> c208; cyt*(Ras_GDP*c199*k18 - c208*kd18);
  v252_v261: c200 + Ras_GDP -> c209; cyt*(Ras_GDP*c200*k18 - c209*kd18);
  v253_v262: c201 + Ras_GDP -> c210; cyt*(Ras_GDP*c201*k18 - c210*kd18);
  v254_v263: c202 + Ras_GDP -> c211; cyt*(Ras_GDP*c202*k18 - c211*kd18);
  v255_v264: c203 + Ras_GDP -> c212; cyt*(Ras_GDP*c203*k18 - c212*kd18);
  v256_v265: c234 + Ras_GDP -> c243; cyt*(Ras_GDP*c234*k18 - c243*kd18);
  v257_v266: c235 + Ras_GDP -> c244; cyt*(Ras_GDP*c235*k18 - c244*kd18);
  v258_v267: c236 + Ras_GDP -> c245; cyt*(Ras_GDP*c236*k18 - c245*kd18);
  v259_v268: c237 + Ras_GDP -> c246; cyt*(Ras_GDP*c237*k18 - c246*kd18);
  v260_v269: c238 + Ras_GDP -> c247; cyt*(Ras_GDP*c238*k18 - c247*kd18);
  v261_v270: c239 + Ras_GDP -> c248; cyt*(Ras_GDP*c239*k18 - c248*kd18);
  v262_v271: c303 + Ras_GDP -> c306; cyt*(Ras_GDP*c303*k18 - c306*kd18);
  v263_v272: c305 + Ras_GDP -> c308; cyt*(Ras_GDP*c305*k18 - c308*kd18);
  v264_v273: c315 + Ras_GDP -> c318; cyt*(Ras_GDP*c315*k18 - c318*kd18);
  v265_v274: c317 + Ras_GDP -> c320; cyt*(Ras_GDP*c317*k18 - c320*kd18);
  v266_v275: c366 + Ras_GDP -> c372; cyt*(Ras_GDP*c366*k18 - c372*kd18);
  v267_v276: c368 + Ras_GDP -> c374; cyt*(Ras_GDP*c368*k18 - c374*kd18);
  v268_v277: c363 + Ras_GDP -> c369; cyt*(Ras_GDP*c363*k18 - c369*kd18);
  v269_v278: c365 + Ras_GDP -> c371; cyt*(Ras_GDP*c365*k18 - c371*kd18);
  v270_v279: c390 + Ras_GDP -> c396; cyt*(Ras_GDP*c390*k18 - c396*kd18);
  v271_v280: c392 + Ras_GDP -> c398; cyt*(Ras_GDP*c392*k18 - c398*kd18);
  v272_v281: c387 + Ras_GDP -> c393; cyt*(Ras_GDP*c387*k18 - c393*kd18);
  v273_v282: c389 + Ras_GDP -> c395; cyt*(Ras_GDP*c389*k18 - c395*kd18);
  v274_v283: c387 + Ras_GTP -> c393; cyt*(Ras_GTP*c387*k19 - c393*kd19);
  v275_v284: c389 + Ras_GTP__i -> c395; cyt*(Ras_GTP__i*c389*k19 - c395*kd19);
  v276_v285: c390 + Ras_GTP -> c396; cyt*(Ras_GTP*c390*k19 - c396*kd19);
  v277_v286: c392 + Ras_GTP__i -> c398; cyt*(Ras_GTP__i*c392*k19 - c398*kd19);
  v278_v287: c315 + Ras_GTP -> c318; cyt*(Ras_GTP*c315*k19 - c318*kd19);
  v279_v288: c317 + Ras_GTP__i -> c320; cyt*(Ras_GTP__i*c317*k19 - c320*kd19);
  v280_v289: c303 + Ras_GTP -> c306; cyt*(Ras_GTP*c303*k19 - c306*kd19);
  v281_v290: c305 + Ras_GTP__i -> c308; cyt*(Ras_GTP__i*c305*k19 - c308*kd19);
  v282_v291: c66 + Ras_GTP__i -> c67; cyt*(c66*Ras_GTP__i*k19 - c67*kd19);
  v283_v292: c19 + Ras_GTP__i -> c20; cyt*(c19*Ras_GTP__i*k19 - c20*kd19);
  v284_v293: c35 + Ras_GTP -> c36; cyt*(Ras_GTP*c35*k19 - c36*kd19);
  v285_v294: c25 + Ras_GTP -> c27; cyt*(c25*Ras_GTP*k19 - c27*kd19);
  v286_v295: c198 + Ras_GTP -> c207; cyt*(Ras_GTP*c198*k19 - c207*kd19);
  v287_v296: c199 + Ras_GTP -> c208; cyt*(Ras_GTP*c199*k19 - c208*kd19);
  v288_v297: c200 + Ras_GTP -> c209; cyt*(Ras_GTP*c200*k19 - c209*kd19);
  v289_v298: c201 + Ras_GTP__i -> c210; cyt*(Ras_GTP__i*c201*k19 - c210*kd19);
  v290_v299: c202 + Ras_GTP__i -> c211; cyt*(Ras_GTP__i*c202*k19 - c211*kd19);
  v291_v300: c203 + Ras_GTP__i -> c212; cyt*(Ras_GTP__i*c203*k19 - c212*kd19);
  v292_v301: c234 + Ras_GTP -> c243; cyt*(Ras_GTP*c234*k19 - c243*kd19);
  v293_v302: c235 + Ras_GTP -> c244; cyt*(Ras_GTP*c235*k19 - c244*kd19);
  v294_v303: c236 + Ras_GTP -> c245; cyt*(Ras_GTP*c236*k19 - c245*kd19);
  v295_v304: c237 + Ras_GTP__i -> c246; cyt*(Ras_GTP__i*c237*k19 - c246*kd19);
  v296_v305: c238 + Ras_GTP__i -> c247; cyt*(Ras_GTP__i*c238*k19 - c247*kd19);
  v297_v306: c239 + Ras_GTP__i -> c248; cyt*(Ras_GTP__i*c239*k19 - c248*kd19);
  v298_v307: c363 + Ras_GTP -> c369; cyt*(Ras_GTP*c363*k19 - c369*kd19);
  v299_v308: c365 + Ras_GTP__i -> c371; cyt*(Ras_GTP__i*c365*k19 - c371*kd19);
  v300_v309: c366 + Ras_GTP -> c372; cyt*(Ras_GTP*c366*k19 - c372*kd19);
  v301_v310: c368 + Ras_GTP__i -> c374; cyt*(Ras_GTP__i*c368*k19 - c374*kd19);
  v302_v311: c366 + Ras_activated_GTP -> c378; cyt*(Ras_activated_GTP*c366*k20 - c378*kd20);
  v303_v312: c368 + Ras_activated_GTP__i -> c380; cyt*(Ras_activated_GTP__i*c368*k20 - c380*kd20);
  v304_v313: c363 + Ras_activated_GTP -> c375; cyt*(Ras_activated_GTP*c363*k20 - c375*kd20);
  v305_v314: c365 + Ras_activated_GTP__i -> c377; cyt*(Ras_activated_GTP__i*c365*k20 - c377*kd20);
  v306_v315: c234 + Ras_activated_GTP -> c252; cyt*(Ras_activated_GTP*c234*k20 - c252*kd20);
  v307_v316: c235 + Ras_activated_GTP -> c253; cyt*(Ras_activated_GTP*c235*k20 - c253*kd20);
  v308_v317: c236 + Ras_activated_GTP -> c254; cyt*(Ras_activated_GTP*c236*k20 - c254*kd20);
  v309_v318: c237 + Ras_activated_GTP__i -> c255; cyt*(Ras_activated_GTP__i*c237*k20 - c255*kd20);
  v310_v319: c238 + Ras_activated_GTP__i -> c256; cyt*(Ras_activated_GTP__i*c238*k20 - c256*kd20);
  v311_v320: c239 + Ras_activated_GTP__i -> c257; cyt*(Ras_activated_GTP__i*c239*k20 - c257*kd20);
  v312_v321: c25 + Ras_activated_GTP -> c29; cyt*(c25*Ras_activated_GTP*k20 - c29*kd20);
  v313_v322: c35 + Ras_activated_GTP -> c37; cyt*(c35*Ras_activated_GTP*k20 - c37*kd20);
  v314_v323: c19 + Ras_activated_GTP__i -> c21; cyt*(c19*Ras_activated_GTP__i*k20 - c21*kd20);
  v315_v324: c66 + Ras_activated_GTP__i -> c68; cyt*(c66*Ras_activated_GTP__i*k20 - c68*kd20);
  v316_v325: c198 + Ras_activated_GTP -> c216; cyt*(Ras_activated_GTP*c198*k20 - c216*kd20);
  v317_v326: c199 + Ras_activated_GTP -> c217; cyt*(Ras_activated_GTP*c199*k20 - c217*kd20);
  v318_v327: c200 + Ras_activated_GTP -> c218; cyt*(Ras_activated_GTP*c200*k20 - c218*kd20);
  v319_v328: c201 + Ras_activated_GTP__i -> c219; cyt*(Ras_activated_GTP__i*c201*k20 - c219*kd20);
  v320_v329: c202 + Ras_activated_GTP__i -> c220; cyt*(Ras_activated_GTP__i*c202*k20 - c220*kd20);
  v321_v330: c203 + Ras_activated_GTP__i -> c221; cyt*(Ras_activated_GTP__i*c203*k20 - c221*kd20);
  v322_v331: c303 + Ras_activated_GTP -> c309; cyt*(Ras_activated_GTP*c303*k20 - c309*kd20);
  v323_v332: c305 + Ras_activated_GTP__i -> c311; cyt*(Ras_activated_GTP__i*c305*k20 - c311*kd20);
  v324_v333: c315 + Ras_activated_GTP -> c321; cyt*(Ras_activated_GTP*c315*k20 - c321*kd20);
  v325_v334: c317 + Ras_activated_GTP__i -> c323; cyt*(Ras_activated_GTP__i*c317*k20 - c323*kd20);
  v326_v335: c390 + Ras_activated_GTP -> c402; cyt*(Ras_activated_GTP*c390*k20 - c402*kd20);
  v327_v336: c392 + Ras_activated_GTP__i -> c404; cyt*(Ras_activated_GTP__i*c392*k20 - c404*kd20);
  v328_v337: c387 + Ras_activated_GTP -> c399; cyt*(Ras_activated_GTP*c387*k20 - c399*kd20);
  v329_v338: c389 + Ras_activated_GTP__i -> c401; cyt*(Ras_activated_GTP__i*c389*k20 - c401*kd20);
  v330_v339: c315 + Ras_GDP -> c321; cyt*(Ras_GDP*c315*k21 - c321*kd21);
  v331_v340: c317 + Ras_GDP -> c323; cyt*(Ras_GDP*c317*k21 - c323*kd21);
  v332_v341: c303 + Ras_GDP -> c309; cyt*(Ras_GDP*c303*k21 - c309*kd21);
  v333_v342: c305 + Ras_GDP -> c311; cyt*(Ras_GDP*c305*k21 - c311*kd21);
  v334_v343: c66 + Ras_GDP -> c68; cyt*(Ras_GDP*c66*k21 - c68*kd21);
  v335_v344: c19 + Ras_GDP -> c21; cyt*(c19*Ras_GDP*k21 - c21*kd21);
  v336_v345: c35 + Ras_GDP -> c37; cyt*(Ras_GDP*c35*k21 - c37*kd21);
  v337_v346: c25 + Ras_GDP -> c29; cyt*(c25*Ras_GDP*k21 - c29*kd21);
  v338_v347: c198 + Ras_GDP -> c216; cyt*(Ras_GDP*c198*k21 - c216*kd21);
  v339_v348: c199 + Ras_GDP -> c217; cyt*(Ras_GDP*c199*k21 - c217*kd21);
  v340_v349: c200 + Ras_GDP -> c218; cyt*(Ras_GDP*c200*k21 - c218*kd21);
  v341_v350: c201 + Ras_GDP -> c219; cyt*(Ras_GDP*c201*k21 - c219*kd21);
  v342_v351: c202 + Ras_GDP -> c220; cyt*(Ras_GDP*c202*k21 - c220*kd21);
  v343_v352: c203 + Ras_GDP -> c221; cyt*(Ras_GDP*c203*k21 - c221*kd21);
  v344_v353: c234 + Ras_GDP -> c252; cyt*(Ras_GDP*c234*k21 - c252*kd21);
  v345_v354: c235 + Ras_GDP -> c253; cyt*(Ras_GDP*c235*k21 - c253*kd21);
  v346_v355: c236 + Ras_GDP -> c254; cyt*(Ras_GDP*c236*k21 - c254*kd21);
  v347_v356: c237 + Ras_GDP -> c255; cyt*(Ras_GDP*c237*k21 - c255*kd21);
  v348_v357: c238 + Ras_GDP -> c256; cyt*(Ras_GDP*c238*k21 - c256*kd21);
  v349_v358: c239 + Ras_GDP -> c257; cyt*(Ras_GDP*c239*k21 - c257*kd21);
  v350_v359: c363 + Ras_GDP -> c375; cyt*(Ras_GDP*c363*k21 - c375*kd21);
  v351_v360: c365 + Ras_GDP -> c377; cyt*(Ras_GDP*c365*k21 - c377*kd21);
  v352_v361: c366 + Ras_GDP -> c378; cyt*(Ras_GDP*c366*k21 - c378*kd21);
  v353_v362: c368 + Ras_GDP -> c380; cyt*(Ras_GDP*c368*k21 - c380*kd21);
  v354_v363: c387 + Ras_GDP -> c399; cyt*(Ras_GDP*c387*k21 - c399*kd21);
  v355_v364: c389 + Ras_GDP -> c401; cyt*(Ras_GDP*c389*k21 - c401*kd21);
  v356_v365: c390 + Ras_GDP -> c402; cyt*(Ras_GDP*c390*k21 - c402*kd21);
  v357_v366: c392 + Ras_GDP -> c404; cyt*(Ras_GDP*c392*k21 - c404*kd21);
  v358_v367: c15 + Shc -> c32; cyt*(c15*Shc*k22 - c32*kd22);
  v359_v368: c17 + Shc -> c63; cyt*(c17*Shc*k22 - c63*kd22);
  v360_v369: c151 + Shc -> c171; cyt*(Shc*c151*k22 - c171*kd22b);
  v361_v370: c152 + Shc -> c172; cyt*(Shc*c152*k22 - c172*kd22b);
  v362_v371: c153 + Shc -> c173; cyt*(Shc*c153*k22 - c173*kd22b);
  v363_v372: c165 + Shc -> c174; cyt*(Shc*c165*k22 - c174*kd22b);
  v364_v373: c166 + Shc -> c175; cyt*(Shc*c166*k22 - c175*kd22b);
  v365_v374: c167 + Shc -> c176; cyt*(Shc*c167*k22 - c176*kd22b);
  v366_v375: c291 + Shc -> c294; cyt*(Shc*c291*k22 - c294*kd22b);
  v367_v376: c293 + Shc -> c296; cyt*(Shc*c293*k22 - c296*kd22b);
  v368_v377: c341 + Shc -> c347; cyt*(Shc*c341*k22 - c347*kd22b);
  v369_v378: c343 + Shc -> c349; cyt*(Shc*c343*k22 - c349*kd22b);
  v370_v379: c344 + Shc -> c348; cyt*(Shc*c344*k22 - c348*kd22);
  v371_v380: c346 + Shc -> c350; cyt*(Shc*c346*k22 - c350*kd22);
  v372_v381: c347 -> c351; cyt*(c347*k23 - c351*kd23);
  v373_v382: c349 -> c353; cyt*(c349*k23 - c353*kd23);
  v374_v383: c348 -> c354; cyt*(c348*k23 - c354*kd23);
  v375_v384: c350 -> c356; cyt*(c350*k23 - c356*kd23);
  v376_v385: c294 -> c297; cyt*(c294*k23 - c297*kd23);
  v377_v386: c296 -> c299; cyt*(c296*k23 - c299*kd23);
  v378_v387: c63 -> c64; cyt*(c63*k23 - c64*kd23);
  v379_v388: c32 -> c33; cyt*(c32*k23 - c33*kd23);
  v380_v389: c171 -> c180; cyt*(c171*k23 - c180*kd23);
  v381_v390: c172 -> c181; cyt*(c172*k23 - c181*kd23);
  v382_v391: c173 -> c182; cyt*(c173*k23 - c182*kd23);
  v383_v392: c174 -> c183; cyt*(c174*k23 - c183*kd23);
  v384_v393: c175 -> c184; cyt*(c175*k23 - c184*kd23);
  v385_v394: c176 -> c185; cyt*(c176*k23 - c185*kd23);
  v386_v395: c34 + Sos -> c35; cyt*(Sos*c34*k25 - c35*kd25);
  v387_v396: c65 + Sos -> c66; cyt*(Sos*c65*k25 - c66*kd25);
  v388_v397: c189 + Sos -> c198; cyt*(Sos*c189*k25 - c198*kd25);
  v389_v398: c190 + Sos -> c199; cyt*(Sos*c190*k25 - c199*kd25);
  v390_v399: c191 + Sos -> c200; cyt*(Sos*c191*k25 - c200*kd25);
  v391_v400: c192 + Sos -> c201; cyt*(Sos*c192*k25 - c201*kd25);
  v392_v401: c193 + Sos -> c202; cyt*(Sos*c193*k25 - c202*kd25);
  v393_v402: c194 + Sos -> c203; cyt*(Sos*c194*k25 - c203*kd25);
  v394_v403: c300 + Sos -> c303; cyt*(Sos*c300*k25 - c303*kd25);
  v395_v404: c302 + Sos -> c305; cyt*(Sos*c302*k25 - c305*kd25);
  v396_v405: c360 + Sos -> c366; cyt*(Sos*c360*k25 - c366*kd25);
  v397_v406: c362 + Sos -> c368; cyt*(Sos*c362*k25 - c368*kd25);
  v398_v407: c357 + Sos -> c363; cyt*(Sos*c357*k25 - c363*kd25);
  v399_v408: c359 + Sos -> c365; cyt*(Sos*c359*k25 - c365*kd25);
  v400_v409: Ras_GTP + Raf -> Raf_Ras_GTP; cyt*(Ras_GTP*Raf*k28 - Raf_Ras_GTP*kd28);
  v401_v410: Ras_GTP__i + Raf -> Raf_Ras_GTP__i; cyt*(Raf*Ras_GTP__i*k28 - Raf_Ras_GTP__i*kd28);
  v402_v411: Ras_activated_GTP__i + Raf_P__i -> Raf_Ras_GTP__i; cyt*(Ras_activated_GTP__i*Raf_P__i*k29 - Raf_Ras_GTP__i*kd29);
  v403_v412: Ras_activated_GTP + Raf_P -> Raf_Ras_GTP; cyt*(Ras_activated_GTP*Raf_P*k29 - Raf_Ras_GTP*kd29);
  v404_v413: c15 + Shc_P_Grb2_Sos -> c35; cyt*(c15*Shc_P_Grb2_Sos*k32 - c35*kd32);
  v405_v414: c17 + Shc_P_Grb2_Sos -> c66; cyt*(c17*Shc_P_Grb2_Sos*k32 - c66*kd32);
  v406_v415: c151 + Shc_P_Grb2_Sos -> c198; cyt*(Shc_P_Grb2_Sos*c151*k32 - c198*kd32);
  v407_v416: c152 + Shc_P_Grb2_Sos -> c199; cyt*(Shc_P_Grb2_Sos*c152*k32 - c199*kd32);
  v408_v417: c153 + Shc_P_Grb2_Sos -> c200; cyt*(Shc_P_Grb2_Sos*c153*k32 - c200*kd32);
  v409_v418: c165 + Shc_P_Grb2_Sos -> c201; cyt*(Shc_P_Grb2_Sos*c165*k32 - c201*kd32);
  v410_v419: c166 + Shc_P_Grb2_Sos -> c202; cyt*(Shc_P_Grb2_Sos*c166*k32 - c202*kd32);
  v411_v420: c167 + Shc_P_Grb2_Sos -> c203; cyt*(Shc_P_Grb2_Sos*c167*k32 - c203*kd32);
  v412_v421: c291 + Shc_P_Grb2_Sos -> c303; cyt*(Shc_P_Grb2_Sos*c291*k32 - c303*kd32);
  v413_v422: c293 + Shc_P_Grb2_Sos -> c305; cyt*(Shc_P_Grb2_Sos*c293*k32 - c305*kd32);
  v414_v423: c341 + Shc_P_Grb2_Sos -> c363; cyt*(Shc_P_Grb2_Sos*c341*k32 - c363*kd32);
  v415_v424: c343 + Shc_P_Grb2_Sos -> c365; cyt*(Shc_P_Grb2_Sos*c343*k32 - c365*kd32);
  v416_v425: c344 + Shc_P_Grb2_Sos -> c366; cyt*(Shc_P_Grb2_Sos*c344*k32 - c366*kd32);
  v417_v426: c346 + Shc_P_Grb2_Sos -> c368; cyt*(Shc_P_Grb2_Sos*c346*k32 - c368*kd32);
  v418_v427: Shc_P + Grb2_Sos -> Shc_P_Grb2_Sos; cyt*(Grb2_Sos*Shc_P*k33 - Shc_P_Grb2_Sos*kd33);
  v419_v428: c15 + Grb2_Sos -> c25; cyt*(c15*Grb2_Sos*k34 - c25*kd34);
  v420_v429: c17 + Grb2_Sos -> c19; cyt*(c17*Grb2_Sos*k34 - c19*kd34);
  v421_v430: c151 + Grb2_Sos -> c234; cyt*(Grb2_Sos*c151*k34 - c234*kd34);
  v422_v431: c152 + Grb2_Sos -> c235; cyt*(Grb2_Sos*c152*k34 - c235*kd34);
  v423_v432: c153 + Grb2_Sos -> c236; cyt*(Grb2_Sos*c153*k34 - c236*kd34);
  v424_v433: c165 + Grb2_Sos -> c237; cyt*(Grb2_Sos*c165*k34 - c237*kd34);
  v425_v434: c166 + Grb2_Sos -> c238; cyt*(Grb2_Sos*c166*k34 - c238*kd34);
  v426_v435: c167 + Grb2_Sos -> c239; cyt*(Grb2_Sos*c167*k34 - c239*kd34);
  v427_v436: c291 + Grb2_Sos -> c315; cyt*(Grb2_Sos*c291*k34 - c315*kd34);
  v428_v437: c293 + Grb2_Sos -> c317; cyt*(Grb2_Sos*c293*k34 - c317*kd34);
  v429_v438: c341 + Grb2_Sos -> c387; cyt*(Grb2_Sos*c341*k34 - c387*kd34);
  v430_v439: c343 + Grb2_Sos -> c389; cyt*(Grb2_Sos*c343*k34 - c389*kd34);
  v431_v440: c344 + Grb2_Sos -> c390; cyt*(Grb2_Sos*c344*k34 - c390*kd34);
  v432_v441: c346 + Grb2_Sos -> c392; cyt*(Grb2_Sos*c346*k34 - c392*kd34);
  v433_v442: Grb2 + Sos -> Grb2_Sos; cyt*(Grb2*Sos*k35 - Grb2_Sos*kd35);
  v434_v443: Shc_P -> Shc; cyt*(Shc_P*k36 - Shc*kd36);
  v435_v444: c15 + Shc_P -> c33; cyt*(c15*Shc_P*k37 - c33*kd37);
  v436_v445: c15 + Shc_P_Grb2 -> c34; cyt*(c15*Shc_P_Grb2*k37 - c34*kd37);
  v437_v446: c17 + Shc_P -> c64; cyt*(c17*Shc_P*k37 - c64*kd37);
  v438_v447: c17 + Shc_P_Grb2 -> c65; cyt*(c17*Shc_P_Grb2*k37 - c65*kd37);
  v439_v448: c151 + Shc_P -> c180; cyt*(Shc_P*c151*k37 - c180*kd37);
  v440_v449: c152 + Shc_P -> c181; cyt*(Shc_P*c152*k37 - c181*kd37);
  v441_v450: c153 + Shc_P -> c182; cyt*(Shc_P*c153*k37 - c182*kd37);
  v442_v451: c165 + Shc_P -> c183; cyt*(Shc_P*c165*k37 - c183*kd37);
  v443_v452: c166 + Shc_P -> c184; cyt*(Shc_P*c166*k37 - c184*kd37);
  v444_v453: c167 + Shc_P -> c185; cyt*(Shc_P*c167*k37 - c185*kd37);
  v445_v454: c151 + Shc_P_Grb2 -> c189; cyt*(Shc_P_Grb2*c151*k37 - c189*kd37);
  v446_v455: c152 + Shc_P_Grb2 -> c190; cyt*(Shc_P_Grb2*c152*k37 - c190*kd37);
  v447_v456: c153 + Shc_P_Grb2 -> c191; cyt*(Shc_P_Grb2*c153*k37 - c191*kd37);
  v448_v457: c165 + Shc_P_Grb2 -> c192; cyt*(Shc_P_Grb2*c165*k37 - c192*kd37);
  v449_v458: c166 + Shc_P_Grb2 -> c193; cyt*(Shc_P_Grb2*c166*k37 - c193*kd37);
  v450_v459: c167 + Shc_P_Grb2 -> c194; cyt*(Shc_P_Grb2*c167*k37 - c194*kd37);
  v451_v460: c291 + Shc_P -> c297; cyt*(Shc_P*c291*k37 - c297*kd37);
  v452_v461: c293 + Shc_P -> c299; cyt*(Shc_P*c293*k37 - c299*kd37);
  v453_v462: c291 + Shc_P_Grb2 -> c300; cyt*(Shc_P_Grb2*c291*k37 - c300*kd37);
  v454_v463: c293 + Shc_P_Grb2 -> c302; cyt*(Shc_P_Grb2*c293*k37 - c302*kd37);
  v455_v464: c341 + Shc_P -> c351; cyt*(Shc_P*c341*k37 - c351*kd37);
  v456_v465: c343 + Shc_P -> c353; cyt*(Shc_P*c343*k37 - c353*kd37);
  v457_v466: c344 + Shc_P -> c354; cyt*(Shc_P*c344*k37 - c354*kd37);
  v458_v467: c346 + Shc_P -> c356; cyt*(Shc_P*c346*k37 - c356*kd37);
  v459_v468: c341 + Shc_P_Grb2 -> c357; cyt*(Shc_P_Grb2*c341*k37 - c357*kd37);
  v460_v469: c343 + Shc_P_Grb2 -> c359; cyt*(Shc_P_Grb2*c343*k37 - c359*kd37);
  v461_v470: c344 + Shc_P_Grb2 -> c360; cyt*(Shc_P_Grb2*c344*k37 - c360*kd37);
  v462_v471: c346 + Shc_P_Grb2 -> c362; cyt*(Shc_P_Grb2*c346*k37 - c362*kd37);
  v463_v472: Shc_P_Grb2 + Sos -> Shc_P_Grb2_Sos; cyt*(Sos*Shc_P_Grb2*k40 - Shc_P_Grb2_Sos*kd40);
  v464_v473: c33 + Grb2_Sos -> c35; cyt*(Grb2_Sos*c33*k41 - c35*kd41);
  v465_v474: c64 + Grb2_Sos -> c66; cyt*(Grb2_Sos*c64*k41 - c66*kd41);
  v466_v475: c180 + Grb2_Sos -> c198; cyt*(Grb2_Sos*c180*k41 - c198*kd41);
  v467_v476: c181 + Grb2_Sos -> c199; cyt*(Grb2_Sos*c181*k41 - c199*kd41);
  v468_v477: c182 + Grb2_Sos -> c200; cyt*(Grb2_Sos*c182*k41 - c200*kd41);
  v469_v478: c183 + Grb2_Sos -> c201; cyt*(Grb2_Sos*c183*k41 - c201*kd41);
  v470_v479: c184 + Grb2_Sos -> c202; cyt*(Grb2_Sos*c184*k41 - c202*kd41);
  v471_v480: c185 + Grb2_Sos -> c203; cyt*(Grb2_Sos*c185*k41 - c203*kd41);
  v472_v481: c297 + Grb2_Sos -> c303; cyt*(Grb2_Sos*c297*k41 - c303*kd41);
  v473_v482: c299 + Grb2_Sos -> c305; cyt*(Grb2_Sos*c299*k41 - c305*kd41);
  v474_v483: c351 + Grb2_Sos -> c363; cyt*(Grb2_Sos*c351*k41 - c363*kd41);
  v475_v484: c353 + Grb2_Sos -> c365; cyt*(Grb2_Sos*c353*k41 - c365*kd41);
  v476_v485: c354 + Grb2_Sos -> c366; cyt*(Grb2_Sos*c354*k41 - c366*kd41);
  v477_v486: c356 + Grb2_Sos -> c368; cyt*(Grb2_Sos*c356*k41 - c368*kd41);
  v478_v487: Raf_P__i + Pase1 -> Raf_P_Pase1__i; cyt*(Pase1*Raf_P__i*k42 - Raf_P_Pase1__i*kd42);
  v479_v488: Raf_P + Pase1 -> Raf_P_Pase1; cyt*(Pase1*Raf_P*k42 - Raf_P_Pase1*kd42);
  v480_v489: Raf + Pase1 -> Raf_P_Pase1; cyt*(Raf*Pase1*k43 - Raf_P_Pase1*kd43);
  v481_v490: Raf + Pase1 -> Raf_P_Pase1__i; cyt*(Raf*Pase1*k43 - Raf_P_Pase1__i*kd43);
  v482_v491: Raf_P__i + MEK_P__i -> MEK_P_Raf_P__i; cyt*(Raf_P__i*MEK_P__i*k44 - MEK_P_Raf_P__i*kd52);
  v483_v492: Raf_P__i + MEK -> MEK_Raf_P__i; cyt*(MEK*Raf_P__i*k44 - MEK_Raf_P__i*kd52);
  v484_v493: Raf_P + MEK -> MEK_Raf_P; cyt*(Raf_P*MEK*k44 - MEK_Raf_P*kd52);
  v485_v494: Raf_P + MEK_P -> MEK_P_Raf_P; cyt*(Raf_P*MEK_P*k44 - MEK_P_Raf_P*kd52);
  v486_v495: Raf_P + MEK_P -> MEK_Raf_P; cyt*(Raf_P*MEK_P*k45 - MEK_Raf_P*kd45);
  v487_v496: Raf_P__i + MEK_P__i -> MEK_Raf_P__i; cyt*(Raf_P__i*MEK_P__i*k45 - MEK_Raf_P__i*kd45);
  v488_v497: Raf_P + MEK_PP -> MEK_P_Raf_P; cyt*(Raf_P*MEK_PP*k47 - MEK_P_Raf_P*kd47);
  v489_v498: Raf_P__i + MEK_PP__i -> MEK_P_Raf_P__i; cyt*(Raf_P__i*MEK_PP__i*k47 - MEK_P_Raf_P__i*kd47);
  v490_v499: MEK_PP__i + Pase2 -> MEK_PP_Pase2__i; cyt*(Pase2*MEK_PP__i*k48 - MEK_PP_Pase2__i*kd48);
  v491_v500: MEK_PP + Pase2 -> MEK_PP_Pase2; cyt*(MEK_PP*Pase2*k48 - MEK_PP_Pase2*kd48);
  v492_v501: MEK_P + Pase2 -> MEK_PP_Pase2; cyt*(MEK_P*Pase2*k49 - MEK_PP_Pase2*kd49);
  v493_v502: MEK + Pase2 -> MEK_P_Pase2; cyt*(MEK*Pase2*k49 - MEK_P_Pase2*kd49);
  v494_v503: MEK + Pase2 -> MEK_P_Pase2__i; cyt*(MEK*Pase2*k49 - MEK_P_Pase2__i*kd49);
  v495_v504: MEK_P__i + Pase2 -> MEK_PP_Pase2__i; cyt*(Pase2*MEK_P__i*k49 - MEK_PP_Pase2__i*kd49);
  v496_v505: MEK_P__i + Pase2 -> MEK_P_Pase2__i; cyt*(Pase2*MEK_P__i*k50 - MEK_P_Pase2__i*kd50);
  v497_v506: MEK_P + Pase2 -> MEK_P_Pase2; cyt*(MEK_P*Pase2*k50 - MEK_P_Pase2*kd50);
  v498_v507: MEK_PP + ERK -> ERK_MEK_PP; cyt*(MEK_PP*ERK*k52 - ERK_MEK_PP*kd44);
  v499_v508: MEK_PP + ERK_P -> ERK_P_MEK_PP; cyt*(MEK_PP*ERK_P*k52 - ERK_P_MEK_PP*kd44);
  v500_v509: MEK_PP__i + ERK -> MEK_PP_ERK; cyt*(ERK*MEK_PP__i*k52 - MEK_PP_ERK*kd44);
  v501_v510: MEK_PP__i + ERK_P__i -> MEK_PP_ERK_P; cyt*(MEK_PP__i*ERK_P__i*k52 - MEK_PP_ERK_P*kd44);
  v502_v511: MEK_PP__i + ERK_P__i -> MEK_PP_ERK; cyt*(MEK_PP__i*ERK_P__i*k53 - MEK_PP_ERK*kd53);
  v503_v512: MEK_PP + ERK_P -> ERK_MEK_PP; cyt*(MEK_PP*ERK_P*k53 - ERK_MEK_PP*kd53);
  v504_v513: MEK_PP + ERK_PP -> ERK_P_MEK_PP; cyt*(MEK_PP*ERK_PP*k55 - ERK_P_MEK_PP*kd55);
  v505_v514: MEK_PP__i + ERK_PP__i -> MEK_PP_ERK_P; cyt*(MEK_PP__i*ERK_PP__i*k55 - MEK_PP_ERK_P*kd55);
  v506_v515: ERK_PP + Pase3 -> ERK_PP_Pase3; cyt*(ERK_PP*Pase3*k56 - ERK_PP_Pase3*kd56);
  v507_v516: ERK_PP__i + Pase3 -> ERK_PP_Pase3__i; cyt*(Pase3*ERK_PP__i*k56 - ERK_PP_Pase3__i*kd56);
  v508_v517: ERK_P__i + Pase3 -> ERK_PP_Pase3__i; cyt*(Pase3*ERK_P__i*k57 - ERK_PP_Pase3__i*kd57);
  v509_v518: ERK_P + Pase3 -> ERK_PP_Pase3; cyt*(ERK_P*Pase3*k57 - ERK_PP_Pase3*kd57);
  v510_v519: ERK + Pase3 -> ERK_P_Pase3; cyt*(ERK*Pase3*k57 - ERK_P_Pase3*kd57);
  v511_v520: ERK + Pase3 -> ERK_P_Pase3__i; cyt*(ERK*Pase3*k57 - ERK_P_Pase3__i*kd57);
  v512_v521: ERK_P + Pase3 -> ERK_P_Pase3; cyt*(ERK_P*Pase3*k58 - ERK_P_Pase3*kd58);
  v513_v522: ERK_P__i + Pase3 -> ERK_P_Pase3__i; cyt*(Pase3*ERK_P__i*k58 - ERK_P_Pase3__i*kd58);
  v514_v523: c6 -> R_degraded; cyt*(c6*k60 - R_degraded*kd60);
  v515_v524: c11 -> R_degraded; cyt*(c11*k60 - R_degraded*kd60);
  v516_v525: c17 -> R_degraded; cyt*(c17*k60 - R_degraded*kd60);
  v517_v526: c18 -> R_degraded; cyt*(c18*k60 - R_degraded*kd60);
  v518_v527: c19 -> R_degraded; cyt*(c19*k60 - R_degraded*kd60);
  v519_v528: c20 -> R_degraded; cyt*(c20*k60 - R_degraded*kd60);
  v520_v529: c21 -> R_degraded; cyt*(c21*k60 - R_degraded*kd60);
  v521_v530: c63 -> R_degraded; cyt*(c63*k60 - R_degraded*kd60);
  v522_v531: c64 -> R_degraded; cyt*(c64*k60 - R_degraded*kd60);
  v523_v532: c65 -> R_degraded; cyt*(c65*k60 - R_degraded*kd60);
  v524_v533: c66 -> R_degraded; cyt*(c66*k60 - R_degraded*kd60);
  v525_v534: c67 -> R_degraded; cyt*(c67*k60 - R_degraded*kd60);
  v526_v535: c68 -> R_degraded; cyt*(c68*k60 - R_degraded*kd60);
  v527_v537: c154 -> R_degraded; cyt*(c154*k60b - R_degraded*kd60b);
  v528_v538: c155 -> R_degraded; cyt*(c155*k60b - R_degraded*kd60b);
  v529_v539: c156 -> R_degraded; cyt*(c156*k60b - R_degraded*kd60b);
  v530_v540: c192 -> R_degraded; cyt*(c192*k60b - R_degraded*kd60);
  v531_v541: c193 -> R_degraded; cyt*(c193*k60b - R_degraded*kd60);
  v532_v542: c194 -> R_degraded; cyt*(c194*k60b - R_degraded*kd60);
  v533_v543: c201 -> R_degraded; cyt*(c201*k60b - R_degraded*kd60);
  v534_v544: c202 -> R_degraded; cyt*(c202*k60b - R_degraded*kd60);
  v535_v545: c203 -> R_degraded; cyt*(c203*k60b - R_degraded*kd60);
  v536_v546: c210 -> R_degraded; cyt*(c210*k60b - R_degraded*kd60);
  v537_v547: c211 -> R_degraded; cyt*(c211*k60b - R_degraded*kd60);
  v538_v548: c212 -> R_degraded; cyt*(c212*k60b - R_degraded*kd60);
  v539_v549: c219 -> R_degraded; cyt*(c219*k60b - R_degraded*kd60);
  v540_v550: c220 -> R_degraded; cyt*(c220*k60b - R_degraded*kd60);
  v541_v551: c221 -> R_degraded; cyt*(c221*k60b - R_degraded*kd60);
  v542_v552: c228 -> R_degraded; cyt*(c228*k60b - R_degraded*kd60);
  v543_v553: c229 -> R_degraded; cyt*(c229*k60b - R_degraded*kd60);
  v544_v554: c230 -> R_degraded; cyt*(c230*k60b - R_degraded*kd60);
  v545_v555: c246 -> R_degraded; cyt*(c246*k60b - R_degraded*kd60);
  v546_v556: c247 -> R_degraded; cyt*(c247*k60b - R_degraded*kd60);
  v547_v557: c248 -> R_degraded; cyt*(c248*k60b - R_degraded*kd60);
  v548_v558: c255 -> R_degraded; cyt*(c255*k60b - R_degraded*kd60);
  v549_v559: c256 -> R_degraded; cyt*(c256*k60b - R_degraded*kd60);
  v550_v560: c257 -> R_degraded; cyt*(c257*k60b - R_degraded*kd60);
  v551_v563: c237 -> R_degraded; cyt*(c237*k60b - R_degraded*kd60);
  v552_v564: c238 -> R_degraded; cyt*(c238*k60b - R_degraded*kd60);
  v553_v565: c239 -> R_degraded; cyt*(c239*k60b - R_degraded*kd60);
  v554_v566: _2_ErbB2 -> R_degraded; cyt*(_2_ErbB2*k60b - R_degraded*kd60);
  v555_v567: c293 -> R_degraded; cyt*(c293*k60b - R_degraded*kd60);
  v556_v568: c296 -> R_degraded; cyt*(c296*k60b - R_degraded*kd60);
  v557_v569: c299 -> R_degraded; cyt*(c299*k60b - R_degraded*kd60);
  v558_v570: c302 -> R_degraded; cyt*(c302*k60b - R_degraded*kd60);
  v559_v572: c308 -> R_degraded; cyt*(c308*k60b - R_degraded*kd60);
  v560_v573: c311 -> R_degraded; cyt*(c311*k60b - R_degraded*kd60);
  v561_v574: c314 -> R_degraded; cyt*(c314*k60b - R_degraded*kd60);
  v562_v575: c317 -> R_degraded; cyt*(c317*k60b - R_degraded*kd60);
  v563_v576: c320 -> R_degraded; cyt*(c320*k60b - R_degraded*kd60);
  v564_v577: c323 -> R_degraded; cyt*(c323*k60b - R_degraded*kd60);
  v565_v579: c349 -> R_degraded; cyt*(c349*k60c - R_degraded*kd60);
  v566_v580: c350 -> R_degraded; cyt*(c350*k60c - R_degraded*kd60);
  v567_v581: c353 -> R_degraded; cyt*(c353*k60c - R_degraded*kd60);
  v568_v582: c356 -> R_degraded; cyt*(c356*k60c - R_degraded*kd60);
  v569_v583: c359 -> R_degraded; cyt*(c359*k60c - R_degraded*kd60);
  v570_v584: c368 -> R_degraded; cyt*(c368*k60c - R_degraded*kd60);
  v571_v585: c362 -> R_degraded; cyt*(c362*k60c - R_degraded*kd60);
  v572_v586: c365 -> R_degraded; cyt*(c365*k60c - R_degraded*kd60);
  v573_v587: c377 -> R_degraded; cyt*(c377*k60c - R_degraded*kd60);
  v574_v588: c380 -> R_degraded; cyt*(c380*k60c - R_degraded*kd60);
  v575_v589: c386 -> R_degraded; cyt*(c386*k60c - R_degraded*kd60);
  v576_v590: c383 -> R_degraded; cyt*(c383*k60c - R_degraded*kd60);
  v577_v591: c389 -> R_degraded; cyt*(c389*k60c - R_degraded*kd60);
  v578_v592: c392 -> R_degraded; cyt*(c392*k60c - R_degraded*kd60);
  v579_v593: c371 -> R_degraded; cyt*(c371*k60c - R_degraded*kd60);
  v580_v594: c374 -> R_degraded; cyt*(c374*k60c - R_degraded*kd60);
  v581_v595: c395 -> R_degraded; cyt*(c395*k60c - R_degraded*kd60);
  v582_v596: c398 -> R_degraded; cyt*(c398*k60c - R_degraded*kd60);
  v583_v597: c401 -> R_degraded; cyt*(c401*k60c - R_degraded*kd60);
  v584_v598: c404 -> R_degraded; cyt*(c404*k60c - R_degraded*kd60);
  v585_v599: EGF -> EGF_degraded; cyt*(EGF*k61 - EGF_degraded*kd61);
  v586_v600: c159 -> R_degraded; cyt*(c159*k62b - R_degraded*kd60b);
  v587_v601: c160 -> R_degraded; cyt*(c160*k62b - R_degraded*kd60b);
  v588_v602: c161 -> R_degraded; cyt*(c161*k62b - R_degraded*kd60b);
  v589_v603: c518 -> R_degraded; cyt*(c518*k62b - R_degraded*kd60b);
  v590_v604: c519 -> R_degraded; cyt*(c519*k62b - R_degraded*kd60b);
  v591_v605: c421 -> R_degraded; cyt*(c421*k62b - R_degraded*kd60b);
  v592_v606: c422 -> R_degraded; cyt*(c422*k62b - R_degraded*kd60b);
  v593_v607: ErbB3_ErbB2 -> R_degraded; cyt*(ErbB3_ErbB2*k62b - R_degraded*kd60b);
  v594_v608: ErbB4_ErbB2 -> R_degraded; cyt*(ErbB4_ErbB2*k62b - R_degraded*kd60b);
  v595_v609: c25 + ERK_PP -> c95; cyt*(c25*ERK_PP*k64 - c95*kd64);
  v596_v610: c19 + ERK_PP__i -> c96; cyt*(c19*ERK_PP__i*k64 - c96*kd64);
  v597_v611: c35 + ERK_PP -> c97; cyt*(c35*ERK_PP*k64 - c97*kd64);
  v598_v612: c66 + ERK_PP__i -> c98; cyt*(c66*ERK_PP__i*k64 - c98*kd64);
  v599_v613: Sos + ERK_PP -> ERK_PP_Sos; cyt*(Sos*ERK_PP*k64 - ERK_PP_Sos*kd64);
  v600_v614: Sos + ERK_PP__i -> ERK_PP_Sos__i; cyt*(Sos*ERK_PP__i*k64 - ERK_PP_Sos__i*kd64);
  v601_v615: ERK_PP + c99 -> c95; cyt*(ERK_PP*c99*k65 - c95*kd65);
  v602_v616: ERK_PP + c419 -> c97; cyt*(ERK_PP*c419*k65 - c97*kd65);
  v603_v617: ERK_PP + Sos_P -> ERK_PP_Sos; cyt*(ERK_PP*Sos_P*k65 - ERK_PP_Sos*kd65);
  v604_v618: ERK_PP__i + c100 -> c96; cyt*(ERK_PP__i*c100*k65 - c96*kd65);
  v605_v619: ERK_PP__i + c420 -> c98; cyt*(ERK_PP__i*c420*k65 - c98*kd65);
  v606_v620: ERK_PP__i + Sos_P -> ERK_PP_Sos__i; cyt*(ERK_PP__i*Sos_P*k65 - ERK_PP_Sos__i*kd65);
  v607_v621: c287 + _2_EGF_ErbB1__P_GAP_Grb2_Gab1_P -> c104; cyt*(c287*_2_EGF_ErbB1__P_GAP_Grb2_Gab1_P*k66 - c104*kd66);
  v608_v622: c287 + c447 -> c263; cyt*(c287*c447*k66 - c263*kd66);
  v609_v623: c287 + ErbB1_ErbB2__P_GAP_Grb2_Gab1_P -> c261; cyt*(c287*ErbB1_ErbB2__P_GAP_Grb2_Gab1_P*k66 - c261*kd66);
  v610_v624: c287 + c446 -> c262; cyt*(c287*c446*k67 - c262*kd67);
  v611_v625: c287 + _2_ErbB2__P_GAP_Grb2_Gab1_P -> _2_ErbB2__P_GAP_Grb2_Gab1_P_PI3K; cyt*(c287*_2_ErbB2__P_GAP_Grb2_Gab1_P*k67 - _2_ErbB2__P_GAP_Grb2_Gab1_P_PI3K*kd67);
  v612_v626: c287 + ErbB3_ErbB2__P_GAP_Grb2_Gab1_P -> c405; cyt*(c287*ErbB3_ErbB2__P_GAP_Grb2_Gab1_P*k67 - c405*kd67);
  v613_v627: c287 + ErbB4_ErbB2__P_GAP_Grb2_Gab1_P -> c408; cyt*(c287*ErbB4_ErbB2__P_GAP_Grb2_Gab1_P*k66 - c408*kd66);
  v614_v628: c405 + PIP3 -> c453; cyt*(PIP3*c405*k68 - c453*kd68b);
  v615_v629: _2_ErbB2__P_GAP_Grb2_Gab1_P_PI3K + PIP3 -> c452; cyt*(PIP3*_2_ErbB2__P_GAP_Grb2_Gab1_P_PI3K*k68 - c452*kd68);
  v616_v630: c104 + PIP3 -> c448; cyt*(c104*PIP3*k68 - c448*kd68);
  v617_v631: c261 + PIP3 -> c449; cyt*(PIP3*c261*k68 - c449*kd68);
  v618_v632: c262 + PIP3 -> c450; cyt*(PIP3*c262*k68 - c450*kd68);
  v619_v633: c263 + PIP3 -> c451; cyt*(PIP3*c263*k68 - c451*kd68);
  v620_v634: PIP3 + c453 -> c467; cyt*(PIP3*c453*k68 - c467*kd68b);
  v621_v635: PIP3 + c467 -> c468; cyt*(PIP3*c467*k68 - c468*kd68b);
  v622_v636: PIP3 + c468 -> c469; cyt*(PIP3*c468*k68 - c469*kd68b);
  v623_v637: PIP3 + c469 -> c470; cyt*(PIP3*c469*k68 - c470*kd68b);
  v624_v638: PIP3 + c470 -> c471; cyt*(PIP3*c470*k68 - c471*kd68b);
  v625_v639: PIP3 + AKT -> PIP3_AKT; cyt*(PIP3*AKT*k69 - PIP3_AKT*kd69);
  v626_v640: PIP3 + AKT_P -> PIP3_AKT_P; cyt*(PIP3*AKT_P*k69 - PIP3_AKT_P*kd69);
  v627_v641: PIP3_AKT_P + PDK1 -> PIP3_AKT_P_PDK1; cyt*(PDK1*PIP3_AKT_P*k70 - PIP3_AKT_P_PDK1*kd70);
  v628_v642: PIP3_AKT + PDK1 -> PIP3_AKT_PDK1; cyt*(PIP3_AKT*PDK1*k70 - PIP3_AKT_PDK1*kd70);
  v629_v643: AKT_P + PIP3_PDK1 -> PIP3_AKT_PDK1; cyt*(PIP3_PDK1*AKT_P*k71 - PIP3_AKT_PDK1*kd71);
  v630_v644: PIP3_PDK1 + AKT_P_P -> PIP3_AKT_P_PDK1; cyt*(PIP3_PDK1*AKT_P_P*k72 - PIP3_AKT_P_PDK1*kd72);
  v631_v645: AKT_P_P + Pase4 -> AKT_P_P_Pase4; cyt*(Pase4*AKT_P_P*k74 - AKT_P_P_Pase4*kd74);
  v632_v646: AKT_P + Pase4 -> AKT_P_Pase4; cyt*(AKT_P*Pase4*k73 - AKT_P_Pase4*kd73);
  v633_v647: AKT + Pase4 -> AKT_P_Pase4; cyt*(AKT*Pase4*k75 - AKT_P_Pase4*kd75);
  v634_v648: AKT_P + Pase4 -> AKT_P_P_Pase4; cyt*(AKT_P*Pase4*k75 - AKT_P_P_Pase4*kd75);
  v635_v649: PIP3 + PDK1 -> PIP3_PDK1; cyt*(PIP3*PDK1*k76 - PIP3_PDK1*kd76);
  v636_v650: c163 + RTK_Pase -> ErbB1_ErbB3__P_RTK_Pase; cyt*(c163*RTK_Pase*k94b - ErbB1_ErbB3__P_RTK_Pase*kd94);
  v637_v651: c164 + RTK_Pase -> ErbB1_ErbB4__P_RTK_Pase; cyt*(c164*RTK_Pase*k94b - ErbB1_ErbB4__P_RTK_Pase*kd94);
  v638_v652: c8 + RTK_Pase -> _2_EGF_ErbB1__P_RTK_Pase; cyt*(c8*RTK_Pase*k94 - _2_EGF_ErbB1__P_RTK_Pase*kd94);
  v639_v653: c290 + RTK_Pase -> _2_ErbB2__P_RTK_Pase; cyt*(RTK_Pase*c290*k94 - _2_ErbB2__P_RTK_Pase*kd94);
  v640_v654: c337 + RTK_Pase -> ErbB2_ErbB3__P_RTK_Pase; cyt*(RTK_Pase*c337*k94 - ErbB2_ErbB3__P_RTK_Pase*kd94);
  v641_v655: c338 + RTK_Pase -> ErbB2_ErbB4__P_RTK_Pase; cyt*(RTK_Pase*c338*k94 - ErbB2_ErbB4__P_RTK_Pase*kd94);
  v642_v656: c162 + RTK_Pase -> ErbB1_ErbB2__P_RTK_Pase; cyt*(c162*RTK_Pase*k94 - ErbB1_ErbB2__P_RTK_Pase*kd94);
  v643_v657: c159 + RTK_Pase -> ErbB1_ErbB2__P_RTK_Pase; cyt*(c159*RTK_Pase*k95 - ErbB1_ErbB2__P_RTK_Pase*kd95);
  v644_v658: c160 + RTK_Pase -> ErbB1_ErbB3__P_RTK_Pase; cyt*(c160*RTK_Pase*k95 - ErbB1_ErbB3__P_RTK_Pase*kd95);
  v645_v659: c161 + RTK_Pase -> ErbB1_ErbB4__P_RTK_Pase; cyt*(c161*RTK_Pase*k95 - ErbB1_ErbB4__P_RTK_Pase*kd95);
  v646_v660: c11 + RTK_Pase -> _2_EGF_ErbB1__P_RTK_Pase; cyt*(c11*RTK_Pase*k95 - _2_EGF_ErbB1__P_RTK_Pase*kd95);
  v647_v661: _2_ErbB2 + RTK_Pase -> _2_ErbB2__P_RTK_Pase; cyt*(RTK_Pase*_2_ErbB2*k95 - _2_ErbB2__P_RTK_Pase*kd95);
  v648_v662: ErbB3_ErbB2 + RTK_Pase -> ErbB2_ErbB3__P_RTK_Pase; cyt*(RTK_Pase*ErbB3_ErbB2*k95 - ErbB2_ErbB3__P_RTK_Pase*kd95);
  v649_v663: ErbB4_ErbB2 + RTK_Pase -> ErbB2_ErbB4__P_RTK_Pase; cyt*(RTK_Pase*ErbB4_ErbB2*k95 - ErbB2_ErbB4__P_RTK_Pase*kd95);
  v650_v664: 2 ErbB2_P -> c289; cyt*(ErbB2_P^2*k96 - c289*kd96);
  v651_v665: ErbB1 -> ErbB1_Inh; cyt*(-ErbB1_Inh)*kd97;
  v652_v666: c141 -> c502; cyt*(-c502)*kd98;
  v653_v667: c143 -> c503; cyt*(-c503)*kd99;
  v654_v668: c140 -> ErbB3_Inh; cyt*(-ErbB3_Inh)*kd100;
  v655_v669: c23 + Sos_P -> c99; cyt*(c23*Sos_P*k101 - c99*kd101);
  v656_v670: c18 + Sos_P -> c100; cyt*(c18*Sos_P*k101 - c100*kd101);
  v657_v671: c34 + Sos_P -> c419; cyt*(c34*Sos_P*k101 - c419*kd101);
  v658_v672: c65 + Sos_P -> c420; cyt*(c65*Sos_P*k101 - c420*kd101);
  v659_v673: 2 EGF_ErbB1_P -> c5; cyt*(EGF_ErbB1_P^2*k102 - c5*kd102);
  v660_v674: ErbB2_P + EGF_ErbB1_P -> c148; cyt*(ErbB2_P*EGF_ErbB1_P*k102 - c148*kd102);
  v661_v675: EGF_ErbB1_P + ErbB3_P -> c149; cyt*(EGF_ErbB1_P*ErbB3_P*k102 - c149*kd102);
  v662_v676: EGF_ErbB1_P + ErbB4_P -> c150; cyt*(EGF_ErbB1_P*ErbB4_P*k102 - c150*kd102);
  v663_v677: c141 + ErbB2_P -> ErbB2_ErbB2_P; cyt*(ErbB2_P*c141*k103 - ErbB2_ErbB2_P*kd103);
  v664_v678: c141 + c140 -> ErbB2_ErbB3; cyt*(c140*c141*k103 - ErbB2_ErbB3*kd103);
  v665_v679: c141 + c143 -> ErbB2_ErbB4; cyt*(c141*c143*k103 - ErbB2_ErbB4*kd103);
  v666_v680: ErbB2_P + ErbB3_P -> c335; cyt*(ErbB2_P*ErbB3_P*k103 - c335*kd103);
  v667_v681: ErbB2_P + ErbB4_P -> c336; cyt*(ErbB2_P*ErbB4_P*k103 - c336*kd103);
  v668_v682: c502 + ErbB2_P -> ErbB2_ErbB2_Inh; cyt*(ErbB2_P*c502*k103 - ErbB2_ErbB2_Inh*kd103);
  v669_v683: c140 + c502 -> ErbB3_ErbB2_Inh; cyt*(c140*c502*k103 - ErbB3_ErbB2_Inh*kd103);
  v670_v684: c143 + c502 -> ErbB4_ErbB2_Inh; cyt*(c143*c502*k103 - ErbB4_ErbB2_Inh*kd103);
  v671_v685: c141 + c503 -> ErbB4_Inh_ErbB2; cyt*(c141*c503*k103 - ErbB4_Inh_ErbB2*kd103);
  v672_v686: Shp + PIP2 -> PIP3_Shp; cyt*(PIP2*Shp*k104 - PIP3_Shp*kd104);
  v673_v687: PIP2 + PTEN -> PIP3_PTEN; cyt*(PTEN*PIP2*k104 - PIP3_PTEN*kd104);
  v674_v688: c23 + Gab1 -> _2_EGF_ErbB1__P_GAP_Grb2_Gab1; cyt*(c23*Gab1*k105 - _2_EGF_ErbB1__P_GAP_Grb2_Gab1*kd105);
  v675_v689: c225 + Gab1 -> ErbB1_ErbB2__P_GAP_Grb2_Gab1; cyt*(c225*Gab1*k105 - ErbB1_ErbB2__P_GAP_Grb2_Gab1*kd105);
  v676_v690: c226 + Gab1 -> ErbB1_ErbB3__P_GAP_Grb2_Gab1; cyt*(c226*Gab1*k105 - ErbB1_ErbB3__P_GAP_Grb2_Gab1*kd105);
  v677_v691: c227 + Gab1 -> ErbB1_ErbB4__P_GAP_Grb2_Gab1; cyt*(c227*Gab1*k105 - ErbB1_ErbB4__P_GAP_Grb2_Gab1*kd105);
  v678_v692: c312 + Gab1 -> _2_ErbB2__P_GAP_Grb2_Gab1; cyt*(c312*Gab1*k105 - _2_ErbB2__P_GAP_Grb2_Gab1*kd105);
  v679_v693: c381 + Gab1 -> ErbB3_ErbB2__P_GAP_Grb2_Gab1; cyt*(c381*Gab1*k105 - ErbB3_ErbB2__P_GAP_Grb2_Gab1*kd105);
  v680_v694: c384 + Gab1 -> ErbB4_ErbB2__P_GAP_Grb2_Gab1; cyt*(c384*Gab1*k105 - ErbB4_ErbB2__P_GAP_Grb2_Gab1*kd105);
  v681_v695: c104 + PIP2 -> c448; cyt*(c104*PIP2*k106b - c448*kd106b);
  v682_v696: c261 + PIP2 -> c449; cyt*(c261*PIP2*k106b - c449*kd106b);
  v683_v697: c262 + PIP2 -> c450; cyt*(c262*PIP2*k106b - c450*kd106b);
  v684_v698: c263 + PIP2 -> c451; cyt*(c263*PIP2*k106b - c451*kd106b);
  v685_v699: _2_ErbB2__P_GAP_Grb2_Gab1_P_PI3K + PIP2 -> c452; cyt*(_2_ErbB2__P_GAP_Grb2_Gab1_P_PI3K*PIP2*k106 - c452*kd106);
  v686_v700: c405 + PIP2 -> c453; cyt*(c405*PIP2*k106 - c453*kd106);
  v687_v701: c408 + PIP2 -> c455; cyt*(c408*PIP2*k106 - c455*kd106);
  v688_v702: c453 + PIP2 -> c467; cyt*(PIP2*c453*k106 - c467*kd106);
  v689_v703: c467 + PIP2 -> c468; cyt*(PIP2*c467*k106 - c468*kd106);
  v690_v704: c468 + PIP2 -> c469; cyt*(PIP2*c468*k106 - c469*kd106);
  v691_v705: c469 + PIP2 -> c470; cyt*(PIP2*c469*k106 - c470*kd106);
  v692_v706: c470 + PIP2 -> c471; cyt*(PIP2*c470*k106 - c471*kd106);
  v693_v707: ErbB1_ErbB2__P_GAP_Grb2_Gab1_P + Shp2 -> c464; cyt*(ErbB1_ErbB2__P_GAP_Grb2_Gab1_P*Shp2*k107 - c464*kd107);
  v694_v708: c446 + Shp2 -> c465; cyt*(c446*Shp2*k107 - c465*kd107);
  v695_v709: c447 + Shp2 -> c466; cyt*(c447*Shp2*k107 - c466*kd107);
  v696_v710: _2_ErbB2__P_GAP_Grb2_Gab1_P + Shp2 -> _2_ErbB2__P_GAP_Grb2_Gab1_P_Shp2; cyt*(_2_ErbB2__P_GAP_Grb2_Gab1_P*Shp2*k107 - _2_ErbB2__P_GAP_Grb2_Gab1_P_Shp2*kd107);
  v697_v711: ErbB3_ErbB2__P_GAP_Grb2_Gab1_P + Shp2 -> c476; cyt*(ErbB3_ErbB2__P_GAP_Grb2_Gab1_P*Shp2*k107 - c476*kd107);
  v698_v712: ErbB4_ErbB2__P_GAP_Grb2_Gab1_P + Shp2 -> c479; cyt*(ErbB4_ErbB2__P_GAP_Grb2_Gab1_P*Shp2*k107 - c479*kd107);
  v699_v713: _2_EGF_ErbB1__P_GAP_Grb2_Gab1_P + Shp2 -> c489; cyt*(Shp2*_2_EGF_ErbB1__P_GAP_Grb2_Gab1_P*k107 - c489*kd107);
  v700_v714: ErbB1_ErbB2__P_GAP_Grb2_Gab1 + Shp2 -> c464; cyt*(ErbB1_ErbB2__P_GAP_Grb2_Gab1*Shp2*k108 - c464*kd108);
  v701_v715: ErbB1_ErbB3__P_GAP_Grb2_Gab1 + Shp2 -> c465; cyt*(ErbB1_ErbB3__P_GAP_Grb2_Gab1*Shp2*k108 - c465*kd108);
  v702_v716: ErbB1_ErbB4__P_GAP_Grb2_Gab1 + Shp2 -> c466; cyt*(ErbB1_ErbB4__P_GAP_Grb2_Gab1*Shp2*k108 - c466*kd108);
  v703_v717: _2_ErbB2__P_GAP_Grb2_Gab1 + Shp2 -> _2_ErbB2__P_GAP_Grb2_Gab1_P_Shp2; cyt*(_2_ErbB2__P_GAP_Grb2_Gab1*Shp2*k108 - _2_ErbB2__P_GAP_Grb2_Gab1_P_Shp2*kd108);
  v704_v718: ErbB3_ErbB2__P_GAP_Grb2_Gab1 + Shp2 -> c476; cyt*(ErbB3_ErbB2__P_GAP_Grb2_Gab1*Shp2*k108 - c476*kd108);
  v705_v719: ErbB4_ErbB2__P_GAP_Grb2_Gab1 + Shp2 -> c479; cyt*(ErbB4_ErbB2__P_GAP_Grb2_Gab1*Shp2*k108 - c479*kd108);
  v706_v720: _2_EGF_ErbB1__P_GAP_Grb2_Gab1 + Shp2 -> c489; cyt*(Shp2*_2_EGF_ErbB1__P_GAP_Grb2_Gab1*k108 - c489*kd108);
  v707_v721: PIP3 + PTEN -> PIP3_PTEN; cyt*(PIP3*PTEN*k109 - PIP3_PTEN*kd109);
  v708_v722: PIP3 + Shp -> PIP3_Shp; cyt*(PIP3*Shp*k109 - PIP3_Shp*kd109);
  v709_v723: ERK_PP + _2_EGF_ErbB1__P_GAP_Grb2_Gab1_P -> c431; cyt*(ERK_PP*_2_EGF_ErbB1__P_GAP_Grb2_Gab1_P*k110 - c431*kd110);
  v710_v724: ERK_PP__i + _2_EGF_ErbB1__P_GAP_Grb2_Gab1_P -> c432; cyt*(ERK_PP__i*_2_EGF_ErbB1__P_GAP_Grb2_Gab1_P*k110 - c432*kd110);
  v711_v725: ERK_PP + ErbB1_ErbB2__P_GAP_Grb2_Gab1_P -> c433; cyt*(ERK_PP*ErbB1_ErbB2__P_GAP_Grb2_Gab1_P*k110 - c433*kd110);
  v712_v726: ERK_PP__i + ErbB1_ErbB2__P_GAP_Grb2_Gab1_P -> c434; cyt*(ERK_PP__i*ErbB1_ErbB2__P_GAP_Grb2_Gab1_P*k110 - c434*kd110);
  v713_v727: ERK_PP + c446 -> c435; cyt*(ERK_PP*c446*k110 - c435*kd110);
  v714_v728: ERK_PP__i + c446 -> c437; cyt*(ERK_PP__i*c446*k110 - c437*kd110);
  v715_v729: ERK_PP + c447 -> c438; cyt*(ERK_PP*c447*k110 - c438*kd110);
  v716_v730: ERK_PP__i + c447 -> c440; cyt*(ERK_PP__i*c447*k110 - c440*kd110);
  v717_v731: ERK_PP + _2_ErbB2__P_GAP_Grb2_Gab1_P -> c474; cyt*(ERK_PP*_2_ErbB2__P_GAP_Grb2_Gab1_P*k110 - c474*kd110);
  v718_v732: ERK_PP__i + _2_ErbB2__P_GAP_Grb2_Gab1_P -> c475; cyt*(ERK_PP__i*_2_ErbB2__P_GAP_Grb2_Gab1_P*k110 - c475*kd110);
  v719_v733: ERK_PP + ErbB3_ErbB2__P_GAP_Grb2_Gab1_P -> c477; cyt*(ERK_PP*ErbB3_ErbB2__P_GAP_Grb2_Gab1_P*k110 - c477*kd110);
  v720_v734: ERK_PP__i + ErbB3_ErbB2__P_GAP_Grb2_Gab1_P -> c478; cyt*(ERK_PP__i*ErbB3_ErbB2__P_GAP_Grb2_Gab1_P*k110 - c478*kd110);
  v721_v735: ERK_PP + ErbB4_ErbB2__P_GAP_Grb2_Gab1_P -> c480; cyt*(ERK_PP*ErbB4_ErbB2__P_GAP_Grb2_Gab1_P*k110 - c480*kd110);
  v722_v736: ERK_PP__i + ErbB4_ErbB2__P_GAP_Grb2_Gab1_P -> c481; cyt*(ERK_PP__i*ErbB4_ErbB2__P_GAP_Grb2_Gab1_P*k110 - c481*kd110);
  v723_v737: ERK_PP + ErbB3_4_ErbB2_Gab1_P -> c477; cyt*(ERK_PP*ErbB3_4_ErbB2_Gab1_P*k111 - c477*kd111);
  v724_v738: ERK_PP__i + ErbB3_4_ErbB2_Gab1_P -> c478; cyt*(ERK_PP__i*ErbB3_4_ErbB2_Gab1_P*k111 - c478*kd111);
  v725_v739: ERK_PP + _2_ErbB2_2_Gab1_P -> c474; cyt*(ERK_PP*_2_ErbB2_2_Gab1_P*k111 - c474*kd111);
  v726_v740: ERK_PP__i + _2_ErbB2_2_Gab1_P -> c475; cyt*(ERK_PP__i*_2_ErbB2_2_Gab1_P*k111 - c475*kd111);
  v727_v741: ERK_PP + c410 -> c438; cyt*(ERK_PP*c410*k111 - c438*kd111);
  v728_v742: ERK_PP__i + c410 -> c440; cyt*(ERK_PP__i*c410*k111 - c440*kd111);
  v729_v743: ERK_PP + c409 -> c435; cyt*(ERK_PP*c409*k111 - c435*kd111);
  v730_v744: ERK_PP__i + c409 -> c437; cyt*(ERK_PP__i*c409*k111 - c437*kd111);
  v731_v745: ERK_PP + ErbB1_ErbB_Gab1_P -> c433; cyt*(ERK_PP*ErbB1_ErbB_Gab1_P*k111 - c433*kd111);
  v732_v746: ERK_PP__i + ErbB1_ErbB_Gab1_P -> c434; cyt*(ERK_PP__i*ErbB1_ErbB_Gab1_P*k111 - c434*kd111);
  v733_v747: ERK_PP + _2_EGF_ErbB1_Gab1_P -> c431; cyt*(ERK_PP*_2_EGF_ErbB1_Gab1_P*k111 - c431*kd111);
  v734_v748: ERK_PP__i + _2_EGF_ErbB1_Gab1_P -> c432; cyt*(ERK_PP__i*_2_EGF_ErbB1_Gab1_P*k111 - c432*kd111);
  v735_v749: ERK_PP + ErbB4_ErbB2__P_GAP_Grb2_Gab1__PP -> c480; cyt*(ERK_PP*ErbB4_ErbB2__P_GAP_Grb2_Gab1__PP*k111 - c480*kd111);
  v736_v750: ERK_PP__i + ErbB4_ErbB2__P_GAP_Grb2_Gab1__PP -> c481; cyt*(ERK_PP__i*ErbB4_ErbB2__P_GAP_Grb2_Gab1__PP*k111 - c481*kd111);
  v737_v751: Ras_GDP + c104 -> c264; cyt*(Ras_GDP*c104*k112 - c264*kd112);
  v738_v752: Ras_GDP + c261 -> c265; cyt*(Ras_GDP*c261*k112 - c265*kd112);
  v739_v753: Ras_GDP + c262 -> c266; cyt*(Ras_GDP*c262*k112 - c266*kd112);
  v740_v754: Ras_GDP + c263 -> c267; cyt*(Ras_GDP*c263*k112 - c267*kd112);
  v741_v755: Ras_GDP + _2_ErbB2__P_GAP_Grb2_Gab1_P_PI3K -> c268; cyt*(Ras_GDP*_2_ErbB2__P_GAP_Grb2_Gab1_P_PI3K*k112 - c268*kd112);
  v742_v756: Ras_GDP + c405 -> c269; cyt*(Ras_GDP*c405*k112 - c269*kd112);
  v743_v757: Ras_GDP + c408 -> c325; cyt*(Ras_GDP*c408*k112 - c325*kd112);
  v744_v758: Ras_GTP + c104 -> c264; cyt*(Ras_GTP*c104*k113 - c264*kd113);
  v745_v759: Ras_GTP + c261 -> c265; cyt*(Ras_GTP*c261*k113 - c265*kd113);
  v746_v760: Ras_GTP + c262 -> c266; cyt*(Ras_GTP*c262*k113 - c266*kd113);
  v747_v761: Ras_GTP + c263 -> c267; cyt*(Ras_GTP*c263*k113 - c267*kd113);
  v748_v762: Ras_GTP + _2_ErbB2__P_GAP_Grb2_Gab1_P_PI3K -> c268; cyt*(Ras_GTP*_2_ErbB2__P_GAP_Grb2_Gab1_P_PI3K*k113 - c268*kd113);
  v749_v763: Ras_GTP + c405 -> c269; cyt*(Ras_GTP*c405*k113 - c269*kd113);
  v750_v764: Ras_GTP + c479 -> c325; cyt*(Ras_GTP*c479*k113 - c325*kd113);
  v751_v765: Raf_P + AKT_P_P -> AKT_P_P_Raf_P_Ser; cyt*(Raf_P*AKT_P_P*k114 - AKT_P_P_Raf_P_Ser*kd114);
  v752_v766: Raf_P__i + AKT_P_P -> AKT_P_P_Raf_P_Ser_i; cyt*(Raf_P__i*AKT_P_P*k114 - AKT_P_P_Raf_P_Ser_i*kd114);
  v753_v767: AKT_P_P + Raf_P_Ser -> AKT_P_P_Raf_P_Ser; cyt*(Raf_P_Ser*AKT_P_P*k115 - AKT_P_P_Raf_P_Ser*kd115);
  v754_v768: AKT_P_P + Raf_P_Ser -> AKT_P_P_Raf_P_Ser_i; cyt*(Raf_P_Ser*AKT_P_P*k115 - AKT_P_P_Raf_P_Ser_i*kd115);
  v755_v769: Pase3 -> MKP_deg; cyt*(StepLate*Pase3 - MKP_deg*kd116);
  v756_v770: _2_EGF_ErbB1_Gab1_P + Pase9t -> _2_EGF_ErbB1_Gab1_P_Pase9t; cyt*(_2_EGF_ErbB1_Gab1_P*Pase9t*k117 - _2_EGF_ErbB1_Gab1_P_Pase9t*kd117);
  v757_v771: _2_ErbB2_2_Gab1_P + Pase9t -> _2_ErbB2_2_Gab1_P_Pase9t; cyt*(_2_ErbB2_2_Gab1_P*Pase9t*k117 - _2_ErbB2_2_Gab1_P_Pase9t*kd117);
  v758_v772: c409 + Pase9t -> c411; cyt*(c409*Pase9t*k117 - c411*kd117);
  v759_v773: c410 + Pase9t -> c412; cyt*(c410*Pase9t*k117 - c412*kd117);
  v760_v774: ErbB3_4_ErbB2_Gab1_P + Pase9t -> ErbB3_4_ErbB2_Gab1_P_Pase9t; cyt*(ErbB3_4_ErbB2_Gab1_P*Pase9t*k117 - ErbB3_4_ErbB2_Gab1_P_Pase9t*kd117);
  v761_v775: ErbB1_ErbB_Gab1_P + Pase9t -> ErbB1_ErbB_Gab1_P_Pase9t; cyt*(ErbB1_ErbB_Gab1_P*Pase9t*k117 - ErbB1_ErbB_Gab1_P_Pase9t*kd117);
  v762_v776: ErbB4_ErbB2__P_GAP_Grb2_Gab1__PP + Pase9t -> c407; cyt*(ErbB4_ErbB2__P_GAP_Grb2_Gab1__PP*Pase9t*k117 - c407*kd117);
  v763_v777: _2_EGF_ErbB1__P_GAP_Grb2_Gab1_P + Pase9t -> _2_EGF_ErbB1_Gab1_P_Pase9t; cyt*(_2_EGF_ErbB1__P_GAP_Grb2_Gab1_P*Pase9t*k118 - _2_EGF_ErbB1_Gab1_P_Pase9t*kd118);
  v764_v778: _2_ErbB2__P_GAP_Grb2_Gab1_P + Pase9t -> _2_ErbB2_2_Gab1_P_Pase9t; cyt*(_2_ErbB2__P_GAP_Grb2_Gab1_P*Pase9t*k118 - _2_ErbB2_2_Gab1_P_Pase9t*kd118);
  v765_v779: c446 + Pase9t -> c411; cyt*(c446*Pase9t*k118 - c411*kd118);
  v766_v780: c447 + Pase9t -> c412; cyt*(c447*Pase9t*k118 - c412*kd118);
  v767_v781: ErbB3_ErbB2__P_GAP_Grb2_Gab1_P + Pase9t -> ErbB3_4_ErbB2_Gab1_P_Pase9t; cyt*(ErbB3_ErbB2__P_GAP_Grb2_Gab1_P*Pase9t*k118 - ErbB3_4_ErbB2_Gab1_P_Pase9t*kd118);
  v768_v782: ErbB1_ErbB2__P_GAP_Grb2_Gab1_P + Pase9t -> ErbB1_ErbB_Gab1_P_Pase9t; cyt*(ErbB1_ErbB2__P_GAP_Grb2_Gab1_P*Pase9t*k118 - ErbB1_ErbB_Gab1_P_Pase9t*kd118);
  v769_v783: ErbB4_ErbB2__P_GAP_Grb2_Gab1_P + Pase9t -> c407; cyt*(ErbB4_ErbB2__P_GAP_Grb2_Gab1_P*Pase9t*k118 - c407*kd118);
  v770_v784: c140 -> c142; cyt*(c514*Step10Mio*c140 - c142*kd119);
  v771_v785: c143 -> c144; cyt*(c514*Step10Mio*c143 - c144*kd119);
  v772_v786: c141 + c142 -> c355; cyt*(c141*c142*k120 - c355*kd120);
  v773_v787: c155 + c157 -> c421; cyt*(c155*c157*k120 - c421*kd120);
  v774_v788: c141 + c144 -> c345; cyt*(c141*c144*k120 - c345*kd120);
  v775_v789: c2 + c142 -> c516; cyt*(c2*c142*k120b - c516*kd120);
  v776_v790: c2 + c144 -> c517; cyt*(c2*c144*k120b - c517*kd120);
  v777_v791: c155 + c158 -> c422; cyt*(c155*c158*k120 - c422*kd120);
  v778_v792: c6 + c157 -> c518; cyt*(c6*c157*k120b - c518*kd120);
  v779_v793: c6 + c158 -> c519; cyt*(c6*c158*k120b - c519*kd120);
  v780_v794: ErbB1_h -> ErbB1_h_Inh; cyt*(-ErbB1_h_Inh)*kd97c;
  v781_v795: ErbB1_h_Inh -> EGF_ErbB1_h_Inh; cyt*(c1*Step10Mio*ErbB1_h_Inh - Step33*EGF_ErbB1_h_Inh);
  v782_v796: c3 + EGF_ErbB1_h_Inh -> c527; cyt*(c3*EGF_ErbB1_h_Inh*k2 - c527*kd2);
  v783_v797: 2 EGF_ErbB1_h_Inh -> _2_EGF_ErbB1_h_Inh; cyt*(EGF_ErbB1_h_Inh^2*k2 - _2_EGF_ErbB1_h_Inh*kd2);
  v784_v798: c524 -> EGF_ErbB1_h_ATP; cyt*(c1*Step10Mio*c524 - Step33*EGF_ErbB1_h_ATP);
  v785_v799: c524 -> c530; cyt*(c524*k6 - Step5*c530);
  v786_v801: EGF + c530 -> c10; cyt*(EGF*c530*k10b - c10*kd10);
  v787_v802: EGF_ErbB1_ATP_EGF_ErbB1_Inh + ATP_1_2e9 -> c115; cyt*(StepMini*ATP_1_2e9*EGF_ErbB1_ATP_EGF_ErbB1_Inh - Step1*c115);
  v788_v803: ATP_1_2e9 + c5 -> c115; cyt*(c5*ATP_1_2e9*k123h - c115*kd123h);
  v789_v804: ATP_1_2e9 + c5 -> _2_EGF_ErbB1_ATP_FullActive; cyt*(c5*ATP_1_2e9*k123 - _2_EGF_ErbB1_ATP_FullActive*kd123);
  v790_v805: ATP_1_2e9 + c527 -> c121; cyt*(StepMini*ATP_1_2e9*c527 - Step1*c121);
  v791_v806: ATP_1_2e9 + c5 -> c121; cyt*(c5*ATP_1_2e9*k123h - c121*kd123h);
  v792_v807: ATP_1_2e9 + c148 -> c122; cyt*(ATP_1_2e9*c148*k123 - c122*kd123);
  v793_v808: ATP_1_2e9 + c162 -> c123; cyt*(ATP_1_2e9*c162*k123 - c123*kd123);
  v794_v809: ATP_1_2e9 + c163 -> c124; cyt*(ATP_1_2e9*c163*k123 - c124*kd123);
  v795_v810: ATP_1_2e9 + c164 -> c125; cyt*(ATP_1_2e9*c164*k123 - c125*kd123);
  v796_v811: ATP_1_2e9 + c8 -> c126; cyt*(c8*ATP_1_2e9*k123 - c126*kd123);
  v797_v812: ATP_1_2e9 + c149 -> c127; cyt*(ATP_1_2e9*c149*k123 - c127*kd123);
  v798_v813: ATP_1_2e9 + c150 -> c128; cyt*(ATP_1_2e9*c150*k123 - c128*kd123);
  v799_v814: ATP_1_2e9 + c289 -> ErbB2_ErbB2_P_ATP; cyt*(ATP_1_2e9*c289*k123 - ErbB2_ErbB2_P_ATP*kd123);
  v800_v815: ATP_1_2e9 + ErbB1_ErbB2__P_GAP_Grb2_Gab1_P -> ErbB1_ErbB2__P_GAP_Grb2_Gab1_ATP; cyt*(ATP_1_2e9*ErbB1_ErbB2__P_GAP_Grb2_Gab1_P*k123 - ErbB1_ErbB2__P_GAP_Grb2_Gab1_ATP*kd123);
  v801_v816: ATP_1_2e9 + c446 -> ErbB1_ErbB3__P_GAP_Grb2_Gab1_ATP; cyt*(ATP_1_2e9*c446*k123 - ErbB1_ErbB3__P_GAP_Grb2_Gab1_ATP*kd123);
  v802_v817: ATP_1_2e9 + c447 -> ErbB1_ErbB4__P_GAP_Grb2_Gab1_ATP; cyt*(ATP_1_2e9*c447*k123 - ErbB1_ErbB4__P_GAP_Grb2_Gab1_ATP*kd123);
  v803_v818: ATP_1_2e9 + _2_ErbB2__P_GAP_Grb2_Gab1_P -> _2_ErbB2__P_GAP_Grb2_Gab1_ATP; cyt*(ATP_1_2e9*_2_ErbB2__P_GAP_Grb2_Gab1_P*k123 - _2_ErbB2__P_GAP_Grb2_Gab1_ATP*kd123);
  v804_v819: ATP_1_2e9 + ErbB3_ErbB2__P_GAP_Grb2_Gab1_P -> ErbB3_ErbB2__P_GAP_Grb2_Gab1_ATP; cyt*(ATP_1_2e9*ErbB3_ErbB2__P_GAP_Grb2_Gab1_P*k123 - ErbB3_ErbB2__P_GAP_Grb2_Gab1_ATP*kd123);
  v805_v820: ATP_1_2e9 + ErbB4_ErbB2__P_GAP_Grb2_Gab1_P -> ErbB4_ErbB2__P_GAP_Grb2_Gab1_ATP; cyt*(ATP_1_2e9*ErbB4_ErbB2__P_GAP_Grb2_Gab1_P*k123 - ErbB4_ErbB2__P_GAP_Grb2_Gab1_ATP*kd123);
  v806_v821: ATP_1_2e9 + _2_EGF_ErbB1__P_GAP_Grb2_Gab1_P -> _2_EGF_ErbB1__P_GAP_Grb2_Gab1_ATP; cyt*(ATP_1_2e9*_2_EGF_ErbB1__P_GAP_Grb2_Gab1_P*k123 - _2_EGF_ErbB1__P_GAP_Grb2_Gab1_ATP*kd123);
  v807_v822: ATP_1_2e9 + c149 -> HRG_ErbB3_ErbB1_ATP; cyt*(ATP_1_2e9*c149*k123 - HRG_ErbB3_ErbB1_ATP*kd123);
  v808_v823: ATP_1_2e9 + c150 -> HRG_ErbB4_ErbB1_ATP; cyt*(ATP_1_2e9*c150*k123 - HRG_ErbB4_ErbB1_ATP*kd123);
  v809_v824: c336 + ATP_1_2e9 -> c139; cyt*(ATP_1_2e9*c336*k123 - c139*kd123);
  v810_v825: c335 + ATP_1_2e9 -> c168; cyt*(ATP_1_2e9*c335*k123 - c168*kd123);
  v811_v826: ATP_1_2e9 + c337 -> c169; cyt*(ATP_1_2e9*c337*k123 - c169*kd123);
  v812_v827: ATP_1_2e9 + c338 -> c170; cyt*(ATP_1_2e9*c338*k123 - c170*kd123);
  v813_v828: ATP_1_2e9 + ErbB1 -> c2; cyt*(StepMini*ATP_1_2e9*ErbB1 - Step1*c2);
  v814_v829: ATP_1_2e9 + ErbB1_h -> c524; cyt*(StepMini*ATP_1_2e9*ErbB1_h - Step1*c524);
  v815_v850: c3 + EGF_ErbB1_h_ATP -> EGF_ErbB1_ATP_EGF_ErbB1_h_ATP; cyt*(c3*EGF_ErbB1_h_ATP*k2 - EGF_ErbB1_ATP_EGF_ErbB1_h_ATP*kd2);
  v816_v851: EGF_ErbB1_Inh + EGF_ErbB1_h_ATP -> EGF_ErbB1_Inh_EGF_ErbB1_h_ATP; cyt*(EGF_ErbB1_Inh*EGF_ErbB1_h_ATP*k2 - EGF_ErbB1_Inh_EGF_ErbB1_h_ATP*kd2);
  v817_v852: 2 EGF_ErbB1_h_ATP -> c552; cyt*(EGF_ErbB1_h_ATP^2*k2 - c552*kd2);
  v818_v853: EGF_ErbB1_h_Inh + EGF_ErbB1_h_ATP -> c553; cyt*(EGF_ErbB1_h_Inh*EGF_ErbB1_h_ATP*k2 - c553*kd2);
  v819_v854: EGF_ErbB1_Inh + EGF_ErbB1_h_Inh -> EGF_ErbB1_Inh_EGF_ErbB1_h_Inh; cyt*(EGF_ErbB1_Inh*EGF_ErbB1_h_Inh*k2 - EGF_ErbB1_Inh_EGF_ErbB1_h_Inh*kd2);
  v820_v855: ATP_1_2e9 + EGF_ErbB1_ATP_EGF_ErbB1_h_ATP -> c555; cyt*(StepMini*ATP_1_2e9*EGF_ErbB1_ATP_EGF_ErbB1_h_ATP - Step1*c555);
  v821_v856: ATP_1_2e9 + EGF_ErbB1_Inh_EGF_ErbB1_h_ATP -> c556; cyt*(StepMini*ATP_1_2e9*EGF_ErbB1_Inh_EGF_ErbB1_h_ATP - Step1*c556);
  v822_v857: ATP_1_2e9 + c552 -> c557; cyt*(StepMini*ATP_1_2e9*c552 - Step1*c557);
  v823_v858: ATP_1_2e9 + c553 -> c558; cyt*(StepMini*ATP_1_2e9*c553 - Step1*c558);
  v824_v859: ATP_1_2e9 + c5 -> c555; cyt*(c5*ATP_1_2e9*k123 - c555*kd123);
  v825_v860: ATP_1_2e9 + c5 -> c556; cyt*(c5*ATP_1_2e9*k123h - c556*kd123h);
  v826_v861: ATP_1_2e9 + c5 -> c557; cyt*(c5*ATP_1_2e9*k123 - c557*kd123);
  v827_v862: ATP_1_2e9 + c5 -> c558; cyt*(c5*ATP_1_2e9*k123h - c558*kd123h);

  // Unit definitions:
  unit time = 60 second;
end
