// SBML level 3 version 2

model __main()

  // Compartments:
  compartment default_compartment = 1;

  // Species:
  species C00417 in default_compartment = v6*0.001*dilution_factor;
  species C00143 in default_compartment = v14*0.001*dilution_factor;
  species C01367 in default_compartment = v32*0.001*dilution_factor;
  species C00001 in default_compartment = v60*10*dilution_factor;
  species C03451 in default_compartment = v63*0.001*dilution_factor;
  species C00227 in default_compartment = v64*1.1*dilution_factor;
  species C15973 in default_compartment = v92*0.001*dilution_factor;
  species C00576 in default_compartment = v99*0.001*dilution_factor;
  species C02876 in default_compartment = v128*0.001*dilution_factor;
  species C00490 in default_compartment = v141*0.001*dilution_factor;
  species C00131 in default_compartment = v148*0.001*dilution_factor;
  species C00390 in default_compartment = v150*0.001*dilution_factor;
  species C00014 in default_compartment = v159*0.001*dilution_factor;
  species C00469 in default_compartment = v185*0.001*dilution_factor;
  species C00011 in default_compartment = v195*10.001*dilution_factor;
  species C02972 in default_compartment = v200*0.001*dilution_factor;
  species C16348 in default_compartment = v206*0.001*dilution_factor;
  species C00114 in default_compartment = v210*0.001*dilution_factor;
  species C00026 in default_compartment = v211*0.44*dilution_factor;
  species C00020 in default_compartment = v212*0.001*dilution_factor;
  species C00311 in default_compartment = v232*0.001*dilution_factor;
  species C00101 in default_compartment = v234*0.001*dilution_factor;
  species C00006 in default_compartment = v235*0.0021*dilution_factor;
  species C00033 in default_compartment = v246*0.001*dilution_factor;
  species C00399 in default_compartment = v248*0.001*dilution_factor;
  species C00361 in default_compartment = v250*0.001*dilution_factor;
  species C00037 in default_compartment = v263*0.001*dilution_factor;
  species C01217 in default_compartment = v266*0.001*dilution_factor;
  species C00322 in default_compartment = v277*0.001*dilution_factor;
  species C03508 in default_compartment = v278*0.001*dilution_factor;
  species C00091 in default_compartment = v290*0.23*dilution_factor;
  species C00005 in default_compartment = v291*0.12*dilution_factor;
  species C00163 in default_compartment = v292*0.001*dilution_factor;
  species C00003 in default_compartment = v301*0.001*dilution_factor;
  species C00010 in default_compartment = v308*1.4*dilution_factor;
  species C00036 in default_compartment = v319*0.0011*dilution_factor;
  species C06006 in default_compartment = v332*0.001*dilution_factor;
  species C00022 in default_compartment = v345*0.0011*dilution_factor;
  species C06612 in default_compartment = v349*0.001*dilution_factor;
  species C00669 in default_compartment = v350*0.001*dilution_factor;
  species C00158 in default_compartment = v351*10.001*dilution_factor;
  species C00083 in default_compartment = v360*0.001*dilution_factor;
  species C00206 in default_compartment = v362*0.001*dilution_factor;
  species C00065 in default_compartment = v365*1.001*dilution_factor;
  species C00074 in default_compartment = v386*0.18*dilution_factor;
  species C00058 in default_compartment = v390*15*dilution_factor;
  species C00024 in default_compartment = v394*1.61*dilution_factor;
  species C06613 in default_compartment = v402*0.001*dilution_factor;
  species C00201 in default_compartment = v406*0.001*dilution_factor;
  species C00473 in default_compartment = v417*0.001*dilution_factor;
  species C00531 in default_compartment = v418*0.001*dilution_factor;
  species C00376 in default_compartment = v425*0.001*dilution_factor;
  species C00009 in default_compartment = v433*0.001*dilution_factor;
  species C06611 in default_compartment = v440*0.001*dilution_factor;
  species C06010 in default_compartment = v443*0.001*dilution_factor;
  species C01242 in default_compartment = v444*0.001*dilution_factor;
  species C04377 in default_compartment = v449*0.001*dilution_factor;
  species C05577 in default_compartment = v451*0.001*dilution_factor;
  species C00042 in default_compartment = v457*7.1692*dilution_factor;
  species C00051 in default_compartment = v480*0.001*dilution_factor;
  species C00149 in default_compartment = v485*1.7*dilution_factor;
  species C00008 in default_compartment = v498*0.001*dilution_factor;
  species C00100 in default_compartment = v504*0.001*dilution_factor;
  species C00286 in default_compartment = v509*0.001*dilution_factor;
  species C00527 in default_compartment = v516*0.001*dilution_factor;
  species C00004 in default_compartment = v519*1.083*dilution_factor;
  species C00080 in default_compartment = v528*0.0001*dilution_factor;
  species C02051 in default_compartment = v545*0.001*dilution_factor;
  species C00013 in default_compartment = v579*0.0011*dilution_factor;
  species C00048 in default_compartment = v584*0.0011*dilution_factor;
  species C00256 in default_compartment = v597*3.25*dilution_factor;
  species C00109 in default_compartment = v598*0.001*dilution_factor;
  species C00084 in default_compartment = v607*0.0011*dilution_factor;
  species C00454 in default_compartment = v623*0.001*dilution_factor;
  species C05576 in default_compartment = v628*0.001*dilution_factor;
  species C00002 in default_compartment = v632*1.001*dilution_factor;
  species C15972 in default_compartment = v634*0.001*dilution_factor;
  species C05993 in default_compartment = v649*0.001*dilution_factor;
  species C00122 in default_compartment = v669*0.001*dilution_factor;
  species C00158HCT in default_compartment = v672*1e-5*dilution_factor;
  species C05379 in default_compartment = v678*0.001*dilution_factor;
  species eEC4213 in default_compartment = p_eEC4213*rel0*0.000365269*dilution_factor;
  species eEC1242 in default_compartment = p_eEC1242*rel0*0.01698503*dilution_factor;
  species eEC1241 in default_compartment = p_eEC1241*rel0*0.011323353*dilution_factor;
  species eEC1814 in default_compartment = p_eEC1814*rel0*0.011871257*dilution_factor;
  species eEC6215 in default_compartment = p_eEC6215*rel0*0.007488024*dilution_factor;
  species eEC23112 in default_compartment = p_eEC23112*rel0*0.009497006*dilution_factor;
  species eEC11137 in default_compartment = p_eEC11137*rel0*0.007670659*dilution_factor;
  species eEC2792 in default_compartment = p_eEC2792*rel0*0.00657485*dilution_factor;
  species eEC23161 in default_compartment = p_eEC23161*rel0*0.007853293*dilution_factor;
  species eEC41149 in default_compartment = p_eEC41149*rel0*0.007488024*dilution_factor;
  species eEC2121 in default_compartment = p_eEC2121*rel0*0.005661677*dilution_factor;
  species eEC4212 in default_compartment = p_eEC4212*rel0*0.006026946*dilution_factor;
  species eEC23316 in default_compartment = p_eEC23316*rel0*0.005296407*dilution_factor;
  species eEC41131 in default_compartment = p_eEC41131*rel0*0.00310479*dilution_factor;
  species eEC1442 in default_compartment = p_eEC1442*rel0*0.004748503*dilution_factor;
  species eEC27140 in default_compartment = p_eEC27140*rel0*0.004748503*dilution_factor;
  species eEC2318 in default_compartment = p_eEC2318*rel0*0.004931138*dilution_factor;
  species eEC11140 in default_compartment = p_eEC11140*rel0*0.005661677*dilution_factor;
  species eEC6211 in default_compartment = p_eEC6211*rel0*0.003287425*dilution_factor;
  species eEC23129 in default_compartment = p_eEC23129*rel0*0.003287425*dilution_factor;
  species eEC2721 in default_compartment = p_eEC2721*rel0*0.002739521*dilution_factor;
  species eEC6412 in default_compartment = p_eEC6412*rel0*0.000547904*dilution_factor;
  species eEC4131 in default_compartment = p_eEC4131*rel0*0.002008982*dilution_factor;
  species eEC1351 in default_compartment = p_eEC1351*rel0*0.000182635*dilution_factor;
  species eEC2216 in default_compartment = p_eEC2216*rel0*0.000365269*dilution_factor;
  species eEC6323 in default_compartment = p_eEC6323*rel0*0.001826347*dilution_factor;
  species eEC11138 in default_compartment = p_eEC11138*rel0*0.001643713*dilution_factor;
  species eEC1112 in default_compartment = p_eEC1112*rel0*0.000182635*dilution_factor;
  species eEC3126 in default_compartment = p_eEC3126*rel0*0.000547904*dilution_factor;
  species eEC1111 in default_compartment = p_eEC1111*rel0*0.000365269*dilution_factor;
  species eEC11128 in default_compartment = p_eEC11128*rel0*0.000365269*dilution_factor;
  species eEC11142 in default_compartment = p_eEC11142*rel0*0.010227545*dilution_factor;
  species eEC2338 in default_compartment = p_eEC2338*rel0*0.005296407*dilution_factor;
  species hEC11137 in default_compartment = p_hEC11137*rel1*0.0061*dilution_factor;
  species hEC43117 in default_compartment = p_hEC43117*rel2*0.0366*dilution_factor;
  species hEC6411 in default_compartment = p_hEC6411*rel3*0.0488*dilution_factor;
  species hEC11719 in default_compartment = p_hEC11719*rel4*0.0122*dilution_factor;

  // Parameters:
  v6 = 1;
  dilution_factor = 1;
  v14 = 1;
  v32 = 1;
  v60 = 1;
  v63 = 1;
  v64 = 1;
  v92 = 1;
  v99 = 1;
  v128 = 1;
  v141 = 1;
  v148 = 1;
  v150 = 1;
  v159 = 1;
  v185 = 1;
  v195 = 1;
  v200 = 1;
  v206 = 1;
  v210 = 1;
  v211 = 1;
  v212 = 1;
  v232 = 1;
  v234 = 1;
  v235 = 1;
  v246 = 1;
  v248 = 1;
  v250 = 1;
  v263 = 1;
  v266 = 1;
  v277 = 1;
  v278 = 1;
  v290 = 1;
  v291 = 1;
  v292 = 1;
  v301 = 1;
  v308 = 1;
  v319 = 1;
  v332 = 1;
  v345 = 1;
  v349 = 1;
  v350 = 1;
  v351 = 1;
  v360 = 1;
  v362 = 1;
  v365 = 1;
  v386 = 1;
  v390 = 1;
  v394 = 1;
  v402 = 1;
  v406 = 1;
  v417 = 1;
  v418 = 1;
  v425 = 1;
  v433 = 1;
  v440 = 1;
  v443 = 1;
  v444 = 1;
  v449 = 1;
  v451 = 1;
  v457 = 1;
  v480 = 1;
  v485 = 1;
  v498 = 1;
  v504 = 1;
  v509 = 1;
  v516 = 1;
  v519 = 1;
  v528 = 1;
  v545 = 1;
  v579 = 1;
  v584 = 1;
  v597 = 1;
  v598 = 1;
  v607 = 1;
  v623 = 1;
  v628 = 1;
  v632 = 1;
  v634 = 1;
  v649 = 1;
  v669 = 1;
  v672 = 1;
  v678 = 1;
  p_eEC4213 = 1;
  rel0 = 1;
  p_eEC1242 = 1;
  p_eEC1241 = 1;
  p_eEC1814 = 1;
  p_eEC6215 = 1;
  p_eEC23112 = 1;
  p_eEC11137 = 1;
  p_eEC2792 = 1;
  p_eEC23161 = 1;
  p_eEC41149 = 1;
  p_eEC2121 = 1;
  p_eEC4212 = 1;
  p_eEC23316 = 1;
  p_eEC41131 = 1;
  p_eEC1442 = 1;
  p_eEC27140 = 1;
  p_eEC2318 = 1;
  p_eEC11140 = 1;
  p_eEC6211 = 1;
  p_eEC23129 = 1;
  p_eEC2721 = 1;
  p_eEC6412 = 1;
  p_eEC4131 = 1;
  p_eEC1351 = 1;
  p_eEC2216 = 1;
  p_eEC6323 = 1;
  p_eEC11138 = 1;
  p_eEC1112 = 1;
  p_eEC3126 = 1;
  p_eEC1111 = 1;
  p_eEC11128 = 1;
  p_eEC11142 = 1;
  p_eEC2338 = 1;
  p_hEC11137 = 1;
  rel1 = 1;
  p_hEC43117 = 1;
  rel2 = 1;
  p_hEC6411 = 1;
  rel3 = 1;
  p_hEC11719 = 1;
  rel4 = 1;
  Kcat_F_R56 = 1.499933;
  Kcat_R_R56 = 776.3642;
  Keq_R56 = 0.003529142;
  Kcat_V_R56 = 1;
  Km_C00008_eEC2721 = 0.151691675;
  Km_C00227_eEC2721 = 1.303333;
  Km_C00002_eEC2721 = 0.122388884;
  Km_C00033_eEC2721 = 46.92825;
  Kcat_F_R57 = 1.06438;
  Kcat_R_R57 = 2.623738;
  Keq_R57 = 1.623489e-6;
  Kcat_V_R57 = 1;
  Km_C02876_eEC2721 = 0.5455302;
  Km_C00163_eEC2721 = 27.57634;
  Kcat_F_R58 = 4.182973;
  Kcat_R_R58 = 3.076709;
  Keq_R58 = 27.3906;
  Kcat_V_R58 = 1;
  Km_C00013_eEC6211 = 0.13318713;
  Km_C00020_eEC6211 = 0.053331587;
  Km_C00024_eEC6211 = 0.055413216;
  Km_C00002_eEC6211 = 0.05487762;
  Km_C00010_eEC6211 = 0.077155121;
  Km_C00033_eEC6211 = 2.543299;
  Kcat_F_R59 = 5.986188;
  Kcat_R_R59 = 4.512811;
  Keq_R59 = 1;
  Kcat_V_R59 = 1;
  Km_C05993_eEC6211 = 0.045171168;
  Kcat_F_R60 = 3.27166;
  Kcat_R_R60 = 3.085642;
  Keq_R60 = 1;
  Kcat_V_R60 = 1;
  Kcat_F_R61 = 4.289959;
  Kcat_R_R61 = 3.190813;
  Keq_R61 = 1.587908;
  Kcat_V_R61 = 1;
  Km_C00100_eEC6211 = 0.054458927;
  Km_C00163_eEC6211 = 1.640108;
  Kcat_F_R64 = 0.2670509;
  Kcat_R_R64 = 0.2105731;
  Keq_R64 = 39.32772;
  Kcat_V_R64 = 1;
  Km_C00008_eEC6412 = 0.041535225;
  Km_C00009_eEC6412 = 0.312815398;
  Km_C00083_eEC6412 = 0.1;
  Km_C00002_eEC6412 = 0.031438239;
  Km_C00024_eEC6412 = 0.023739677;
  Km_C00011_eEC6412 = 0.259498209;
  Kcat_F_R69 = 6.538238;
  Kcat_R_R69 = 5.557925;
  Keq_R69 = 0.06308443;
  Kcat_V_R69 = 1;
  Km_C00311_eEC4213 = 0.339520901;
  Km_C00158_eEC4213 = 1.662617;
  Kcat_F_R70 = 6.538238;
  Kcat_R_R70 = 34.61815;
  Keq_R70 = 0.03276577;
  Kcat_V_R70 = 1;
  Km_C00001_eEC4213 = 2.687093;
  Km_C00417_eEC4213 = 0.037;
  Kcat_F_R71 = 5.557925;
  Kcat_R_R71 = 34.61815;
  Keq_R71 = 0.5193955;
  Kcat_V_R71 = 1;
  Kcat_F_R83 = 21.99615;
  Kcat_R_R83 = 20.59597;
  Keq_R83 = 0.0006821623;
  Kcat_V_R83 = 1;
  Km_C00004_eEC1111 = 0.040233176;
  Km_C00080_eEC1111 = 0.569533765;
  Km_C00084_eEC1111 = 1.347846;
  Km_C00003_eEC1111 = 0.100172691;
  Km_C00469_eEC1111 = 1.817484;
  Kcat_F_R84 = 10.16416;
  Kcat_R_R84 = 15.6993;
  Keq_R84 = 0.04179224;
  Kcat_V_R84 = 1;
  Km_C00376_eEC1111 = 0.013742472;
  Km_C00473_eEC1111 = 0.012423662;
  Kcat_F_R85 = 10.22849;
  Kcat_R_R85 = 17.26013;
  Keq_R85 = 0.0008159975;
  Kcat_V_R85 = 1;
  Km_C05577_eEC1111 = 0.031521235;
  Km_C05576_eEC1111 = 0.040941942;
  Kcat_F_R86 = 13.30108;
  Kcat_R_R86 = 18.20955;
  Keq_R86 = 0.000815311;
  Kcat_V_R86 = 1;
  Km_C06613_eEC1111 = 0.273868203;
  Km_C06611_eEC1111 = 0.501385033;
  Kcat_F_R87 = 13.30108;
  Kcat_R_R87 = 29.55535;
  Keq_R87 = 0.000815311;
  Kcat_V_R87 = 1;
  Km_C16348_eEC1111 = 0.3028312;
  Km_C06612_eEC1111 = 0.501385033;
  Kcat_F_R88 = 23.58496;
  Kcat_R_R88 = 46.57463;
  Keq_R88 = 0.002742689;
  Kcat_V_R88 = 1;
  Km_C00576_eEC1111 = 0.884440184;
  Km_C00114_eEC1111 = 0.409143209;
  Kcat_F_R89 = 23.83274;
  Kcat_R_R89 = 46.60898;
  Keq_R89 = 0.002740316;
  Kcat_V_R89 = 1;
  Km_C00005_eEC1111 = 0.027593218;
  Km_C00006_eEC1111 = 0.054585926;
  Kcat_F_R90 = 5.412864;
  Kcat_R_R90 = 29.78911;
  Keq_R90 = 0.0006815722;
  Kcat_V_R90 = 1;
  Km_C00005_eEC1112 = 0.071021505;
  Km_C00080_eEC1112 = 3.693367;
  Km_C00084_eEC1112 = 28.47;
  Km_C00006_eEC1112 = 0.212885574;
  Km_C00469_eEC1112 = 5.76950407;
  Kcat_F_R123 = 19.78221;
  Kcat_R_R123 = 19.78221;
  Keq_R123 = 0.02520442;
  Kcat_V_R123 = 1;
  Km_C00008_eEC2338 = 11.42136;
  Km_C00009_eEC2338 = 11.42136;
  Km_C00024_eEC2338 = 11.42136;
  Km_C00036_eEC2338 = 11.42136;
  Km_C00002_eEC2338 = 11.42136;
  Km_C00010_eEC2338 = 11.42136;
  Km_C00158_eEC2338 = 11.42136;
  Kcat_F_R157 = 33.80351;
  Kcat_R_R157 = 47.35067;
  Keq_R157 = 1.605748e-7;
  Kcat_V_R157 = 1;
  Km_C00158_eEC23316 = 0.206155464;
  Km_C00010_eEC23316 = 0.065331496;
  Km_C00024_eEC23316 = 0.052596927;
  Km_C00001_eEC23316 = 0.965167284;
  Km_C00036_eEC23316 = 0.069584779;
  Ki_C00004_eEC23316 = 0.03668018;
  Ki_C00026_eEC23316 = 0.1462314;
  Ki_C00100_eEC23316 = 0.05638692;
  Ki_C00158HCT_eEC23316 = 0.206155464;
  Ki_C01367_eEC23316 = 0.04042401;
  Kcat_F_R169 = 117.9162;
  Kcat_R_R169 = 278.5808;
  Keq_R169 = 1;
  Kcat_V_R169 = 1;
  Km_C00004_eEC1814 = 0.021393653;
  Km_C00080_eEC1814 = 0.225048855;
  Km_C02051_eEC1814 = 0.1120694;
  Km_C00003_eEC1814 = 0.089765757;
  Km_C02972_eEC1814 = 0.1120694;
  Kcat_F_R170 = 78.4412052;
  Kcat_R_R170 = 212.9897;
  Keq_R170 = 1;
  Kcat_V_R170 = 1;
  Km_C15972_eEC1814 = 0.056440994;
  Km_C15973_eEC1814 = 0.070260912;
  Kcat_F_R171 = 231.6773;
  Kcat_R_R171 = 276.3802;
  Keq_R171 = 998855.9;
  Kcat_V_R171 = 1;
  Km_C00011_eEC1814 = 0.555787563;
  Km_C00024_eEC1814 = 0.026133817;
  Km_C00010_eEC1814 = 0.030270519;
  Km_C00022_eEC1814 = 0.3933333;
  Kcat_F_R172 = 97.0755;
  Kcat_R_R172 = 292.6999;
  Keq_R172 = 0.0001411845;
  Kcat_V_R172 = 1;
  Km_C00014_eEC1814 = 0.673851371;
  Km_C00143_eEC1814 = 0.019876115;
  Km_C00037_eEC1814 = 0.678076088;
  Km_C00101_eEC1814 = 0.028163046;
  Kcat_F_R173 = 236.2117;
  Kcat_R_R173 = 267.3666;
  Keq_R173 = 553075.8;
  Kcat_V_R173 = 1;
  Km_C00527_eEC1814 = 0.020277608;
  Km_C00322_eEC1814 = 0.116938278;
  Kcat_F_R174 = 255.5968;
  Kcat_R_R174 = 266.9116;
  Keq_R174 = 88228.45;
  Kcat_V_R174 = 1;
  Km_C00091_eEC1814 = 0.020413773;
  Km_C00026_eEC1814 = 0.162106812;
  Kcat_F_R175 = 26.41689;
  Kcat_R_R175 = 29.57113;
  Keq_R175 = 998855.9;
  Kcat_V_R175 = 1;
  Km_C00004_eEC23112 = 0.023208896;
  Km_C00011_eEC23112 = 0.280183613;
  Km_C00024_eEC23112 = 0.026032073;
  Km_C00080_eEC23112 = 0.221310824;
  Km_C00003_eEC23112 = 0.026235035;
  Km_C00010_eEC23112 = 0.031586375;
  Km_C00022_eEC23112 = 0.168190986;
  Kcat_F_R176 = 0.925789301;
  Kcat_R_R176 = 0.8828594;
  Keq_R176 = 553075.8;
  Kcat_V_R176 = 1;
  Km_C00004_eEC23161 = 0.0277845;
  Km_C00011_eEC23161 = 0.328845918;
  Km_C00080_eEC23161 = 0.236688018;
  Km_C00527_eEC23161 = 0.025667293;
  Km_C00003_eEC23161 = 0.054326154;
  Km_C00010_eEC23161 = 0.029741414;
  Km_C00322_eEC23161 = 0.083035164;
  Kcat_F_R177 = 0.9191577;
  Kcat_R_R177 = 0.8908216;
  Keq_R177 = 88228.45;
  Kcat_V_R177 = 1;
  Km_C00091_eEC23161 = 0.025520761;
  Km_C00026_eEC23161 = 0.172540799;
  Kcat_F_R181 = 137.8607;
  Kcat_R_R181 = 541.25;
  Keq_R181 = 0.0002419607;
  Kcat_V_R181 = 1;
  Km_C00004_eEC11128 = 0.08125;
  Km_C00022_eEC11128 = 5.975;
  Km_C00080_eEC11128 = 2.627151;
  Km_C00003_eEC11128 = 0.073235102;
  Km_C00256_eEC11128 = 0.774313986;
  Kcat_F_R204 = 55.60224;
  Kcat_R_R204 = 2921.885;
  Keq_R204 = 0.2510186;
  Kcat_V_R204 = 1;
  Km_C00001_eEC4212 = 6.656439;
  Km_C00122_eEC4212 = 0.910608768;
  Km_C00149_eEC4212 = 1.7;
  Kcat_F_R245 = 60.57738;
  Kcat_R_R245 = 45.42218;
  Keq_R245 = 904979;
  Kcat_V_R245 = 1;
  Km_C00051_eEC3126 = 0.190951452;
  Km_C00256_eEC3126 = 0.702433646;
  Km_C00001_eEC3126 = 1.413865;
  Km_C03451_eEC3126 = 0.163828984;
  Kcat_F_R255 = 45.91357;
  Kcat_R_R255 = 7.140433;
  Keq_R255 = 0.1128189;
  Kcat_V_R255 = 1;
  Km_C00005_eEC11142 = 0.000715;
  Km_C00011_eEC11142 = 0.505214036;
  Km_C00026_eEC11142 = 2.75;
  Km_C00080_eEC11142 = 2.13827467;
  Km_C00006_eEC11142 = 0.01485;
  Km_C00311_eEC11142 = 0.074271195;
  Kcat_F_R256 = 22.23114;
  Kcat_R_R256 = 5.840928;
  Keq_R256 = 63.9443;
  Kcat_V_R256 = 1;
  Km_C05379_eEC11142 = 0.069090471;
  Kcat_F_R257 = 45.91357;
  Kcat_R_R257 = 15.98529;
  Keq_R257 = 0.001764331;
  Kcat_V_R257 = 1;
  Kcat_F_R268 = 3.00716;
  Kcat_R_R268 = 467.4798;
  Keq_R268 = 2.261487e-5;
  Kcat_V_R268 = 1;
  Km_C00004_eEC11137 = 0.061;
  Km_C00036_eEC11137 = 0.0445;
  Km_C00080_eEC11137 = 1.627507;
  Km_C00003_eEC11137 = 0.105280019;
  Km_C00149_eEC11137 = 0.00012;
  Kcat_F_R270 = 69.81517;
  Kcat_R_R270 = 6.59885015;
  Keq_R270 = 0.007553802;
  Kcat_V_R270 = 1;
  Km_C00004_eEC11138 = 0.025;
  Km_C00011_eEC11138 = 2.194043;
  Km_C00022_eEC11138 = 1.729396;
  Km_C00080_eEC11138 = 11.55059;
  Km_C00003_eEC11138 = 0.065783687;
  Km_C00149_eEC11138 = 0.42;
  Kcat_F_R271 = 12.41888;
  Kcat_R_R271 = 7.051511;
  Keq_R271 = 334.0192;
  Kcat_V_R271 = 1;
  Km_C00036_eEC11138 = 3.966667;
  Kcat_F_R272 = 48.62428;
  Kcat_R_R272 = 112.8719;
  Keq_R272 = 0.007547267;
  Kcat_V_R272 = 1;
  Km_C00005_eEC11140 = 0.033877365;
  Km_C00011_eEC11140 = 3.163388;
  Km_C00022_eEC11140 = 1.306478;
  Km_C00080_eEC11140 = 8.466878;
  Km_C00006_eEC11140 = 0.0415;
  Km_C00149_eEC11140 = 3.41;
  Kcat_F_R273 = 318.2636;
  Kcat_R_R273 = 116.9711;
  Keq_R273 = 334.0192;
  Kcat_V_R273 = 1;
  Km_C00036_eEC11140 = 0.527139127;
  Kcat_F_R299 = 3.74721796;
  Kcat_R_R299 = 3.858673;
  Keq_R299 = 553075.8;
  Kcat_V_R299 = 1;
  Km_C00004_eEC1242 = 0.035209294;
  Km_C00011_eEC1242 = 0.496151149;
  Km_C00080_eEC1242 = 0.608380556;
  Km_C00527_eEC1242 = 0.052975662;
  Km_C00003_eEC1242 = 0.127414092;
  Km_C00010_eEC1242 = 0.066362962;
  Km_C00322_eEC1242 = 0.131888092;
  Kcat_F_R300 = 9.177965;
  Kcat_R_R300 = 3.939461;
  Keq_R300 = 88228.45;
  Kcat_V_R300 = 1;
  Km_C00091_eEC1242 = 0.053117804;
  Km_C00026_eEC1242 = 332.9115;
  Kcat_F_R304 = 129.904416;
  Kcat_R_R304 = 195.3815;
  Keq_R304 = 0.03018795;
  Kcat_V_R304 = 1;
  Km_C00010_eEC2318 = 0.067;
  Km_C00227_eEC2318 = 0.9;
  Km_C00009_eEC2318 = 0.737116456;
  Km_C00024_eEC2318 = 0.045;
  Kcat_F_R305 = 168.9988;
  Kcat_R_R305 = 139.6695;
  Keq_R305 = 0.0002395465;
  Kcat_V_R305 = 1;
  Km_C02876_eEC2318 = 0.271658391;
  Km_C00100_eEC2318 = 0.032027643;
  Kcat_F_R307 = 5.82892086;
  Kcat_R_R307 = 4.168237;
  Keq_R307 = 0.01370314;
  Kcat_V_R307 = 1;
  Km_C00008_eEC41149 = 0.087266445;
  Km_C00011_eEC41149 = 5.647358;
  Km_C00074_eEC41149 = 2.1575;
  Km_C00002_eEC41149 = 0.061518487;
  Km_C00036_eEC41149 = 0.67;
  Kcat_F_R308 = 1.99915;
  Kcat_R_R308 = 182.1383;
  Keq_R308 = 8.730133e-8;
  Kcat_V_R308 = 1;
  Km_C00001_eEC41131 = 0.812425554;
  Km_C00011_eEC41131 = 1.559197;
  Km_C00074_eEC41131 = 0.19;
  Km_C00009_eEC41131 = 1.123651;
  Km_C00036_eEC41131 = 0.484438777;
  Kcat_F_R346 = 15.7222;
  Kcat_R_R346 = 4.450131;
  Keq_R346 = 998855.9;
  Kcat_V_R346 = 1;
  Km_C00004_eEC1241 = 0.029656347;
  Km_C00011_eEC1241 = 0.413209707;
  Km_C00024_eEC1241 = 0.036603667;
  Km_C00080_eEC1241 = 0.307893664;
  Km_C00003_eEC1241 = 0.064532936;
  Km_C00010_eEC1241 = 0.040530939;
  Km_C00022_eEC1241 = 0.38795;
  Kcat_F_R347 = 10.62797;
  Kcat_R_R347 = 7.937563;
  Keq_R347 = 4.1025e-5;
  Kcat_V_R347 = 1;
  Km_C00008_eEC27140 = 0.051032659;
  Km_C00074_eEC27140 = 0.144000247;
  Km_C00002_eEC27140 = 0.044206705;
  Km_C00022_eEC27140 = 0.87643075;
  Kcat_F_R348 = 6.387234;
  Kcat_R_R348 = 4.48425701;
  Keq_R348 = 0.0001074951;
  Kcat_V_R348 = 1;
  Km_C00206_eEC27140 = 0.018646972;
  Km_C00131_eEC27140 = 0.016942503;
  Kcat_F_R349 = 5.843847;
  Kcat_R_R349 = 2.818492;
  Keq_R349 = 8.377369e-5;
  Kcat_V_R349 = 1;
  Km_C00361_eEC27140 = 0.019646076;
  Km_C00286_eEC27140 = 0.020049427;
  Kcat_F_R350 = 11.49612;
  Kcat_R_R350 = 5.425749;
  Keq_R350 = 1;
  Kcat_V_R350 = 1;
  Km_C00454_eEC27140 = 0.5102155;
  Km_C00201_eEC27140 = 0.5102155;
  Kcat_F_R351 = 4.470776;
  Kcat_R_R351 = 4.215818;
  Keq_R351 = 7.370111;
  Kcat_V_R351 = 1;
  Km_C00009_eEC2792 = 1.4596771;
  Km_C00020_eEC2792 = 0.023508446;
  Km_C00074_eEC2792 = 0.141774222;
  Km_C00001_eEC2792 = 0.2813887;
  Km_C00002_eEC2792 = 0.021786314;
  Km_C00022_eEC2792 = 0.083;
  Kcat_F_R371 = 21.95;
  Kcat_R_R371 = 349.5079;
  Keq_R371 = 17031.36;
  Kcat_V_R371 = 1;
  Km_C00122_eEC1351 = 0.230714247;
  Km_C00390_eEC1351 = 0.019629668;
  Km_C00042_eEC1351 = 27.275;
  Km_C00399_eEC1351 = 0.01200348;
  Kcat_F_R372 = 37.55659;
  Kcat_R_R372 = 30.50542;
  Keq_R372 = 1.63233;
  Kcat_V_R372 = 1;
  Km_C00008_eEC6215 = 0.045971252;
  Km_C00009_eEC6215 = 1.423858;
  Km_C00091_eEC6215 = 0.046856858;
  Km_C00002_eEC6215 = 0.059107885;
  Km_C00010_eEC6215 = 4;
  Km_C00042_eEC6215 = 0.25;
  Kcat_F_R373 = 23.14659;
  Kcat_R_R373 = 31.08044;
  Keq_R373 = 6.495746;
  Kcat_V_R373 = 1;
  Km_C00531_eEC6215 = 0.049482018;
  Km_C00490_eEC6215 = 0.475;
  Kcat_F_R406 = 3.547282;
  Kcat_R_R406 = 16.00409;
  Keq_R406 = 194010.3;
  Kcat_V_R406 = 1;
  Km_C00014_hEC43117 = 2.321815;
  Km_C00022_hEC43117 = 0.786924958;
  Km_C00065_hEC43117 = 0.995956302;
  Kcat_F_R197 = 12.16954;
  Kcat_R_R197 = 26.70019;
  Keq_R197 = 336.0231;
  Kcat_V_R197 = 1;
  Km_C00058_hEC11719 = 6.29907;
  Km_C00003_hEC11719 = 0.179658741;
  Km_C00080_hEC11719 = 3.9966;
  Km_C00011_hEC11719 = 3.174462;
  Km_C00004_hEC11719 = 0.080049999;
  Kcat_F_R269 = 3.00716;
  Kcat_R_R269 = 467.4798;
  Keq_R269 = 2.261487e-5;
  Kcat_V_R269 = 1;
  Km_C00004_hEC11137 = 0.061;
  Km_C00036_hEC11137 = 0.0445;
  Km_C00080_hEC11137 = 1.627507;
  Km_C00003_hEC11137 = 0.105280019;
  Km_C00149_hEC11137 = 0.00012;
  Kcat_F_R345 = 7.969745;
  Kcat_R_R345 = 1.350432;
  Keq_R345 = 18.24607;
  Kcat_V_R345 = 1;
  Km_C00008_hEC6411 = 0.060795698;
  Km_C00009_hEC6411 = 1.167335;
  Km_C00036_hEC6411 = 0.202194154;
  Km_C00002_hEC6411 = 0.069778137;
  Km_C00022_hEC6411 = 9.7;
  Km_C00011_hEC6411 = 10.8;
  Kcat_F_R62 = 4.765085;
  Kcat_R_R62 = 38.6;
  Keq_R62 = 1.836842e-5;
  Kcat_V_R62 = 1;
  Km_C00022_eEC2216 = 11.08;
  Km_C00011_eEC2216 = 5.445469;
  Km_C06010_eEC2216 = 0.855534971;
  Kcat_F_R63 = 20.95;
  Kcat_R_R63 = 4.669526;
  Keq_R63 = 1611.962;
  Kcat_V_R63 = 1;
  Km_C06006_eEC2216 = 1.518301;
  Km_C00109_eEC2216 = 150.0055;
  Kcat_F_R227 = 0.721411978;
  Kcat_R_R227 = 1.132827;
  Keq_R227 = 0.06610282;
  Kcat_V_R227 = 1;
  Km_C00065_eEC2121 = 0.680456936;
  Km_C00101_eEC2121 = 0.048434764;
  Km_C00001_eEC2121 = 1.743806;
  Km_C00037_eEC2121 = 1.08421;
  Km_C00143_eEC2121 = 0.031294227;
  Kcat_F_R228 = 0.9187239;
  Kcat_R_R228 = 0.7097989;
  Keq_R228 = 33.9072;
  Kcat_V_R228 = 1;
  Km_C04377_eEC2121 = 0.032590855;
  Km_C01217_eEC2121 = 0.029256012;
  Kcat_F_R219 = 123.4718;
  Kcat_R_R219 = 281.0232;
  Keq_R219 = 236541.2;
  Kcat_V_R219 = 1;
  Km_C00008_eEC6323 = 0.188931838;
  Km_C00009_eEC6323 = 1.817506;
  Km_C00051_eEC6323 = 0.617069721;
  Km_C00002_eEC6323 = 0.161686391;
  Km_C00037_eEC6323 = 1.582806;
  Km_C00669_eEC6323 = 1.826;
  Kcat_F_R224 = 3.790229;
  Kcat_R_R224 = 6.892366;
  Keq_R224 = 1.772381e-6;
  Kcat_V_R224 = 1;
  Km_C00010_eEC23129 = 0.068333149;
  Km_C03508_eEC23129 = 1.101451;
  Km_C00024_eEC23129 = 0.059;
  Km_C00037_eEC23129 = 5.073135;
  Kcat_F_R225 = 2.631663;
  Kcat_R_R225 = 4.818351;
  Keq_R225 = 1;
  Kcat_V_R225 = 1;
  Km_C00011_eEC1442 = 1.169796;
  Km_C01242_eEC1442 = 2.10105;
  Km_C00037_eEC1442 = 3.032305;
  Km_C02051_eEC1442 = 2.10105;
  Kcat_F_R258 = 8.906026;
  Kcat_R_R258 = 13.46871;
  Keq_R258 = 0.02130565;
  Kcat_V_R258 = 1;
  Km_C00042_eEC4131 = 0.59;
  Km_C00048_eEC4131 = 0.13;
  Km_C00311_eEC4131 = 0.235073432;
  kdeg_eEC2721 = 0.0001;
  kdeg_eEC6211 = 0.0001;
  kdeg_eEC6412 = 0.0001;
  kdeg_eEC4213 = 0.0001;
  kdeg_eEC1111 = 0.0001;
  kdeg_eEC1112 = 0.0001;
  kdeg_eEC2338 = 0.0001;
  kdeg_eEC23316 = 0.0001;
  kdeg_eEC1814 = 0.0001;
  kdeg_eEC23112 = 0.0001;
  kdeg_eEC23161 = 0.0001;
  kdeg_eEC11128 = 0.0001;
  kdeg_eEC4212 = 0.0001;
  kdeg_eEC3126 = 0.0001;
  kdeg_eEC11142 = 0.0001;
  kdeg_eEC11137 = 0.0001;
  kdeg_eEC11138 = 0.0001;
  kdeg_eEC11140 = 0.0001;
  kdeg_eEC1242 = 0.0001;
  kdeg_eEC2318 = 0.0001;
  kdeg_eEC41149 = 0.0001;
  kdeg_eEC41131 = 0.0001;
  kdeg_eEC1241 = 0.0001;
  kdeg_eEC27140 = 0.0001;
  kdeg_eEC2792 = 0.0001;
  kdeg_eEC1351 = 0.0001;
  kdeg_eEC6215 = 0.0001;
  kdeg_hEC43117 = 0.0001;
  kdeg_hEC11719 = 0.0001;
  kdeg_hEC11137 = 0.0001;
  kdeg_hEC6411 = 0.0001;
  kdeg_eEC2216 = 0.0001;
  kdeg_eEC2121 = 0.0001;
  kdeg_eEC6323 = 0.0001;
  kdeg_eEC23129 = 0.0001;
  kdeg_eEC1442 = 0.0001;
  kdeg_eEC4131 = 0.0001;
  Gnc_C00158HCT_eEC23316 = 1;
  Gc_C00158HCT_eEC23316 = 1;
  Gnc_C01367_eEC23316 = 1;
  Gc_C01367_eEC23316 = 1;
  Gnc_C00026_eEC23316 = 1;
  Gc_C00026_eEC23316 = 1;
  Gnc_C00100_eEC23316 = 1;
  Gc_C00100_eEC23316 = 1;
  Gnc_C00004_eEC23316 = 1;
  Gc_C00004_eEC23316 = 1;

  // Assignment rules:
  R56_D := (1 + C00002/Km_C00002_eEC2721)^1*(1 + C00033/Km_C00033_eEC2721)^1 + (1 + C00008/Km_C00008_eEC2721)^1*(1 + C00227/Km_C00227_eEC2721)^1 - 1;
  hKcat_F_R56 := Kcat_V_R56*(Keq_R56*Km_C00002_eEC2721^1*Km_C00033_eEC2721^1/(Km_C00008_eEC2721^1*Km_C00227_eEC2721^1))^0.5;
  hKcat_R_R56 := Kcat_V_R56*(Keq_R56*Km_C00002_eEC2721^1*Km_C00033_eEC2721^1/(Km_C00008_eEC2721^1*Km_C00227_eEC2721^1))^(-0.5);
  R56_f := eEC2721*(hKcat_F_R56*C00002^1*C00033^1/(Km_C00002_eEC2721^1*Km_C00033_eEC2721^1))/R56_D;
  R56_r := eEC2721*(hKcat_R_R56*C00008^1*C00227^1/(Km_C00008_eEC2721^1*Km_C00227_eEC2721^1))/R56_D;
  R57_D := (1 + C00002/Km_C00002_eEC2721)^1*(1 + C00163/Km_C00163_eEC2721)^1 + (1 + C00008/Km_C00008_eEC2721)^1*(1 + C02876/Km_C02876_eEC2721)^1 - 1;
  hKcat_F_R57 := Kcat_V_R57*(Keq_R57*Km_C00002_eEC2721^1*Km_C00163_eEC2721^1/(Km_C00008_eEC2721^1*Km_C02876_eEC2721^1))^0.5;
  hKcat_R_R57 := Kcat_V_R57*(Keq_R57*Km_C00002_eEC2721^1*Km_C00163_eEC2721^1/(Km_C00008_eEC2721^1*Km_C02876_eEC2721^1))^(-0.5);
  R57_f := eEC2721*(hKcat_F_R57*C00002^1*C00163^1/(Km_C00002_eEC2721^1*Km_C00163_eEC2721^1))/R57_D;
  R57_r := eEC2721*(hKcat_R_R57*C00008^1*C02876^1/(Km_C00008_eEC2721^1*Km_C02876_eEC2721^1))/R57_D;
  R58_D := (1 + C00002/Km_C00002_eEC6211)^1*(1 + C00010/Km_C00010_eEC6211)^1*(1 + C00033/Km_C00033_eEC6211)^1 + (1 + C00013/Km_C00013_eEC6211)^1*(1 + C00020/Km_C00020_eEC6211)^1*(1 + C00024/Km_C00024_eEC6211)^1 - 1;
  hKcat_F_R58 := Kcat_V_R58*(Keq_R58*Km_C00002_eEC6211^1*Km_C00010_eEC6211^1*Km_C00033_eEC6211^1/(Km_C00013_eEC6211^1*Km_C00020_eEC6211^1*Km_C00024_eEC6211^1))^0.5;
  hKcat_R_R58 := Kcat_V_R58*(Keq_R58*Km_C00002_eEC6211^1*Km_C00010_eEC6211^1*Km_C00033_eEC6211^1/(Km_C00013_eEC6211^1*Km_C00020_eEC6211^1*Km_C00024_eEC6211^1))^(-0.5);
  R58_f := eEC6211*(hKcat_F_R58*C00002^1*C00010^1*C00033^1/(Km_C00002_eEC6211^1*Km_C00010_eEC6211^1*Km_C00033_eEC6211^1))/R58_D;
  R58_r := eEC6211*(hKcat_R_R58*C00013^1*C00020^1*C00024^1/(Km_C00013_eEC6211^1*Km_C00020_eEC6211^1*Km_C00024_eEC6211^1))/R58_D;
  R59_D := (1 + C00010/Km_C00010_eEC6211)^1*(1 + C05993/Km_C05993_eEC6211)^1 + (1 + C00020/Km_C00020_eEC6211)^1*(1 + C00024/Km_C00024_eEC6211)^1 - 1;
  hKcat_F_R59 := Kcat_V_R59*(Keq_R59*Km_C00010_eEC6211^1*Km_C05993_eEC6211^1/(Km_C00020_eEC6211^1*Km_C00024_eEC6211^1))^0.5;
  hKcat_R_R59 := Kcat_V_R59*(Keq_R59*Km_C00010_eEC6211^1*Km_C05993_eEC6211^1/(Km_C00020_eEC6211^1*Km_C00024_eEC6211^1))^(-0.5);
  R59_f := eEC6211*(hKcat_F_R59*C00010^1*C05993^1/(Km_C00010_eEC6211^1*Km_C05993_eEC6211^1))/R59_D;
  R59_r := eEC6211*(hKcat_R_R59*C00020^1*C00024^1/(Km_C00020_eEC6211^1*Km_C00024_eEC6211^1))/R59_D;
  R60_D := (1 + C00002/Km_C00002_eEC6211)^1*(1 + C00033/Km_C00033_eEC6211)^1 + (1 + C00013/Km_C00013_eEC6211)^1*(1 + C05993/Km_C05993_eEC6211)^1 - 1;
  hKcat_F_R60 := Kcat_V_R60*(Keq_R60*Km_C00002_eEC6211^1*Km_C00033_eEC6211^1/(Km_C00013_eEC6211^1*Km_C05993_eEC6211^1))^0.5;
  hKcat_R_R60 := Kcat_V_R60*(Keq_R60*Km_C00002_eEC6211^1*Km_C00033_eEC6211^1/(Km_C00013_eEC6211^1*Km_C05993_eEC6211^1))^(-0.5);
  R60_f := eEC6211*(hKcat_F_R60*C00002^1*C00033^1/(Km_C00002_eEC6211^1*Km_C00033_eEC6211^1))/R60_D;
  R60_r := eEC6211*(hKcat_R_R60*C00013^1*C05993^1/(Km_C00013_eEC6211^1*Km_C05993_eEC6211^1))/R60_D;
  R61_D := (1 + C00002/Km_C00002_eEC6211)^1*(1 + C00010/Km_C00010_eEC6211)^1*(1 + C00163/Km_C00163_eEC6211)^1 + (1 + C00013/Km_C00013_eEC6211)^1*(1 + C00020/Km_C00020_eEC6211)^1*(1 + C00100/Km_C00100_eEC6211)^1 - 1;
  hKcat_F_R61 := Kcat_V_R61*(Keq_R61*Km_C00002_eEC6211^1*Km_C00010_eEC6211^1*Km_C00163_eEC6211^1/(Km_C00013_eEC6211^1*Km_C00020_eEC6211^1*Km_C00100_eEC6211^1))^0.5;
  hKcat_R_R61 := Kcat_V_R61*(Keq_R61*Km_C00002_eEC6211^1*Km_C00010_eEC6211^1*Km_C00163_eEC6211^1/(Km_C00013_eEC6211^1*Km_C00020_eEC6211^1*Km_C00100_eEC6211^1))^(-0.5);
  R61_f := eEC6211*(hKcat_F_R61*C00002^1*C00010^1*C00163^1/(Km_C00002_eEC6211^1*Km_C00010_eEC6211^1*Km_C00163_eEC6211^1))/R61_D;
  R61_r := eEC6211*(hKcat_R_R61*C00013^1*C00020^1*C00100^1/(Km_C00013_eEC6211^1*Km_C00020_eEC6211^1*Km_C00100_eEC6211^1))/R61_D;
  R64_D := (1 + C00002/Km_C00002_eEC6412)^1*(1 + C00024/Km_C00024_eEC6412)^1*(1 + C00011/Km_C00011_eEC6412)^1 + (1 + C00008/Km_C00008_eEC6412)^1*(1 + C00009/Km_C00009_eEC6412)^1*(1 + C00083/Km_C00083_eEC6412)^1 - 1;
  hKcat_F_R64 := Kcat_V_R64*(Keq_R64*Km_C00002_eEC6412^1*Km_C00024_eEC6412^1*Km_C00011_eEC6412^1/(Km_C00008_eEC6412^1*Km_C00009_eEC6412^1*Km_C00083_eEC6412^1))^0.5;
  hKcat_R_R64 := Kcat_V_R64*(Keq_R64*Km_C00002_eEC6412^1*Km_C00024_eEC6412^1*Km_C00011_eEC6412^1/(Km_C00008_eEC6412^1*Km_C00009_eEC6412^1*Km_C00083_eEC6412^1))^(-0.5);
  R64_f := eEC6412*(hKcat_F_R64*C00002^1*C00024^1*C00011^1/(Km_C00002_eEC6412^1*Km_C00024_eEC6412^1*Km_C00011_eEC6412^1))/R64_D;
  R64_r := eEC6412*(hKcat_R_R64*C00008^1*C00009^1*C00083^1/(Km_C00008_eEC6412^1*Km_C00009_eEC6412^1*Km_C00083_eEC6412^1))/R64_D;
  R69_D := (1 + C00158/Km_C00158_eEC4213)^1 + (1 + C00311/Km_C00311_eEC4213)^1 - 1;
  hKcat_F_R69 := Kcat_V_R69*(Keq_R69*Km_C00158_eEC4213^1/Km_C00311_eEC4213^1)^0.5;
  hKcat_R_R69 := Kcat_V_R69*(Keq_R69*Km_C00158_eEC4213^1/Km_C00311_eEC4213^1)^(-0.5);
  R69_f := eEC4213*(hKcat_F_R69*C00158^1/Km_C00158_eEC4213^1)/R69_D;
  R69_r := eEC4213*(hKcat_R_R69*C00311^1/Km_C00311_eEC4213^1)/R69_D;
  R70_D := (1 + C00158/Km_C00158_eEC4213)^1 + (1 + C00417/Km_C00417_eEC4213)^1 - 1;
  hKcat_F_R70 := Kcat_V_R70*(Keq_R70*Km_C00158_eEC4213^1/Km_C00417_eEC4213^1)^0.5;
  hKcat_R_R70 := Kcat_V_R70*(Keq_R70*Km_C00158_eEC4213^1/Km_C00417_eEC4213^1)^(-0.5);
  R70_f := eEC4213*(hKcat_F_R70*C00158^1/Km_C00158_eEC4213^1)/R70_D;
  R70_r := eEC4213*(hKcat_R_R70*C00417^1/Km_C00417_eEC4213^1)/R70_D;
  R71_D := (1 + C00311/Km_C00311_eEC4213)^1 + (1 + C00417/Km_C00417_eEC4213)^1 - 1;
  hKcat_F_R71 := Kcat_V_R71*(Keq_R71*Km_C00311_eEC4213^1/Km_C00417_eEC4213^1)^0.5;
  hKcat_R_R71 := Kcat_V_R71*(Keq_R71*Km_C00311_eEC4213^1/Km_C00417_eEC4213^1)^(-0.5);
  R71_f := eEC4213*(hKcat_F_R71*C00311^1/Km_C00311_eEC4213^1)/R71_D;
  R71_r := eEC4213*(hKcat_R_R71*C00417^1/Km_C00417_eEC4213^1)/R71_D;
  R83_D := (1 + C00003/Km_C00003_eEC1111)^1*(1 + C00469/Km_C00469_eEC1111)^1 + (1 + C00004/Km_C00004_eEC1111)^1*(1 + C00084/Km_C00084_eEC1111)^1 - 1;
  hKcat_F_R83 := Kcat_V_R83*(Keq_R83*Km_C00003_eEC1111^1*Km_C00469_eEC1111^1/(Km_C00004_eEC1111^1*Km_C00084_eEC1111^1))^0.5;
  hKcat_R_R83 := Kcat_V_R83*(Keq_R83*Km_C00003_eEC1111^1*Km_C00469_eEC1111^1/(Km_C00004_eEC1111^1*Km_C00084_eEC1111^1))^(-0.5);
  R83_f := eEC1111*(hKcat_F_R83*C00003^1*C00469^1/(Km_C00003_eEC1111^1*Km_C00469_eEC1111^1))/R83_D;
  R83_r := eEC1111*(hKcat_R_R83*C00004^1*C00084^1/(Km_C00004_eEC1111^1*Km_C00084_eEC1111^1))/R83_D;
  R84_D := (1 + C00003/Km_C00003_eEC1111)^1*(1 + C00473/Km_C00473_eEC1111)^1 + (1 + C00004/Km_C00004_eEC1111)^1*(1 + C00376/Km_C00376_eEC1111)^1 - 1;
  hKcat_F_R84 := Kcat_V_R84*(Keq_R84*Km_C00003_eEC1111^1*Km_C00473_eEC1111^1/(Km_C00004_eEC1111^1*Km_C00376_eEC1111^1))^0.5;
  hKcat_R_R84 := Kcat_V_R84*(Keq_R84*Km_C00003_eEC1111^1*Km_C00473_eEC1111^1/(Km_C00004_eEC1111^1*Km_C00376_eEC1111^1))^(-0.5);
  R84_f := eEC1111*(hKcat_F_R84*C00003^1*C00473^1/(Km_C00003_eEC1111^1*Km_C00473_eEC1111^1))/R84_D;
  R84_r := eEC1111*(hKcat_R_R84*C00004^1*C00376^1/(Km_C00004_eEC1111^1*Km_C00376_eEC1111^1))/R84_D;
  R85_D := (1 + C00003/Km_C00003_eEC1111)^1*(1 + C05576/Km_C05576_eEC1111)^1 + (1 + C00004/Km_C00004_eEC1111)^1*(1 + C05577/Km_C05577_eEC1111)^1 - 1;
  hKcat_F_R85 := Kcat_V_R85*(Keq_R85*Km_C00003_eEC1111^1*Km_C05576_eEC1111^1/(Km_C00004_eEC1111^1*Km_C05577_eEC1111^1))^0.5;
  hKcat_R_R85 := Kcat_V_R85*(Keq_R85*Km_C00003_eEC1111^1*Km_C05576_eEC1111^1/(Km_C00004_eEC1111^1*Km_C05577_eEC1111^1))^(-0.5);
  R85_f := eEC1111*(hKcat_F_R85*C00003^1*C05576^1/(Km_C00003_eEC1111^1*Km_C05576_eEC1111^1))/R85_D;
  R85_r := eEC1111*(hKcat_R_R85*C00004^1*C05577^1/(Km_C00004_eEC1111^1*Km_C05577_eEC1111^1))/R85_D;
  R86_D := (1 + C00003/Km_C00003_eEC1111)^1*(1 + C06611/Km_C06611_eEC1111)^1 + (1 + C00004/Km_C00004_eEC1111)^1*(1 + C06613/Km_C06613_eEC1111)^1 - 1;
  hKcat_F_R86 := Kcat_V_R86*(Keq_R86*Km_C00003_eEC1111^1*Km_C06611_eEC1111^1/(Km_C00004_eEC1111^1*Km_C06613_eEC1111^1))^0.5;
  hKcat_R_R86 := Kcat_V_R86*(Keq_R86*Km_C00003_eEC1111^1*Km_C06611_eEC1111^1/(Km_C00004_eEC1111^1*Km_C06613_eEC1111^1))^(-0.5);
  R86_f := eEC1111*(hKcat_F_R86*C00003^1*C06611^1/(Km_C00003_eEC1111^1*Km_C06611_eEC1111^1))/R86_D;
  R86_r := eEC1111*(hKcat_R_R86*C00004^1*C06613^1/(Km_C00004_eEC1111^1*Km_C06613_eEC1111^1))/R86_D;
  R87_D := (1 + C00003/Km_C00003_eEC1111)^1*(1 + C06612/Km_C06612_eEC1111)^1 + (1 + C00004/Km_C00004_eEC1111)^1*(1 + C16348/Km_C16348_eEC1111)^1 - 1;
  hKcat_F_R87 := Kcat_V_R87*(Keq_R87*Km_C00003_eEC1111^1*Km_C06612_eEC1111^1/(Km_C00004_eEC1111^1*Km_C16348_eEC1111^1))^0.5;
  hKcat_R_R87 := Kcat_V_R87*(Keq_R87*Km_C00003_eEC1111^1*Km_C06612_eEC1111^1/(Km_C00004_eEC1111^1*Km_C16348_eEC1111^1))^(-0.5);
  R87_f := eEC1111*(hKcat_F_R87*C00003^1*C06612^1/(Km_C00003_eEC1111^1*Km_C06612_eEC1111^1))/R87_D;
  R87_r := eEC1111*(hKcat_R_R87*C00004^1*C16348^1/(Km_C00004_eEC1111^1*Km_C16348_eEC1111^1))/R87_D;
  R88_D := (1 + C00003/Km_C00003_eEC1111)^1*(1 + C00114/Km_C00114_eEC1111)^1 + (1 + C00004/Km_C00004_eEC1111)^1*(1 + C00576/Km_C00576_eEC1111)^1 - 1;
  hKcat_F_R88 := Kcat_V_R88*(Keq_R88*Km_C00003_eEC1111^1*Km_C00114_eEC1111^1/(Km_C00004_eEC1111^1*Km_C00576_eEC1111^1))^0.5;
  hKcat_R_R88 := Kcat_V_R88*(Keq_R88*Km_C00003_eEC1111^1*Km_C00114_eEC1111^1/(Km_C00004_eEC1111^1*Km_C00576_eEC1111^1))^(-0.5);
  R88_f := eEC1111*(hKcat_F_R88*C00003^1*C00114^1/(Km_C00003_eEC1111^1*Km_C00114_eEC1111^1))/R88_D;
  R88_r := eEC1111*(hKcat_R_R88*C00004^1*C00576^1/(Km_C00004_eEC1111^1*Km_C00576_eEC1111^1))/R88_D;
  R89_D := (1 + C00006/Km_C00006_eEC1111)^1*(1 + C00114/Km_C00114_eEC1111)^1 + (1 + C00005/Km_C00005_eEC1111)^1*(1 + C00576/Km_C00576_eEC1111)^1 - 1;
  hKcat_F_R89 := Kcat_V_R89*(Keq_R89*Km_C00006_eEC1111^1*Km_C00114_eEC1111^1/(Km_C00005_eEC1111^1*Km_C00576_eEC1111^1))^0.5;
  hKcat_R_R89 := Kcat_V_R89*(Keq_R89*Km_C00006_eEC1111^1*Km_C00114_eEC1111^1/(Km_C00005_eEC1111^1*Km_C00576_eEC1111^1))^(-0.5);
  R89_f := eEC1111*(hKcat_F_R89*C00006^1*C00114^1/(Km_C00006_eEC1111^1*Km_C00114_eEC1111^1))/R89_D;
  R89_r := eEC1111*(hKcat_R_R89*C00005^1*C00576^1/(Km_C00005_eEC1111^1*Km_C00576_eEC1111^1))/R89_D;
  R90_D := (1 + C00006/Km_C00006_eEC1112)^1*(1 + C00469/Km_C00469_eEC1112)^1 + (1 + C00005/Km_C00005_eEC1112)^1*(1 + C00084/Km_C00084_eEC1112)^1 - 1;
  hKcat_F_R90 := Kcat_V_R90*(Keq_R90*Km_C00006_eEC1112^1*Km_C00469_eEC1112^1/(Km_C00005_eEC1112^1*Km_C00084_eEC1112^1))^0.5;
  hKcat_R_R90 := Kcat_V_R90*(Keq_R90*Km_C00006_eEC1112^1*Km_C00469_eEC1112^1/(Km_C00005_eEC1112^1*Km_C00084_eEC1112^1))^(-0.5);
  R90_f := eEC1112*(hKcat_F_R90*C00006^1*C00469^1/(Km_C00006_eEC1112^1*Km_C00469_eEC1112^1))/R90_D;
  R90_r := eEC1112*(hKcat_R_R90*C00005^1*C00084^1/(Km_C00005_eEC1112^1*Km_C00084_eEC1112^1))/R90_D;
  R123_D := (1 + C00002/Km_C00002_eEC2338)^1*(1 + C00010/Km_C00010_eEC2338)^1*(1 + C00158/Km_C00158_eEC2338)^1 + (1 + C00008/Km_C00008_eEC2338)^1*(1 + C00009/Km_C00009_eEC2338)^1*(1 + C00024/Km_C00024_eEC2338)^1*(1 + C00036/Km_C00036_eEC2338)^1 - 1;
  hKcat_F_R123 := Kcat_V_R123*(Keq_R123*Km_C00002_eEC2338^1*Km_C00010_eEC2338^1*Km_C00158_eEC2338^1/(Km_C00008_eEC2338^1*Km_C00009_eEC2338^1*Km_C00024_eEC2338^1*Km_C00036_eEC2338^1))^0.5;
  hKcat_R_R123 := Kcat_V_R123*(Keq_R123*Km_C00002_eEC2338^1*Km_C00010_eEC2338^1*Km_C00158_eEC2338^1/(Km_C00008_eEC2338^1*Km_C00009_eEC2338^1*Km_C00024_eEC2338^1*Km_C00036_eEC2338^1))^(-0.5);
  R123_f := eEC2338*(hKcat_F_R123*C00002^1*C00010^1*C00158^1/(Km_C00002_eEC2338^1*Km_C00010_eEC2338^1*Km_C00158_eEC2338^1))/R123_D;
  R123_r := eEC2338*(hKcat_R_R123*C00008^1*C00009^1*C00024^1*C00036^1/(Km_C00008_eEC2338^1*Km_C00009_eEC2338^1*Km_C00024_eEC2338^1*Km_C00036_eEC2338^1))/R123_D;
  eEC23316_fr := (Gnc_C00004_eEC23316 + (1 - Gnc_C00004_eEC23316)*(1/(1 + C00004/Ki_C00004_eEC23316)))*(Gnc_C00026_eEC23316 + (1 - Gnc_C00026_eEC23316)*(1/(1 + C00026/Ki_C00026_eEC23316)))*(Gnc_C00100_eEC23316 + (1 - Gnc_C00100_eEC23316)*(1/(1 + C00100/Ki_C00100_eEC23316)))*(Gnc_C00158HCT_eEC23316 + (1 - Gnc_C00158HCT_eEC23316)*(1/(1 + C00158HCT/Ki_C00158HCT_eEC23316)))*(Gnc_C01367_eEC23316 + (1 - Gnc_C01367_eEC23316)*(1/(1 + C01367/Ki_C01367_eEC23316)));
  eEC23316_Dreg := (1 - Gc_C00004_eEC23316)*(C00004/Ki_C00004_eEC23316) + (1 - Gc_C00026_eEC23316)*(C00026/Ki_C00026_eEC23316) + (1 - Gc_C00100_eEC23316)*(C00100/Ki_C00100_eEC23316) + (1 - Gc_C00158HCT_eEC23316)*(C00158HCT/Ki_C00158HCT_eEC23316) + (1 - Gc_C01367_eEC23316)*(C01367/Ki_C01367_eEC23316);
  R157_D := (1 + C00010/Km_C00010_eEC23316)^1*(1 + C00158/Km_C00158_eEC23316)^1 + (1 + C00024/Km_C00024_eEC23316)^1*(1 + C00036/Km_C00036_eEC23316)^1 - 1;
  hKcat_F_R157 := Kcat_V_R157*(Keq_R157*Km_C00010_eEC23316^1*Km_C00158_eEC23316^1/(Km_C00024_eEC23316^1*Km_C00036_eEC23316^1))^0.5;
  hKcat_R_R157 := Kcat_V_R157*(Keq_R157*Km_C00010_eEC23316^1*Km_C00158_eEC23316^1/(Km_C00024_eEC23316^1*Km_C00036_eEC23316^1))^(-0.5);
  R157_f := eEC23316*eEC23316_fr*(hKcat_F_R157*C00010^1*C00158^1/(Km_C00010_eEC23316^1*Km_C00158_eEC23316^1))/(R157_D + eEC23316_Dreg);
  R157_r := eEC23316*eEC23316_fr*(hKcat_R_R157*C00024^1*C00036^1/(Km_C00024_eEC23316^1*Km_C00036_eEC23316^1))/(R157_D + eEC23316_Dreg);
  R169_D := (1 + C00003/Km_C00003_eEC1814)^1*(1 + C02972/Km_C02972_eEC1814)^1 + (1 + C00004/Km_C00004_eEC1814)^1*(1 + C02051/Km_C02051_eEC1814)^1 - 1;
  hKcat_F_R169 := Kcat_V_R169*(Keq_R169*Km_C00003_eEC1814^1*Km_C02972_eEC1814^1/(Km_C00004_eEC1814^1*Km_C02051_eEC1814^1))^0.5;
  hKcat_R_R169 := Kcat_V_R169*(Keq_R169*Km_C00003_eEC1814^1*Km_C02972_eEC1814^1/(Km_C00004_eEC1814^1*Km_C02051_eEC1814^1))^(-0.5);
  R169_f := eEC1814*(hKcat_F_R169*C00003^1*C02972^1/(Km_C00003_eEC1814^1*Km_C02972_eEC1814^1))/R169_D;
  R169_r := eEC1814*(hKcat_R_R169*C00004^1*C02051^1/(Km_C00004_eEC1814^1*Km_C02051_eEC1814^1))/R169_D;
  R170_D := (1 + C00003/Km_C00003_eEC1814)^1*(1 + C15973/Km_C15973_eEC1814)^1 + (1 + C00004/Km_C00004_eEC1814)^1*(1 + C15972/Km_C15972_eEC1814)^1 - 1;
  hKcat_F_R170 := Kcat_V_R170*(Keq_R170*Km_C00003_eEC1814^1*Km_C15973_eEC1814^1/(Km_C00004_eEC1814^1*Km_C15972_eEC1814^1))^0.5;
  hKcat_R_R170 := Kcat_V_R170*(Keq_R170*Km_C00003_eEC1814^1*Km_C15973_eEC1814^1/(Km_C00004_eEC1814^1*Km_C15972_eEC1814^1))^(-0.5);
  R170_f := eEC1814*(hKcat_F_R170*C00003^1*C15973^1/(Km_C00003_eEC1814^1*Km_C15973_eEC1814^1))/R170_D;
  R170_r := eEC1814*(hKcat_R_R170*C00004^1*C15972^1/(Km_C00004_eEC1814^1*Km_C15972_eEC1814^1))/R170_D;
  R171_D := (1 + C00003/Km_C00003_eEC1814)^1*(1 + C00010/Km_C00010_eEC1814)^1*(1 + C00022/Km_C00022_eEC1814)^1 + (1 + C00004/Km_C00004_eEC1814)^1*(1 + C00011/Km_C00011_eEC1814)^1*(1 + C00024/Km_C00024_eEC1814)^1 - 1;
  hKcat_F_R171 := Kcat_V_R171*(Keq_R171*Km_C00003_eEC1814^1*Km_C00010_eEC1814^1*Km_C00022_eEC1814^1/(Km_C00004_eEC1814^1*Km_C00011_eEC1814^1*Km_C00024_eEC1814^1))^0.5;
  hKcat_R_R171 := Kcat_V_R171*(Keq_R171*Km_C00003_eEC1814^1*Km_C00010_eEC1814^1*Km_C00022_eEC1814^1/(Km_C00004_eEC1814^1*Km_C00011_eEC1814^1*Km_C00024_eEC1814^1))^(-0.5);
  R171_f := eEC1814*(hKcat_F_R171*C00003^1*C00010^1*C00022^1/(Km_C00003_eEC1814^1*Km_C00010_eEC1814^1*Km_C00022_eEC1814^1))/R171_D;
  R171_r := eEC1814*(hKcat_R_R171*C00004^1*C00011^1*C00024^1/(Km_C00004_eEC1814^1*Km_C00011_eEC1814^1*Km_C00024_eEC1814^1))/R171_D;
  R172_D := (1 + C00003/Km_C00003_eEC1814)^1*(1 + C00037/Km_C00037_eEC1814)^1*(1 + C00101/Km_C00101_eEC1814)^1 + (1 + C00004/Km_C00004_eEC1814)^1*(1 + C00011/Km_C00011_eEC1814)^1*(1 + C00014/Km_C00014_eEC1814)^1*(1 + C00143/Km_C00143_eEC1814)^1 - 1;
  hKcat_F_R172 := Kcat_V_R172*(Keq_R172*Km_C00003_eEC1814^1*Km_C00037_eEC1814^1*Km_C00101_eEC1814^1/(Km_C00004_eEC1814^1*Km_C00011_eEC1814^1*Km_C00014_eEC1814^1*Km_C00143_eEC1814^1))^0.5;
  hKcat_R_R172 := Kcat_V_R172*(Keq_R172*Km_C00003_eEC1814^1*Km_C00037_eEC1814^1*Km_C00101_eEC1814^1/(Km_C00004_eEC1814^1*Km_C00011_eEC1814^1*Km_C00014_eEC1814^1*Km_C00143_eEC1814^1))^(-0.5);
  R172_f := eEC1814*(hKcat_F_R172*C00003^1*C00037^1*C00101^1/(Km_C00003_eEC1814^1*Km_C00037_eEC1814^1*Km_C00101_eEC1814^1))/R172_D;
  R172_r := eEC1814*(hKcat_R_R172*C00004^1*C00011^1*C00014^1*C00143^1/(Km_C00004_eEC1814^1*Km_C00011_eEC1814^1*Km_C00014_eEC1814^1*Km_C00143_eEC1814^1))/R172_D;
  R173_D := (1 + C00003/Km_C00003_eEC1814)^1*(1 + C00010/Km_C00010_eEC1814)^1*(1 + C00322/Km_C00322_eEC1814)^1 + (1 + C00004/Km_C00004_eEC1814)^1*(1 + C00011/Km_C00011_eEC1814)^1*(1 + C00527/Km_C00527_eEC1814)^1 - 1;
  hKcat_F_R173 := Kcat_V_R173*(Keq_R173*Km_C00003_eEC1814^1*Km_C00010_eEC1814^1*Km_C00322_eEC1814^1/(Km_C00004_eEC1814^1*Km_C00011_eEC1814^1*Km_C00527_eEC1814^1))^0.5;
  hKcat_R_R173 := Kcat_V_R173*(Keq_R173*Km_C00003_eEC1814^1*Km_C00010_eEC1814^1*Km_C00322_eEC1814^1/(Km_C00004_eEC1814^1*Km_C00011_eEC1814^1*Km_C00527_eEC1814^1))^(-0.5);
  R173_f := eEC1814*(hKcat_F_R173*C00003^1*C00010^1*C00322^1/(Km_C00003_eEC1814^1*Km_C00010_eEC1814^1*Km_C00322_eEC1814^1))/R173_D;
  R173_r := eEC1814*(hKcat_R_R173*C00004^1*C00011^1*C00527^1/(Km_C00004_eEC1814^1*Km_C00011_eEC1814^1*Km_C00527_eEC1814^1))/R173_D;
  R174_D := (1 + C00003/Km_C00003_eEC1814)^1*(1 + C00010/Km_C00010_eEC1814)^1*(1 + C00026/Km_C00026_eEC1814)^1 + (1 + C00004/Km_C00004_eEC1814)^1*(1 + C00011/Km_C00011_eEC1814)^1*(1 + C00091/Km_C00091_eEC1814)^1 - 1;
  hKcat_F_R174 := Kcat_V_R174*(Keq_R174*Km_C00003_eEC1814^1*Km_C00010_eEC1814^1*Km_C00026_eEC1814^1/(Km_C00004_eEC1814^1*Km_C00011_eEC1814^1*Km_C00091_eEC1814^1))^0.5;
  hKcat_R_R174 := Kcat_V_R174*(Keq_R174*Km_C00003_eEC1814^1*Km_C00010_eEC1814^1*Km_C00026_eEC1814^1/(Km_C00004_eEC1814^1*Km_C00011_eEC1814^1*Km_C00091_eEC1814^1))^(-0.5);
  R174_f := eEC1814*(hKcat_F_R174*C00003^1*C00010^1*C00026^1/(Km_C00003_eEC1814^1*Km_C00010_eEC1814^1*Km_C00026_eEC1814^1))/R174_D;
  R174_r := eEC1814*(hKcat_R_R174*C00004^1*C00011^1*C00091^1/(Km_C00004_eEC1814^1*Km_C00011_eEC1814^1*Km_C00091_eEC1814^1))/R174_D;
  R175_D := (1 + C00003/Km_C00003_eEC23112)^1*(1 + C00010/Km_C00010_eEC23112)^1*(1 + C00022/Km_C00022_eEC23112)^1 + (1 + C00004/Km_C00004_eEC23112)^1*(1 + C00011/Km_C00011_eEC23112)^1*(1 + C00024/Km_C00024_eEC23112)^1 - 1;
  hKcat_F_R175 := Kcat_V_R175*(Keq_R175*Km_C00003_eEC23112^1*Km_C00010_eEC23112^1*Km_C00022_eEC23112^1/(Km_C00004_eEC23112^1*Km_C00011_eEC23112^1*Km_C00024_eEC23112^1))^0.5;
  hKcat_R_R175 := Kcat_V_R175*(Keq_R175*Km_C00003_eEC23112^1*Km_C00010_eEC23112^1*Km_C00022_eEC23112^1/(Km_C00004_eEC23112^1*Km_C00011_eEC23112^1*Km_C00024_eEC23112^1))^(-0.5);
  R175_f := eEC23112*(hKcat_F_R175*C00003^1*C00010^1*C00022^1/(Km_C00003_eEC23112^1*Km_C00010_eEC23112^1*Km_C00022_eEC23112^1))/R175_D;
  R175_r := eEC23112*(hKcat_R_R175*C00004^1*C00011^1*C00024^1/(Km_C00004_eEC23112^1*Km_C00011_eEC23112^1*Km_C00024_eEC23112^1))/R175_D;
  R176_D := (1 + C00003/Km_C00003_eEC23161)^1*(1 + C00010/Km_C00010_eEC23161)^1*(1 + C00322/Km_C00322_eEC23161)^1 + (1 + C00004/Km_C00004_eEC23161)^1*(1 + C00011/Km_C00011_eEC23161)^1*(1 + C00527/Km_C00527_eEC23161)^1 - 1;
  hKcat_F_R176 := Kcat_V_R176*(Keq_R176*Km_C00003_eEC23161^1*Km_C00010_eEC23161^1*Km_C00322_eEC23161^1/(Km_C00004_eEC23161^1*Km_C00011_eEC23161^1*Km_C00527_eEC23161^1))^0.5;
  hKcat_R_R176 := Kcat_V_R176*(Keq_R176*Km_C00003_eEC23161^1*Km_C00010_eEC23161^1*Km_C00322_eEC23161^1/(Km_C00004_eEC23161^1*Km_C00011_eEC23161^1*Km_C00527_eEC23161^1))^(-0.5);
  R176_f := eEC23161*(hKcat_F_R176*C00003^1*C00010^1*C00322^1/(Km_C00003_eEC23161^1*Km_C00010_eEC23161^1*Km_C00322_eEC23161^1))/R176_D;
  R176_r := eEC23161*(hKcat_R_R176*C00004^1*C00011^1*C00527^1/(Km_C00004_eEC23161^1*Km_C00011_eEC23161^1*Km_C00527_eEC23161^1))/R176_D;
  R177_D := (1 + C00003/Km_C00003_eEC23161)^1*(1 + C00010/Km_C00010_eEC23161)^1*(1 + C00026/Km_C00026_eEC23161)^1 + (1 + C00004/Km_C00004_eEC23161)^1*(1 + C00011/Km_C00011_eEC23161)^1*(1 + C00091/Km_C00091_eEC23161)^1 - 1;
  hKcat_F_R177 := Kcat_V_R177*(Keq_R177*Km_C00003_eEC23161^1*Km_C00010_eEC23161^1*Km_C00026_eEC23161^1/(Km_C00004_eEC23161^1*Km_C00011_eEC23161^1*Km_C00091_eEC23161^1))^0.5;
  hKcat_R_R177 := Kcat_V_R177*(Keq_R177*Km_C00003_eEC23161^1*Km_C00010_eEC23161^1*Km_C00026_eEC23161^1/(Km_C00004_eEC23161^1*Km_C00011_eEC23161^1*Km_C00091_eEC23161^1))^(-0.5);
  R177_f := eEC23161*(hKcat_F_R177*C00003^1*C00010^1*C00026^1/(Km_C00003_eEC23161^1*Km_C00010_eEC23161^1*Km_C00026_eEC23161^1))/R177_D;
  R177_r := eEC23161*(hKcat_R_R177*C00004^1*C00011^1*C00091^1/(Km_C00004_eEC23161^1*Km_C00011_eEC23161^1*Km_C00091_eEC23161^1))/R177_D;
  R181_D := (1 + C00003/Km_C00003_eEC11128)^1*(1 + C00256/Km_C00256_eEC11128)^1 + (1 + C00004/Km_C00004_eEC11128)^1*(1 + C00022/Km_C00022_eEC11128)^1 - 1;
  hKcat_F_R181 := Kcat_V_R181*(Keq_R181*Km_C00003_eEC11128^1*Km_C00256_eEC11128^1/(Km_C00004_eEC11128^1*Km_C00022_eEC11128^1))^0.5;
  hKcat_R_R181 := Kcat_V_R181*(Keq_R181*Km_C00003_eEC11128^1*Km_C00256_eEC11128^1/(Km_C00004_eEC11128^1*Km_C00022_eEC11128^1))^(-0.5);
  R181_f := eEC11128*(hKcat_F_R181*C00003^1*C00256^1/(Km_C00003_eEC11128^1*Km_C00256_eEC11128^1))/R181_D;
  R181_r := eEC11128*(hKcat_R_R181*C00004^1*C00022^1/(Km_C00004_eEC11128^1*Km_C00022_eEC11128^1))/R181_D;
  R204_D := (1 + C00149/Km_C00149_eEC4212)^1 + (1 + C00122/Km_C00122_eEC4212)^1 - 1;
  hKcat_F_R204 := Kcat_V_R204*(Keq_R204*Km_C00149_eEC4212^1/Km_C00122_eEC4212^1)^0.5;
  hKcat_R_R204 := Kcat_V_R204*(Keq_R204*Km_C00149_eEC4212^1/Km_C00122_eEC4212^1)^(-0.5);
  R204_f := eEC4212*(hKcat_F_R204*C00149^1/Km_C00149_eEC4212^1)/R204_D;
  R204_r := eEC4212*(hKcat_R_R204*C00122^1/Km_C00122_eEC4212^1)/R204_D;
  R245_D := (1 + C03451/Km_C03451_eEC3126)^1 + (1 + C00051/Km_C00051_eEC3126)^1*(1 + C00256/Km_C00256_eEC3126)^1 - 1;
  hKcat_F_R245 := Kcat_V_R245*(Keq_R245*Km_C03451_eEC3126^1/(Km_C00051_eEC3126^1*Km_C00256_eEC3126^1))^0.5;
  hKcat_R_R245 := Kcat_V_R245*(Keq_R245*Km_C03451_eEC3126^1/(Km_C00051_eEC3126^1*Km_C00256_eEC3126^1))^(-0.5);
  R245_f := eEC3126*(hKcat_F_R245*C03451^1/Km_C03451_eEC3126^1)/R245_D;
  R245_r := eEC3126*(hKcat_R_R245*C00051^1*C00256^1/(Km_C00051_eEC3126^1*Km_C00256_eEC3126^1))/R245_D;
  R255_D := (1 + C00006/Km_C00006_eEC11142)^1*(1 + C00311/Km_C00311_eEC11142)^1 + (1 + C00005/Km_C00005_eEC11142)^1*(1 + C00011/Km_C00011_eEC11142)^1*(1 + C00026/Km_C00026_eEC11142)^1 - 1;
  hKcat_F_R255 := Kcat_V_R255*(Keq_R255*Km_C00006_eEC11142^1*Km_C00311_eEC11142^1/(Km_C00005_eEC11142^1*Km_C00011_eEC11142^1*Km_C00026_eEC11142^1))^0.5;
  hKcat_R_R255 := Kcat_V_R255*(Keq_R255*Km_C00006_eEC11142^1*Km_C00311_eEC11142^1/(Km_C00005_eEC11142^1*Km_C00011_eEC11142^1*Km_C00026_eEC11142^1))^(-0.5);
  R255_f := eEC11142*(hKcat_F_R255*C00006^1*C00311^1/(Km_C00006_eEC11142^1*Km_C00311_eEC11142^1))/R255_D;
  R255_r := eEC11142*(hKcat_R_R255*C00005^1*C00011^1*C00026^1/(Km_C00005_eEC11142^1*Km_C00011_eEC11142^1*Km_C00026_eEC11142^1))/R255_D;
  R256_D := (1 + C05379/Km_C05379_eEC11142)^1 + (1 + C00011/Km_C00011_eEC11142)^1*(1 + C00026/Km_C00026_eEC11142)^1 - 1;
  hKcat_F_R256 := Kcat_V_R256*(Keq_R256*Km_C05379_eEC11142^1/(Km_C00011_eEC11142^1*Km_C00026_eEC11142^1))^0.5;
  hKcat_R_R256 := Kcat_V_R256*(Keq_R256*Km_C05379_eEC11142^1/(Km_C00011_eEC11142^1*Km_C00026_eEC11142^1))^(-0.5);
  R256_f := eEC11142*(hKcat_F_R256*C05379^1/Km_C05379_eEC11142^1)/R256_D;
  R256_r := eEC11142*(hKcat_R_R256*C00011^1*C00026^1/(Km_C00011_eEC11142^1*Km_C00026_eEC11142^1))/R256_D;
  R257_D := (1 + C00006/Km_C00006_eEC11142)^1*(1 + C00311/Km_C00311_eEC11142)^1 + (1 + C00005/Km_C00005_eEC11142)^1*(1 + C05379/Km_C05379_eEC11142)^1 - 1;
  hKcat_F_R257 := Kcat_V_R257*(Keq_R257*Km_C00006_eEC11142^1*Km_C00311_eEC11142^1/(Km_C00005_eEC11142^1*Km_C05379_eEC11142^1))^0.5;
  hKcat_R_R257 := Kcat_V_R257*(Keq_R257*Km_C00006_eEC11142^1*Km_C00311_eEC11142^1/(Km_C00005_eEC11142^1*Km_C05379_eEC11142^1))^(-0.5);
  R257_f := eEC11142*(hKcat_F_R257*C00006^1*C00311^1/(Km_C00006_eEC11142^1*Km_C00311_eEC11142^1))/R257_D;
  R257_r := eEC11142*(hKcat_R_R257*C00005^1*C05379^1/(Km_C00005_eEC11142^1*Km_C05379_eEC11142^1))/R257_D;
  R268_D := (1 + C00003/Km_C00003_eEC11137)^1*(1 + C00149/Km_C00149_eEC11137)^1 + (1 + C00004/Km_C00004_eEC11137)^1*(1 + C00036/Km_C00036_eEC11137)^1 - 1;
  hKcat_F_R268 := Kcat_V_R268*(Keq_R268*Km_C00003_eEC11137^1*Km_C00149_eEC11137^1/(Km_C00004_eEC11137^1*Km_C00036_eEC11137^1))^0.5;
  hKcat_R_R268 := Kcat_V_R268*(Keq_R268*Km_C00003_eEC11137^1*Km_C00149_eEC11137^1/(Km_C00004_eEC11137^1*Km_C00036_eEC11137^1))^(-0.5);
  R268_f := eEC11137*(hKcat_F_R268*C00003^1*C00149^1/(Km_C00003_eEC11137^1*Km_C00149_eEC11137^1))/R268_D;
  R268_r := eEC11137*(hKcat_R_R268*C00004^1*C00036^1/(Km_C00004_eEC11137^1*Km_C00036_eEC11137^1))/R268_D;
  R270_D := (1 + C00003/Km_C00003_eEC11138)^1*(1 + C00149/Km_C00149_eEC11138)^1 + (1 + C00004/Km_C00004_eEC11138)^1*(1 + C00011/Km_C00011_eEC11138)^1*(1 + C00022/Km_C00022_eEC11138)^1 - 1;
  hKcat_F_R270 := Kcat_V_R270*(Keq_R270*Km_C00003_eEC11138^1*Km_C00149_eEC11138^1/(Km_C00004_eEC11138^1*Km_C00011_eEC11138^1*Km_C00022_eEC11138^1))^0.5;
  hKcat_R_R270 := Kcat_V_R270*(Keq_R270*Km_C00003_eEC11138^1*Km_C00149_eEC11138^1/(Km_C00004_eEC11138^1*Km_C00011_eEC11138^1*Km_C00022_eEC11138^1))^(-0.5);
  R270_f := eEC11138*(hKcat_F_R270*C00003^1*C00149^1/(Km_C00003_eEC11138^1*Km_C00149_eEC11138^1))/R270_D;
  R270_r := eEC11138*(hKcat_R_R270*C00004^1*C00011^1*C00022^1/(Km_C00004_eEC11138^1*Km_C00011_eEC11138^1*Km_C00022_eEC11138^1))/R270_D;
  R271_D := (1 + C00036/Km_C00036_eEC11138)^1 + (1 + C00011/Km_C00011_eEC11138)^1*(1 + C00022/Km_C00022_eEC11138)^1 - 1;
  hKcat_F_R271 := Kcat_V_R271*(Keq_R271*Km_C00036_eEC11138^1/(Km_C00011_eEC11138^1*Km_C00022_eEC11138^1))^0.5;
  hKcat_R_R271 := Kcat_V_R271*(Keq_R271*Km_C00036_eEC11138^1/(Km_C00011_eEC11138^1*Km_C00022_eEC11138^1))^(-0.5);
  R271_f := eEC11138*(hKcat_F_R271*C00036^1/Km_C00036_eEC11138^1)/R271_D;
  R271_r := eEC11138*(hKcat_R_R271*C00011^1*C00022^1/(Km_C00011_eEC11138^1*Km_C00022_eEC11138^1))/R271_D;
  R272_D := (1 + C00006/Km_C00006_eEC11140)^1*(1 + C00149/Km_C00149_eEC11140)^1 + (1 + C00005/Km_C00005_eEC11140)^1*(1 + C00011/Km_C00011_eEC11140)^1*(1 + C00022/Km_C00022_eEC11140)^1 - 1;
  hKcat_F_R272 := Kcat_V_R272*(Keq_R272*Km_C00006_eEC11140^1*Km_C00149_eEC11140^1/(Km_C00005_eEC11140^1*Km_C00011_eEC11140^1*Km_C00022_eEC11140^1))^0.5;
  hKcat_R_R272 := Kcat_V_R272*(Keq_R272*Km_C00006_eEC11140^1*Km_C00149_eEC11140^1/(Km_C00005_eEC11140^1*Km_C00011_eEC11140^1*Km_C00022_eEC11140^1))^(-0.5);
  R272_f := eEC11140*(hKcat_F_R272*C00006^1*C00149^1/(Km_C00006_eEC11140^1*Km_C00149_eEC11140^1))/R272_D;
  R272_r := eEC11140*(hKcat_R_R272*C00005^1*C00011^1*C00022^1/(Km_C00005_eEC11140^1*Km_C00011_eEC11140^1*Km_C00022_eEC11140^1))/R272_D;
  R273_D := (1 + C00036/Km_C00036_eEC11140)^1 + (1 + C00011/Km_C00011_eEC11140)^1*(1 + C00022/Km_C00022_eEC11140)^1 - 1;
  hKcat_F_R273 := Kcat_V_R273*(Keq_R273*Km_C00036_eEC11140^1/(Km_C00011_eEC11140^1*Km_C00022_eEC11140^1))^0.5;
  hKcat_R_R273 := Kcat_V_R273*(Keq_R273*Km_C00036_eEC11140^1/(Km_C00011_eEC11140^1*Km_C00022_eEC11140^1))^(-0.5);
  R273_f := eEC11140*(hKcat_F_R273*C00036^1/Km_C00036_eEC11140^1)/R273_D;
  R273_r := eEC11140*(hKcat_R_R273*C00011^1*C00022^1/(Km_C00011_eEC11140^1*Km_C00022_eEC11140^1))/R273_D;
  R299_D := (1 + C00003/Km_C00003_eEC1242)^1*(1 + C00010/Km_C00010_eEC1242)^1*(1 + C00322/Km_C00322_eEC1242)^1 + (1 + C00004/Km_C00004_eEC1242)^1*(1 + C00011/Km_C00011_eEC1242)^1*(1 + C00527/Km_C00527_eEC1242)^1 - 1;
  hKcat_F_R299 := Kcat_V_R299*(Keq_R299*Km_C00003_eEC1242^1*Km_C00010_eEC1242^1*Km_C00322_eEC1242^1/(Km_C00004_eEC1242^1*Km_C00011_eEC1242^1*Km_C00527_eEC1242^1))^0.5;
  hKcat_R_R299 := Kcat_V_R299*(Keq_R299*Km_C00003_eEC1242^1*Km_C00010_eEC1242^1*Km_C00322_eEC1242^1/(Km_C00004_eEC1242^1*Km_C00011_eEC1242^1*Km_C00527_eEC1242^1))^(-0.5);
  R299_f := eEC1242*(hKcat_F_R299*C00003^1*C00010^1*C00322^1/(Km_C00003_eEC1242^1*Km_C00010_eEC1242^1*Km_C00322_eEC1242^1))/R299_D;
  R299_r := eEC1242*(hKcat_R_R299*C00004^1*C00011^1*C00527^1/(Km_C00004_eEC1242^1*Km_C00011_eEC1242^1*Km_C00527_eEC1242^1))/R299_D;
  R300_D := (1 + C00003/Km_C00003_eEC1242)^1*(1 + C00010/Km_C00010_eEC1242)^1*(1 + C00026/Km_C00026_eEC1242)^1 + (1 + C00004/Km_C00004_eEC1242)^1*(1 + C00011/Km_C00011_eEC1242)^1*(1 + C00091/Km_C00091_eEC1242)^1 - 1;
  hKcat_F_R300 := Kcat_V_R300*(Keq_R300*Km_C00003_eEC1242^1*Km_C00010_eEC1242^1*Km_C00026_eEC1242^1/(Km_C00004_eEC1242^1*Km_C00011_eEC1242^1*Km_C00091_eEC1242^1))^0.5;
  hKcat_R_R300 := Kcat_V_R300*(Keq_R300*Km_C00003_eEC1242^1*Km_C00010_eEC1242^1*Km_C00026_eEC1242^1/(Km_C00004_eEC1242^1*Km_C00011_eEC1242^1*Km_C00091_eEC1242^1))^(-0.5);
  R300_f := eEC1242*(hKcat_F_R300*C00003^1*C00010^1*C00026^1/(Km_C00003_eEC1242^1*Km_C00010_eEC1242^1*Km_C00026_eEC1242^1))/R300_D;
  R300_r := eEC1242*(hKcat_R_R300*C00004^1*C00011^1*C00091^1/(Km_C00004_eEC1242^1*Km_C00011_eEC1242^1*Km_C00091_eEC1242^1))/R300_D;
  R304_D := (1 + C00009/Km_C00009_eEC2318)^1*(1 + C00024/Km_C00024_eEC2318)^1 + (1 + C00010/Km_C00010_eEC2318)^1*(1 + C00227/Km_C00227_eEC2318)^1 - 1;
  hKcat_F_R304 := Kcat_V_R304*(Keq_R304*Km_C00009_eEC2318^1*Km_C00024_eEC2318^1/(Km_C00010_eEC2318^1*Km_C00227_eEC2318^1))^0.5;
  hKcat_R_R304 := Kcat_V_R304*(Keq_R304*Km_C00009_eEC2318^1*Km_C00024_eEC2318^1/(Km_C00010_eEC2318^1*Km_C00227_eEC2318^1))^(-0.5);
  R304_f := eEC2318*(hKcat_F_R304*C00009^1*C00024^1/(Km_C00009_eEC2318^1*Km_C00024_eEC2318^1))/R304_D;
  R304_r := eEC2318*(hKcat_R_R304*C00010^1*C00227^1/(Km_C00010_eEC2318^1*Km_C00227_eEC2318^1))/R304_D;
  R305_D := (1 + C00009/Km_C00009_eEC2318)^1*(1 + C00100/Km_C00100_eEC2318)^1 + (1 + C00010/Km_C00010_eEC2318)^1*(1 + C02876/Km_C02876_eEC2318)^1 - 1;
  hKcat_F_R305 := Kcat_V_R305*(Keq_R305*Km_C00009_eEC2318^1*Km_C00100_eEC2318^1/(Km_C00010_eEC2318^1*Km_C02876_eEC2318^1))^0.5;
  hKcat_R_R305 := Kcat_V_R305*(Keq_R305*Km_C00009_eEC2318^1*Km_C00100_eEC2318^1/(Km_C00010_eEC2318^1*Km_C02876_eEC2318^1))^(-0.5);
  R305_f := eEC2318*(hKcat_F_R305*C00009^1*C00100^1/(Km_C00009_eEC2318^1*Km_C00100_eEC2318^1))/R305_D;
  R305_r := eEC2318*(hKcat_R_R305*C00010^1*C02876^1/(Km_C00010_eEC2318^1*Km_C02876_eEC2318^1))/R305_D;
  R307_D := (1 + C00002/Km_C00002_eEC41149)^1*(1 + C00036/Km_C00036_eEC41149)^1 + (1 + C00008/Km_C00008_eEC41149)^1*(1 + C00011/Km_C00011_eEC41149)^1*(1 + C00074/Km_C00074_eEC41149)^1 - 1;
  hKcat_F_R307 := Kcat_V_R307*(Keq_R307*Km_C00002_eEC41149^1*Km_C00036_eEC41149^1/(Km_C00008_eEC41149^1*Km_C00011_eEC41149^1*Km_C00074_eEC41149^1))^0.5;
  hKcat_R_R307 := Kcat_V_R307*(Keq_R307*Km_C00002_eEC41149^1*Km_C00036_eEC41149^1/(Km_C00008_eEC41149^1*Km_C00011_eEC41149^1*Km_C00074_eEC41149^1))^(-0.5);
  R307_f := eEC41149*(hKcat_F_R307*C00002^1*C00036^1/(Km_C00002_eEC41149^1*Km_C00036_eEC41149^1))/R307_D;
  R307_r := eEC41149*(hKcat_R_R307*C00008^1*C00011^1*C00074^1/(Km_C00008_eEC41149^1*Km_C00011_eEC41149^1*Km_C00074_eEC41149^1))/R307_D;
  R308_D := (1 + C00009/Km_C00009_eEC41131)^1*(1 + C00036/Km_C00036_eEC41131)^1 + (1 + C00011/Km_C00011_eEC41131)^1*(1 + C00074/Km_C00074_eEC41131)^1 - 1;
  hKcat_F_R308 := Kcat_V_R308*(Keq_R308*Km_C00009_eEC41131^1*Km_C00036_eEC41131^1/(Km_C00011_eEC41131^1*Km_C00074_eEC41131^1))^0.5;
  hKcat_R_R308 := Kcat_V_R308*(Keq_R308*Km_C00009_eEC41131^1*Km_C00036_eEC41131^1/(Km_C00011_eEC41131^1*Km_C00074_eEC41131^1))^(-0.5);
  R308_f := eEC41131*(hKcat_F_R308*C00009^1*C00036^1/(Km_C00009_eEC41131^1*Km_C00036_eEC41131^1))/R308_D;
  R308_r := eEC41131*(hKcat_R_R308*C00011^1*C00074^1/(Km_C00011_eEC41131^1*Km_C00074_eEC41131^1))/R308_D;
  R346_D := (1 + C00003/Km_C00003_eEC1241)^1*(1 + C00010/Km_C00010_eEC1241)^1*(1 + C00022/Km_C00022_eEC1241)^1 + (1 + C00004/Km_C00004_eEC1241)^1*(1 + C00011/Km_C00011_eEC1241)^1*(1 + C00024/Km_C00024_eEC1241)^1 - 1;
  hKcat_F_R346 := Kcat_V_R346*(Keq_R346*Km_C00003_eEC1241^1*Km_C00010_eEC1241^1*Km_C00022_eEC1241^1/(Km_C00004_eEC1241^1*Km_C00011_eEC1241^1*Km_C00024_eEC1241^1))^0.5;
  hKcat_R_R346 := Kcat_V_R346*(Keq_R346*Km_C00003_eEC1241^1*Km_C00010_eEC1241^1*Km_C00022_eEC1241^1/(Km_C00004_eEC1241^1*Km_C00011_eEC1241^1*Km_C00024_eEC1241^1))^(-0.5);
  R346_f := eEC1241*(hKcat_F_R346*C00003^1*C00010^1*C00022^1/(Km_C00003_eEC1241^1*Km_C00010_eEC1241^1*Km_C00022_eEC1241^1))/R346_D;
  R346_r := eEC1241*(hKcat_R_R346*C00004^1*C00011^1*C00024^1/(Km_C00004_eEC1241^1*Km_C00011_eEC1241^1*Km_C00024_eEC1241^1))/R346_D;
  R347_D := (1 + C00002/Km_C00002_eEC27140)^1*(1 + C00022/Km_C00022_eEC27140)^1 + (1 + C00008/Km_C00008_eEC27140)^1*(1 + C00074/Km_C00074_eEC27140)^1 - 1;
  hKcat_F_R347 := Kcat_V_R347*(Keq_R347*Km_C00002_eEC27140^1*Km_C00022_eEC27140^1/(Km_C00008_eEC27140^1*Km_C00074_eEC27140^1))^0.5;
  hKcat_R_R347 := Kcat_V_R347*(Keq_R347*Km_C00002_eEC27140^1*Km_C00022_eEC27140^1/(Km_C00008_eEC27140^1*Km_C00074_eEC27140^1))^(-0.5);
  R347_f := eEC27140*(hKcat_F_R347*C00002^1*C00022^1/(Km_C00002_eEC27140^1*Km_C00022_eEC27140^1))/R347_D;
  R347_r := eEC27140*(hKcat_R_R347*C00008^1*C00074^1/(Km_C00008_eEC27140^1*Km_C00074_eEC27140^1))/R347_D;
  R348_D := (1 + C00022/Km_C00022_eEC27140)^1*(1 + C00131/Km_C00131_eEC27140)^1 + (1 + C00074/Km_C00074_eEC27140)^1*(1 + C00206/Km_C00206_eEC27140)^1 - 1;
  hKcat_F_R348 := Kcat_V_R348*(Keq_R348*Km_C00022_eEC27140^1*Km_C00131_eEC27140^1/(Km_C00074_eEC27140^1*Km_C00206_eEC27140^1))^0.5;
  hKcat_R_R348 := Kcat_V_R348*(Keq_R348*Km_C00022_eEC27140^1*Km_C00131_eEC27140^1/(Km_C00074_eEC27140^1*Km_C00206_eEC27140^1))^(-0.5);
  R348_f := eEC27140*(hKcat_F_R348*C00022^1*C00131^1/(Km_C00022_eEC27140^1*Km_C00131_eEC27140^1))/R348_D;
  R348_r := eEC27140*(hKcat_R_R348*C00074^1*C00206^1/(Km_C00074_eEC27140^1*Km_C00206_eEC27140^1))/R348_D;
  R349_D := (1 + C00022/Km_C00022_eEC27140)^1*(1 + C00286/Km_C00286_eEC27140)^1 + (1 + C00074/Km_C00074_eEC27140)^1*(1 + C00361/Km_C00361_eEC27140)^1 - 1;
  hKcat_F_R349 := Kcat_V_R349*(Keq_R349*Km_C00022_eEC27140^1*Km_C00286_eEC27140^1/(Km_C00074_eEC27140^1*Km_C00361_eEC27140^1))^0.5;
  hKcat_R_R349 := Kcat_V_R349*(Keq_R349*Km_C00022_eEC27140^1*Km_C00286_eEC27140^1/(Km_C00074_eEC27140^1*Km_C00361_eEC27140^1))^(-0.5);
  R349_f := eEC27140*(hKcat_F_R349*C00022^1*C00286^1/(Km_C00022_eEC27140^1*Km_C00286_eEC27140^1))/R349_D;
  R349_r := eEC27140*(hKcat_R_R349*C00074^1*C00361^1/(Km_C00074_eEC27140^1*Km_C00361_eEC27140^1))/R349_D;
  R350_D := (1 + C00022/Km_C00022_eEC27140)^1*(1 + C00201/Km_C00201_eEC27140)^1 + (1 + C00074/Km_C00074_eEC27140)^1*(1 + C00454/Km_C00454_eEC27140)^1 - 1;
  hKcat_F_R350 := Kcat_V_R350*(Keq_R350*Km_C00022_eEC27140^1*Km_C00201_eEC27140^1/(Km_C00074_eEC27140^1*Km_C00454_eEC27140^1))^0.5;
  hKcat_R_R350 := Kcat_V_R350*(Keq_R350*Km_C00022_eEC27140^1*Km_C00201_eEC27140^1/(Km_C00074_eEC27140^1*Km_C00454_eEC27140^1))^(-0.5);
  R350_f := eEC27140*(hKcat_F_R350*C00022^1*C00201^1/(Km_C00022_eEC27140^1*Km_C00201_eEC27140^1))/R350_D;
  R350_r := eEC27140*(hKcat_R_R350*C00074^1*C00454^1/(Km_C00074_eEC27140^1*Km_C00454_eEC27140^1))/R350_D;
  R351_D := (1 + C00002/Km_C00002_eEC2792)^1*(1 + C00022/Km_C00022_eEC2792)^1 + (1 + C00009/Km_C00009_eEC2792)^1*(1 + C00020/Km_C00020_eEC2792)^1*(1 + C00074/Km_C00074_eEC2792)^1 - 1;
  hKcat_F_R351 := Kcat_V_R351*(Keq_R351*Km_C00002_eEC2792^1*Km_C00022_eEC2792^1/(Km_C00009_eEC2792^1*Km_C00020_eEC2792^1*Km_C00074_eEC2792^1))^0.5;
  hKcat_R_R351 := Kcat_V_R351*(Keq_R351*Km_C00002_eEC2792^1*Km_C00022_eEC2792^1/(Km_C00009_eEC2792^1*Km_C00020_eEC2792^1*Km_C00074_eEC2792^1))^(-0.5);
  R351_f := eEC2792*(hKcat_F_R351*C00002^1*C00022^1/(Km_C00002_eEC2792^1*Km_C00022_eEC2792^1))/R351_D;
  R351_r := eEC2792*(hKcat_R_R351*C00009^1*C00020^1*C00074^1/(Km_C00009_eEC2792^1*Km_C00020_eEC2792^1*Km_C00074_eEC2792^1))/R351_D;
  R371_D := (1 + C00042/Km_C00042_eEC1351)^1*(1 + C00399/Km_C00399_eEC1351)^1 + (1 + C00122/Km_C00122_eEC1351)^1*(1 + C00390/Km_C00390_eEC1351)^1 - 1;
  hKcat_F_R371 := Kcat_V_R371*(Keq_R371*Km_C00042_eEC1351^1*Km_C00399_eEC1351^1/(Km_C00122_eEC1351^1*Km_C00390_eEC1351^1))^0.5;
  hKcat_R_R371 := Kcat_V_R371*(Keq_R371*Km_C00042_eEC1351^1*Km_C00399_eEC1351^1/(Km_C00122_eEC1351^1*Km_C00390_eEC1351^1))^(-0.5);
  R371_f := eEC1351*(hKcat_F_R371*C00042^1*C00399^1/(Km_C00042_eEC1351^1*Km_C00399_eEC1351^1))/R371_D;
  R371_r := eEC1351*(hKcat_R_R371*C00122^1*C00390^1/(Km_C00122_eEC1351^1*Km_C00390_eEC1351^1))/R371_D;
  R372_D := (1 + C00002/Km_C00002_eEC6215)^1*(1 + C00010/Km_C00010_eEC6215)^1*(1 + C00042/Km_C00042_eEC6215)^1 + (1 + C00008/Km_C00008_eEC6215)^1*(1 + C00009/Km_C00009_eEC6215)^1*(1 + C00091/Km_C00091_eEC6215)^1 - 1;
  hKcat_F_R372 := Kcat_V_R372*(Keq_R372*Km_C00002_eEC6215^1*Km_C00010_eEC6215^1*Km_C00042_eEC6215^1/(Km_C00008_eEC6215^1*Km_C00009_eEC6215^1*Km_C00091_eEC6215^1))^0.5;
  hKcat_R_R372 := Kcat_V_R372*(Keq_R372*Km_C00002_eEC6215^1*Km_C00010_eEC6215^1*Km_C00042_eEC6215^1/(Km_C00008_eEC6215^1*Km_C00009_eEC6215^1*Km_C00091_eEC6215^1))^(-0.5);
  R372_f := eEC6215*(hKcat_F_R372*C00002^1*C00010^1*C00042^1/(Km_C00002_eEC6215^1*Km_C00010_eEC6215^1*Km_C00042_eEC6215^1))/R372_D;
  R372_r := eEC6215*(hKcat_R_R372*C00008^1*C00009^1*C00091^1/(Km_C00008_eEC6215^1*Km_C00009_eEC6215^1*Km_C00091_eEC6215^1))/R372_D;
  R373_D := (1 + C00002/Km_C00002_eEC6215)^1*(1 + C00010/Km_C00010_eEC6215)^1*(1 + C00490/Km_C00490_eEC6215)^1 + (1 + C00008/Km_C00008_eEC6215)^1*(1 + C00009/Km_C00009_eEC6215)^1*(1 + C00531/Km_C00531_eEC6215)^1 - 1;
  hKcat_F_R373 := Kcat_V_R373*(Keq_R373*Km_C00002_eEC6215^1*Km_C00010_eEC6215^1*Km_C00490_eEC6215^1/(Km_C00008_eEC6215^1*Km_C00009_eEC6215^1*Km_C00531_eEC6215^1))^0.5;
  hKcat_R_R373 := Kcat_V_R373*(Keq_R373*Km_C00002_eEC6215^1*Km_C00010_eEC6215^1*Km_C00490_eEC6215^1/(Km_C00008_eEC6215^1*Km_C00009_eEC6215^1*Km_C00531_eEC6215^1))^(-0.5);
  R373_f := eEC6215*(hKcat_F_R373*C00002^1*C00010^1*C00490^1/(Km_C00002_eEC6215^1*Km_C00010_eEC6215^1*Km_C00490_eEC6215^1))/R373_D;
  R373_r := eEC6215*(hKcat_R_R373*C00008^1*C00009^1*C00531^1/(Km_C00008_eEC6215^1*Km_C00009_eEC6215^1*Km_C00531_eEC6215^1))/R373_D;
  R406_D := (1 + C00065/Km_C00065_hEC43117)^1 + (1 + C00014/Km_C00014_hEC43117)^1*(1 + C00022/Km_C00022_hEC43117)^1 - 1;
  hKcat_F_R406 := Kcat_V_R406*(Keq_R406*Km_C00065_hEC43117^1/(Km_C00014_hEC43117^1*Km_C00022_hEC43117^1))^0.5;
  hKcat_R_R406 := Kcat_V_R406*(Keq_R406*Km_C00065_hEC43117^1/(Km_C00014_hEC43117^1*Km_C00022_hEC43117^1))^(-0.5);
  R406_f := hEC43117*(hKcat_F_R406*C00065^1/Km_C00065_hEC43117^1)/R406_D;
  R406_r := hEC43117*(hKcat_R_R406*C00014^1*C00022^1/(Km_C00014_hEC43117^1*Km_C00022_hEC43117^1))/R406_D;
  R197_D := (1 + C00003/Km_C00003_hEC11719)^1*(1 + C00058/Km_C00058_hEC11719)^1 + (1 + C00004/Km_C00004_hEC11719)^1*(1 + C00011/Km_C00011_hEC11719)^1 - 1;
  hKcat_F_R197 := Kcat_V_R197*(Keq_R197*Km_C00003_hEC11719^1*Km_C00058_hEC11719^1/(Km_C00004_hEC11719^1*Km_C00011_hEC11719^1))^0.5;
  hKcat_R_R197 := Kcat_V_R197*(Keq_R197*Km_C00003_hEC11719^1*Km_C00058_hEC11719^1/(Km_C00004_hEC11719^1*Km_C00011_hEC11719^1))^(-0.5);
  R197_f := hEC11719*(hKcat_F_R197*C00003^1*C00058^1/(Km_C00003_hEC11719^1*Km_C00058_hEC11719^1))/R197_D;
  R197_r := hEC11719*(hKcat_R_R197*C00004^1*C00011^1/(Km_C00004_hEC11719^1*Km_C00011_hEC11719^1))/R197_D;
  R269_D := (1 + C00003/Km_C00003_hEC11137)^1*(1 + C00149/Km_C00149_hEC11137)^1 + (1 + C00004/Km_C00004_hEC11137)^1*(1 + C00036/Km_C00036_hEC11137)^1 - 1;
  hKcat_F_R269 := Kcat_V_R269*(Keq_R269*Km_C00003_hEC11137^1*Km_C00149_hEC11137^1/(Km_C00004_hEC11137^1*Km_C00036_hEC11137^1))^0.5;
  hKcat_R_R269 := Kcat_V_R269*(Keq_R269*Km_C00003_hEC11137^1*Km_C00149_hEC11137^1/(Km_C00004_hEC11137^1*Km_C00036_hEC11137^1))^(-0.5);
  R269_f := hEC11137*(hKcat_F_R269*C00003^1*C00149^1/(Km_C00003_hEC11137^1*Km_C00149_hEC11137^1))/R269_D;
  R269_r := hEC11137*(hKcat_R_R269*C00004^1*C00036^1/(Km_C00004_hEC11137^1*Km_C00036_hEC11137^1))/R269_D;
  R345_D := (1 + C00002/Km_C00002_hEC6411)^1*(1 + C00022/Km_C00022_hEC6411)^1*(1 + C00011/Km_C00011_hEC6411)^1 + (1 + C00008/Km_C00008_hEC6411)^1*(1 + C00009/Km_C00009_hEC6411)^1*(1 + C00036/Km_C00036_hEC6411)^1 - 1;
  hKcat_F_R345 := Kcat_V_R345*(Keq_R345*Km_C00002_hEC6411^1*Km_C00022_hEC6411^1*Km_C00011_hEC6411^1/(Km_C00008_hEC6411^1*Km_C00009_hEC6411^1*Km_C00036_hEC6411^1))^0.5;
  hKcat_R_R345 := Kcat_V_R345*(Keq_R345*Km_C00002_hEC6411^1*Km_C00022_hEC6411^1*Km_C00011_hEC6411^1/(Km_C00008_hEC6411^1*Km_C00009_hEC6411^1*Km_C00036_hEC6411^1))^(-0.5);
  R345_f := hEC6411*(hKcat_F_R345*C00002^1*C00022^1*C00011^1/(Km_C00002_hEC6411^1*Km_C00022_hEC6411^1*Km_C00011_hEC6411^1))/R345_D;
  R345_r := hEC6411*(hKcat_R_R345*C00008^1*C00009^1*C00036^1/(Km_C00008_hEC6411^1*Km_C00009_hEC6411^1*Km_C00036_hEC6411^1))/R345_D;
  R62_D := (1 + C00011/Km_C00011_eEC2216)^1*(1 + C06010/Km_C06010_eEC2216)^1 + (1 + C00022/Km_C00022_eEC2216)^2 - 1;
  hKcat_F_R62 := Kcat_V_R62*(Keq_R62*Km_C00011_eEC2216^1*Km_C06010_eEC2216^1/Km_C00022_eEC2216^2)^0.5;
  hKcat_R_R62 := Kcat_V_R62*(Keq_R62*Km_C00011_eEC2216^1*Km_C06010_eEC2216^1/Km_C00022_eEC2216^2)^(-0.5);
  R62_f := eEC2216*(hKcat_F_R62*C00011^1*C06010^1/(Km_C00011_eEC2216^1*Km_C06010_eEC2216^1))/R62_D;
  R62_r := eEC2216*(hKcat_R_R62*C00022^2/Km_C00022_eEC2216^2)/R62_D;
  R63_D := (1 + C00022/Km_C00022_eEC2216)^1*(1 + C00109/Km_C00109_eEC2216)^1 + (1 + C00011/Km_C00011_eEC2216)^1*(1 + C06006/Km_C06006_eEC2216)^1 - 1;
  hKcat_F_R63 := Kcat_V_R63*(Keq_R63*Km_C00022_eEC2216^1*Km_C00109_eEC2216^1/(Km_C00011_eEC2216^1*Km_C06006_eEC2216^1))^0.5;
  hKcat_R_R63 := Kcat_V_R63*(Keq_R63*Km_C00022_eEC2216^1*Km_C00109_eEC2216^1/(Km_C00011_eEC2216^1*Km_C06006_eEC2216^1))^(-0.5);
  R63_f := eEC2216*(hKcat_F_R63*C00022^1*C00109^1/(Km_C00022_eEC2216^1*Km_C00109_eEC2216^1))/R63_D;
  R63_r := eEC2216*(hKcat_R_R63*C00011^1*C06006^1/(Km_C00011_eEC2216^1*Km_C06006_eEC2216^1))/R63_D;
  R227_D := (1 + C00037/Km_C00037_eEC2121)^1*(1 + C00143/Km_C00143_eEC2121)^1 + (1 + C00065/Km_C00065_eEC2121)^1*(1 + C00101/Km_C00101_eEC2121)^1 - 1;
  hKcat_F_R227 := Kcat_V_R227*(Keq_R227*Km_C00037_eEC2121^1*Km_C00143_eEC2121^1/(Km_C00065_eEC2121^1*Km_C00101_eEC2121^1))^0.5;
  hKcat_R_R227 := Kcat_V_R227*(Keq_R227*Km_C00037_eEC2121^1*Km_C00143_eEC2121^1/(Km_C00065_eEC2121^1*Km_C00101_eEC2121^1))^(-0.5);
  R227_f := eEC2121*(hKcat_F_R227*C00037^1*C00143^1/(Km_C00037_eEC2121^1*Km_C00143_eEC2121^1))/R227_D;
  R227_r := eEC2121*(hKcat_R_R227*C00065^1*C00101^1/(Km_C00065_eEC2121^1*Km_C00101_eEC2121^1))/R227_D;
  R228_D := (1 + C00065/Km_C00065_eEC2121)^1*(1 + C01217/Km_C01217_eEC2121)^1 + (1 + C00037/Km_C00037_eEC2121)^1*(1 + C04377/Km_C04377_eEC2121)^1 - 1;
  hKcat_F_R228 := Kcat_V_R228*(Keq_R228*Km_C00065_eEC2121^1*Km_C01217_eEC2121^1/(Km_C00037_eEC2121^1*Km_C04377_eEC2121^1))^0.5;
  hKcat_R_R228 := Kcat_V_R228*(Keq_R228*Km_C00065_eEC2121^1*Km_C01217_eEC2121^1/(Km_C00037_eEC2121^1*Km_C04377_eEC2121^1))^(-0.5);
  R228_f := eEC2121*(hKcat_F_R228*C00065^1*C01217^1/(Km_C00065_eEC2121^1*Km_C01217_eEC2121^1))/R228_D;
  R228_r := eEC2121*(hKcat_R_R228*C00037^1*C04377^1/(Km_C00037_eEC2121^1*Km_C04377_eEC2121^1))/R228_D;
  R219_D := (1 + C00002/Km_C00002_eEC6323)^1*(1 + C00037/Km_C00037_eEC6323)^1*(1 + C00669/Km_C00669_eEC6323)^1 + (1 + C00008/Km_C00008_eEC6323)^1*(1 + C00009/Km_C00009_eEC6323)^1*(1 + C00051/Km_C00051_eEC6323)^1 - 1;
  hKcat_F_R219 := Kcat_V_R219*(Keq_R219*Km_C00002_eEC6323^1*Km_C00037_eEC6323^1*Km_C00669_eEC6323^1/(Km_C00008_eEC6323^1*Km_C00009_eEC6323^1*Km_C00051_eEC6323^1))^0.5;
  hKcat_R_R219 := Kcat_V_R219*(Keq_R219*Km_C00002_eEC6323^1*Km_C00037_eEC6323^1*Km_C00669_eEC6323^1/(Km_C00008_eEC6323^1*Km_C00009_eEC6323^1*Km_C00051_eEC6323^1))^(-0.5);
  R219_f := eEC6323*(hKcat_F_R219*C00002^1*C00037^1*C00669^1/(Km_C00002_eEC6323^1*Km_C00037_eEC6323^1*Km_C00669_eEC6323^1))/R219_D;
  R219_r := eEC6323*(hKcat_R_R219*C00008^1*C00009^1*C00051^1/(Km_C00008_eEC6323^1*Km_C00009_eEC6323^1*Km_C00051_eEC6323^1))/R219_D;
  R224_D := (1 + C00024/Km_C00024_eEC23129)^1*(1 + C00037/Km_C00037_eEC23129)^1 + (1 + C00010/Km_C00010_eEC23129)^1*(1 + C03508/Km_C03508_eEC23129)^1 - 1;
  hKcat_F_R224 := Kcat_V_R224*(Keq_R224*Km_C00024_eEC23129^1*Km_C00037_eEC23129^1/(Km_C00010_eEC23129^1*Km_C03508_eEC23129^1))^0.5;
  hKcat_R_R224 := Kcat_V_R224*(Keq_R224*Km_C00024_eEC23129^1*Km_C00037_eEC23129^1/(Km_C00010_eEC23129^1*Km_C03508_eEC23129^1))^(-0.5);
  R224_f := eEC23129*(hKcat_F_R224*C00024^1*C00037^1/(Km_C00024_eEC23129^1*Km_C00037_eEC23129^1))/R224_D;
  R224_r := eEC23129*(hKcat_R_R224*C00010^1*C03508^1/(Km_C00010_eEC23129^1*Km_C03508_eEC23129^1))/R224_D;
  R225_D := (1 + C00037/Km_C00037_eEC1442)^1*(1 + C02051/Km_C02051_eEC1442)^1 + (1 + C00011/Km_C00011_eEC1442)^1*(1 + C01242/Km_C01242_eEC1442)^1 - 1;
  hKcat_F_R225 := Kcat_V_R225*(Keq_R225*Km_C00037_eEC1442^1*Km_C02051_eEC1442^1/(Km_C00011_eEC1442^1*Km_C01242_eEC1442^1))^0.5;
  hKcat_R_R225 := Kcat_V_R225*(Keq_R225*Km_C00037_eEC1442^1*Km_C02051_eEC1442^1/(Km_C00011_eEC1442^1*Km_C01242_eEC1442^1))^(-0.5);
  R225_f := eEC1442*(hKcat_F_R225*C00037^1*C02051^1/(Km_C00037_eEC1442^1*Km_C02051_eEC1442^1))/R225_D;
  R225_r := eEC1442*(hKcat_R_R225*C00011^1*C01242^1/(Km_C00011_eEC1442^1*Km_C01242_eEC1442^1))/R225_D;
  R258_D := (1 + C00311/Km_C00311_eEC4131)^1 + (1 + C00042/Km_C00042_eEC4131)^1*(1 + C00048/Km_C00048_eEC4131)^1 - 1;
  hKcat_F_R258 := Kcat_V_R258*(Keq_R258*Km_C00311_eEC4131^1/(Km_C00042_eEC4131^1*Km_C00048_eEC4131^1))^0.5;
  hKcat_R_R258 := Kcat_V_R258*(Keq_R258*Km_C00311_eEC4131^1/(Km_C00042_eEC4131^1*Km_C00048_eEC4131^1))^(-0.5);
  R258_f := eEC4131*(hKcat_F_R258*C00311^1/Km_C00311_eEC4131^1)/R258_D;
  R258_r := eEC4131*(hKcat_R_R258*C00042^1*C00048^1/(Km_C00042_eEC4131^1*Km_C00048_eEC4131^1))/R258_D;

  // Reactions:
  R56: C00002 + C00033 + eEC2721 -> eEC2721 + C00008 + C00227; R56_f - R56_r;
  R57: C00002 + C00163 + eEC2721 -> eEC2721 + C00008 + C02876; R57_f - R57_r;
  R58: C00002 + C00010 + C00033 + eEC6211 -> eEC6211 + C00013 + C00020 + C00024; R58_f - R58_r;
  R59: C00010 + C05993 + eEC6211 -> eEC6211 + C00020 + C00024; R59_f - R59_r;
  R60: C00002 + C00033 + eEC6211 -> eEC6211 + C00013 + C05993; R60_f - R60_r;
  R61: C00002 + C00010 + C00163 + eEC6211 -> eEC6211 + C00013 + C00020 + C00100; R61_f - R61_r;
  R64: C00002 + C00024 + C00011 + eEC6412 -> eEC6412 + C00008 + C00009 + C00083; R64_f - R64_r;
  R69: C00158 + eEC4213 -> eEC4213 + C00311; R69_f - R69_r;
  R70: C00158 + eEC4213 -> eEC4213 + C00001 + C00417; R70_f - R70_r;
  R71: C00311 + eEC4213 -> eEC4213 + C00001 + C00417; R71_f - R71_r;
  R83: C00003 + C00469 + eEC1111 -> eEC1111 + C00004 + C00080 + C00084; R83_f - R83_r;
  R84: C00003 + C00473 + eEC1111 -> eEC1111 + C00004 + C00080 + C00376; R84_f - R84_r;
  R85: C00003 + C05576 + eEC1111 -> eEC1111 + C00004 + C00080 + C05577; R85_f - R85_r;
  R86: C00003 + C06611 + eEC1111 -> eEC1111 + C00004 + C00080 + C06613; R86_f - R86_r;
  R87: C00003 + C06612 + eEC1111 -> eEC1111 + C00004 + C00080 + C16348; R87_f - R87_r;
  R88: C00003 + C00114 + eEC1111 -> eEC1111 + C00004 + C00080 + C00576; R88_f - R88_r;
  R89: C00006 + C00114 + eEC1111 -> eEC1111 + C00005 + C00080 + C00576; R89_f - R89_r;
  R90: C00006 + C00469 + eEC1112 -> eEC1112 + C00005 + C00080 + C00084; R90_f - R90_r;
  R123: C00002 + C00010 + C00158 + eEC2338 -> eEC2338 + C00008 + C00009 + C00024 + C00036; R123_f - R123_r;
  R157: C00010 + C00158 + eEC23316 -> eEC23316 + C00001 + C00024 + C00036; R157_f - R157_r;
  R169: C00003 + C02972 + eEC1814 -> eEC1814 + C00004 + C00080 + C02051; R169_f - R169_r;
  R170: C00003 + C15973 + eEC1814 -> eEC1814 + C00004 + C00080 + C15972; R170_f - R170_r;
  R171: C00003 + C00010 + C00022 + eEC1814 -> eEC1814 + C00004 + C00011 + C00024 + C00080; R171_f - R171_r;
  R172: C00003 + C00037 + C00101 + eEC1814 -> eEC1814 + C00004 + C00011 + C00014 + C00080 + C00143; R172_f - R172_r;
  R173: C00003 + C00010 + C00322 + eEC1814 -> eEC1814 + C00004 + C00011 + C00080 + C00527; R173_f - R173_r;
  R174: C00003 + C00010 + C00026 + eEC1814 -> eEC1814 + C00004 + C00011 + C00080 + C00091; R174_f - R174_r;
  R175: C00003 + C00010 + C00022 + eEC23112 -> eEC23112 + C00004 + C00011 + C00024 + C00080; R175_f - R175_r;
  R176: C00003 + C00010 + C00322 + eEC23161 -> eEC23161 + C00004 + C00011 + C00080 + C00527; R176_f - R176_r;
  R177: C00003 + C00010 + C00026 + eEC23161 -> eEC23161 + C00004 + C00011 + C00080 + C00091; R177_f - R177_r;
  R181: C00003 + C00256 + eEC11128 -> eEC11128 + C00004 + C00022 + C00080; R181_f - R181_r;
  R204: C00149 + eEC4212 -> eEC4212 + C00001 + C00122; R204_f - R204_r;
  R245: C00001 + C03451 + eEC3126 -> eEC3126 + C00051 + C00256; R245_f - R245_r;
  R255: C00006 + C00311 + eEC11142 -> eEC11142 + C00005 + C00011 + C00026 + C00080; R255_f - R255_r;
  R256: C05379 + eEC11142 -> eEC11142 + C00011 + C00026; R256_f - R256_r;
  R257: C00006 + C00311 + eEC11142 -> eEC11142 + C00005 + C00080 + C05379; R257_f - R257_r;
  R268: C00003 + C00149 + eEC11137 -> eEC11137 + C00004 + C00036 + C00080; R268_f - R268_r;
  R270: C00003 + C00149 + eEC11138 -> eEC11138 + C00004 + C00011 + C00022 + C00080; R270_f - R270_r;
  R271: C00036 + eEC11138 -> eEC11138 + C00011 + C00022; R271_f - R271_r;
  R272: C00006 + C00149 + eEC11140 -> eEC11140 + C00005 + C00011 + C00022 + C00080; R272_f - R272_r;
  R273: C00036 + eEC11140 -> eEC11140 + C00011 + C00022; R273_f - R273_r;
  R299: C00003 + C00010 + C00322 + eEC1242 -> eEC1242 + C00004 + C00011 + C00080 + C00527; R299_f - R299_r;
  R300: C00003 + C00010 + C00026 + eEC1242 -> eEC1242 + C00004 + C00011 + C00080 + C00091; R300_f - R300_r;
  R304: C00009 + C00024 + eEC2318 -> eEC2318 + C00010 + C00227; R304_f - R304_r;
  R305: C00009 + C00100 + eEC2318 -> eEC2318 + C00010 + C02876; R305_f - R305_r;
  R307: C00002 + C00036 + eEC41149 -> eEC41149 + C00008 + C00011 + C00074; R307_f - R307_r;
  R308: C00009 + C00036 + eEC41131 -> eEC41131 + C00001 + C00011 + C00074; R308_f - R308_r;
  R346: C00003 + C00010 + C00022 + eEC1241 -> eEC1241 + C00004 + C00011 + C00024 + C00080; R346_f - R346_r;
  R347: C00002 + C00022 + eEC27140 -> eEC27140 + C00008 + C00074; R347_f - R347_r;
  R348: C00022 + C00131 + eEC27140 -> eEC27140 + C00074 + C00206; R348_f - R348_r;
  R349: C00022 + C00286 + eEC27140 -> eEC27140 + C00074 + C00361; R349_f - R349_r;
  R350: C00022 + C00201 + eEC27140 -> eEC27140 + C00074 + C00454; R350_f - R350_r;
  R351: C00001 + C00002 + C00022 + eEC2792 -> eEC2792 + C00009 + C00020 + C00074; R351_f - R351_r;
  R371: C00042 + C00399 + eEC1351 -> eEC1351 + C00122 + C00390; R371_f - R371_r;
  R372: C00002 + C00010 + C00042 + eEC6215 -> eEC6215 + C00008 + C00009 + C00091; R372_f - R372_r;
  R373: C00002 + C00010 + C00490 + eEC6215 -> eEC6215 + C00008 + C00009 + C00531; R373_f - R373_r;
  R406: C00065 + hEC43117 -> hEC43117 + C00014 + C00022; R406_f - R406_r;
  R197: C00003 + C00058 + hEC11719 -> hEC11719 + C00004 + C00011 + C00080; R197_f - R197_r;
  R269: C00003 + C00149 + hEC11137 -> hEC11137 + C00004 + C00036 + C00080; R269_f - R269_r;
  R345: C00002 + C00022 + C00011 + hEC6411 -> hEC6411 + C00008 + C00009 + C00036; R345_f - R345_r;
  R62: C00011 + C06010 + eEC2216 -> eEC2216 + 2 C00022; R62_f - R62_r;
  R63: C00022 + C00109 + eEC2216 -> eEC2216 + C00011 + C06006; R63_f - R63_r;
  R227: C00001 + C00037 + C00143 + eEC2121 -> eEC2121 + C00065 + C00101; R227_f - R227_r;
  R228: C00065 + C01217 + eEC2121 -> eEC2121 + C00001 + C00037 + C04377; R228_f - R228_r;
  R219: C00002 + C00037 + C00669 + eEC6323 -> eEC6323 + C00008 + C00009 + C00051; R219_f - R219_r;
  R224: C00024 + C00037 + eEC23129 -> eEC23129 + C00010 + C03508; R224_f - R224_r;
  R225: C00037 + C02051 + eEC1442 -> eEC1442 + C00011 + C01242; R225_f - R225_r;
  R258: C00311 + eEC4131 -> eEC4131 + C00042 + C00048; R258_f - R258_r;
  D_eEC2721: eEC2721 -> ; kdeg_eEC2721*eEC2721;
  D_eEC6211: eEC6211 -> ; kdeg_eEC6211*eEC6211;
  D_eEC6412: eEC6412 -> ; kdeg_eEC6412*eEC6412;
  D_eEC4213: eEC4213 -> ; kdeg_eEC4213*eEC4213;
  D_eEC1111: eEC1111 -> ; kdeg_eEC1111*eEC1111;
  D_eEC1112: eEC1112 -> ; kdeg_eEC1112*eEC1112;
  D_eEC2338: eEC2338 -> ; kdeg_eEC2338*eEC2338;
  D_eEC23316: eEC23316 -> ; kdeg_eEC23316*eEC23316;
  D_eEC1814: eEC1814 -> ; kdeg_eEC1814*eEC1814;
  D_eEC23112: eEC23112 -> ; kdeg_eEC23112*eEC23112;
  D_eEC23161: eEC23161 -> ; kdeg_eEC23161*eEC23161;
  D_eEC11128: eEC11128 -> ; kdeg_eEC11128*eEC11128;
  D_eEC4212: eEC4212 -> ; kdeg_eEC4212*eEC4212;
  D_eEC3126: eEC3126 -> ; kdeg_eEC3126*eEC3126;
  D_eEC11142: eEC11142 -> ; kdeg_eEC11142*eEC11142;
  D_eEC11137: eEC11137 -> ; kdeg_eEC11137*eEC11137;
  D_eEC11138: eEC11138 -> ; kdeg_eEC11138*eEC11138;
  D_eEC11140: eEC11140 -> ; kdeg_eEC11140*eEC11140;
  D_eEC1242: eEC1242 -> ; kdeg_eEC1242*eEC1242;
  D_eEC2318: eEC2318 -> ; kdeg_eEC2318*eEC2318;
  D_eEC41149: eEC41149 -> ; kdeg_eEC41149*eEC41149;
  D_eEC41131: eEC41131 -> ; kdeg_eEC41131*eEC41131;
  D_eEC1241: eEC1241 -> ; kdeg_eEC1241*eEC1241;
  D_eEC27140: eEC27140 -> ; kdeg_eEC27140*eEC27140;
  D_eEC2792: eEC2792 -> ; kdeg_eEC2792*eEC2792;
  D_eEC1351: eEC1351 -> ; kdeg_eEC1351*eEC1351;
  D_eEC6215: eEC6215 -> ; kdeg_eEC6215*eEC6215;
  D_hEC43117: hEC43117 -> ; kdeg_hEC43117*hEC43117;
  D_hEC11719: hEC11719 -> ; kdeg_hEC11719*hEC11719;
  D_hEC11137: hEC11137 -> ; kdeg_hEC11137*hEC11137;
  D_hEC6411: hEC6411 -> ; kdeg_hEC6411*hEC6411;
  D_eEC2216: eEC2216 -> ; kdeg_eEC2216*eEC2216;
  D_eEC2121: eEC2121 -> ; kdeg_eEC2121*eEC2121;
  D_eEC6323: eEC6323 -> ; kdeg_eEC6323*eEC6323;
  D_eEC23129: eEC23129 -> ; kdeg_eEC23129*eEC23129;
  D_eEC1442: eEC1442 -> ; kdeg_eEC1442*eEC1442;
  D_eEC4131: eEC4131 -> ; kdeg_eEC4131*eEC4131;
end
