// SBML level 3 version 2

model __main()

  // Compartments:
  compartment default_compartment = 1;

  // Species:
  species C00185 in default_compartment = v838*0.001*dilution_factor;
  species C00417 in default_compartment = v6*0.001*dilution_factor;
  species C00049 in default_compartment = v791*0.001*dilution_factor;
  species C00143 in default_compartment = v14*0.001*dilution_factor;
  species C00327 in default_compartment = v826*0.001*dilution_factor;
  species C00236 in default_compartment = v30*0.0011*dilution_factor;
  species C01367 in default_compartment = v1247*0.001*dilution_factor;
  species C00199 in default_compartment = v1050*0.5*dilution_factor;
  species C00001 in default_compartment = v873*0.001*dilution_factor;
  species C00227 in default_compartment = v73*1.1*dilution_factor;
  species C00111 in default_compartment = v1004*0.37*dilution_factor;
  species C00631 in default_compartment = v105*0.0011*dilution_factor;
  species C00221 in default_compartment = v858*0.001*dilution_factor;
  species C00447 in default_compartment = v111*0.001*dilution_factor;
  species C01094 in default_compartment = v112*0.001*dilution_factor;
  species C00019 in default_compartment = v1180*0.001*dilution_factor;
  species C00064 in default_compartment = v816*0.001*dilution_factor;
  species C05382 in default_compartment = v1205*0*dilution_factor;
  species C02876 in default_compartment = v147*0.001*dilution_factor;
  species C01172 in default_compartment = v154*0.001*dilution_factor;
  species C00490 in default_compartment = v160*0.001*dilution_factor;
  species C00390 in default_compartment = v994*0.001*dilution_factor;
  species C00014 in default_compartment = v825*0.001*dilution_factor;
  species C00668 in default_compartment = v205*0.001*dilution_factor;
  species C00169 in default_compartment = v866*0.001*dilution_factor;
  species C03406 in default_compartment = v1027*0.001*dilution_factor;
  species C00577 in default_compartment = v213*0.001*dilution_factor;
  species C00345 in default_compartment = v215*3.8*dilution_factor;
  species C00031 in default_compartment = v835*0.001*dilution_factor;
  species C00026 in default_compartment = v1020*0.44*dilution_factor;
  species C00020 in default_compartment = v1061*0.001*dilution_factor;
  species C00760 in default_compartment = v1017*0.001*dilution_factor;
  species C00546 in default_compartment = v1229*0.001*dilution_factor;
  species C00311 in default_compartment = v260*0.001*dilution_factor;
  species C00101 in default_compartment = v263*0.001*dilution_factor;
  species C00006 in default_compartment = v1163*0.0021*dilution_factor;
  species C00033 in default_compartment = v986*0.001*dilution_factor;
  species C00399 in default_compartment = v882*0.001*dilution_factor;
  species C00037 in default_compartment = v1240*0.001*dilution_factor;
  species C01217 in default_compartment = v298*0.001*dilution_factor;
  species C00322 in default_compartment = v310*0.001*dilution_factor;
  species C03508 in default_compartment = v312*0.001*dilution_factor;
  species C04640 in default_compartment = v1221*0.001*dilution_factor;
  species C00091 in default_compartment = v883*0.23*dilution_factor;
  species C00005 in default_compartment = v850*0.12*dilution_factor;
  species C00163 in default_compartment = v327*0.001*dilution_factor;
  species C00655 in default_compartment = v861*0.001*dilution_factor;
  species C00003 in default_compartment = v1068*0.001*dilution_factor;
  species C00010 in default_compartment = v1199*1.4*dilution_factor;
  species C00085 in default_compartment = v774*0.001*dilution_factor;
  species C00036 in default_compartment = v829*0*dilution_factor;
  species C04376 in default_compartment = v1039*0.001*dilution_factor;
  species C00279 in default_compartment = v366*0.0011*dilution_factor;
  species C06006 in default_compartment = v373*0.001*dilution_factor;
  species C00022 in default_compartment = v780*0*dilution_factor;
  species C00158 in default_compartment = v975*0.001*dilution_factor;
  species C00083 in default_compartment = v403*0.001*dilution_factor;
  species C00065 in default_compartment = v900*0.001*dilution_factor;
  species C00229 in default_compartment = v410*0.001*dilution_factor;
  species C01798 in default_compartment = v849*0.001*dilution_factor;
  species C00092 in default_compartment = v1215*5*dilution_factor;
  species C00074 in default_compartment = v1143*0.18*dilution_factor;
  species C00058 in default_compartment = v808*0*dilution_factor;
  species C00024 in default_compartment = v1085*0.61*dilution_factor;
  species C00103 in default_compartment = v1174*0.001*dilution_factor;
  species C00531 in default_compartment = v466*0.001*dilution_factor;
  species C00493 in default_compartment = v469*0.001*dilution_factor;
  species C00011 in default_compartment = v919*0.001*dilution_factor;
  species C00009 in default_compartment = v1217*0.001*dilution_factor;
  species C06010 in default_compartment = v494*0.001*dilution_factor;
  species C01242 in default_compartment = v496*0.001*dilution_factor;
  species C00267 in default_compartment = v1094*0.001*dilution_factor;
  species C04377 in default_compartment = v501*0.001*dilution_factor;
  species C00354 in default_compartment = v508*15*dilution_factor;
  species C00042 in default_compartment = v509*7.1692*dilution_factor;
  species C01236 in default_compartment = v513*0.0011*dilution_factor;
  species C00144 in default_compartment = v1154*0.001*dilution_factor;
  species C00149 in default_compartment = v539*1.7*dilution_factor;
  species C00008 in default_compartment = v777*0.001*dilution_factor;
  species C00100 in default_compartment = v563*0.001*dilution_factor;
  species C00527 in default_compartment = v577*0.001*dilution_factor;
  species C00004 in default_compartment = v1089*0.083*dilution_factor;
  species C03287 in default_compartment = v818*0.001*dilution_factor;
  species C01165 in default_compartment = v837*0.001*dilution_factor;
  species C00080 in default_compartment = v1036*0.0001*dilution_factor;
  species C01335 in default_compartment = v867*0.001*dilution_factor;
  species C02051 in default_compartment = v611*0.001*dilution_factor;
  species C00118 in default_compartment = v945*0.001*dilution_factor;
  species C00013 in default_compartment = v911*0*dilution_factor;
  species C00048 in default_compartment = v658*0.0011*dilution_factor;
  species C00256 in default_compartment = v983*3.25*dilution_factor;
  species C00109 in default_compartment = v674*0.001*dilution_factor;
  species C00002 in default_compartment = v1235*0.001*dilution_factor;
  species C00152 in default_compartment = v1084*0.001*dilution_factor;
  species C05993 in default_compartment = v734*0.001*dilution_factor;
  species C01209 in default_compartment = v736*0.001*dilution_factor;
  species C00073 in default_compartment = v1184*0.001*dilution_factor;
  species C03175 in default_compartment = v742*0.001*dilution_factor;
  species C00122 in default_compartment = v912*0.001*dilution_factor;
  species C00025 in default_compartment = v764*0.001*dilution_factor;
  species C00158HCT in default_compartment = 1*0*dilution_factor;
  species eEC4213 in default_compartment = p_eEC4213*rel0*0.017715569*dilution_factor;
  species eEC1242 in default_compartment = p_eEC1242*rel0*0.01698503*dilution_factor;
  species eEC12112 in default_compartment = p_eEC12112*rel0*0.014610778*dilution_factor;
  species eEC1241 in default_compartment = p_eEC1241*rel0*0.011323353*dilution_factor;
  species eEC6355 in default_compartment = p_eEC6355*16.98503*dilution_factor;
  species eEC6215 in default_compartment = p_eEC6215*rel0*0.019907186*dilution_factor;
  species eEC42111 in default_compartment = p_eEC42111*rel0*0.009314371*dilution_factor;
  species eEC11137 in default_compartment = p_eEC11137*rel0*0.013770659*dilution_factor;
  species eEC2121 in default_compartment = p_eEC2121*rel0*0.005661677*dilution_factor;
  species eEC4212 in default_compartment = p_eEC4212*rel0*0.006026946*dilution_factor;
  species eEC23316 in default_compartment = p_eEC23316*rel0*0.010592814*dilution_factor;
  species eEC4311 in default_compartment = p_eEC4311*11.87126*dilution_factor;
  species eEC11144 in default_compartment = p_eEC11144*rel0*0.005479042*dilution_factor;
  species eEC41131 in default_compartment = p_eEC41131*rel0*0.00310479*dilution_factor;
  species eEC1442 in default_compartment = p_eEC1442*rel0*0.004748503*dilution_factor;
  species eEC41213 in default_compartment = p_eEC41213*rel0*0.005661677*dilution_factor;
  species eEC2516 in default_compartment = p_eEC2516*rel0*0.005844311*dilution_factor;
  species eEC6312 in default_compartment = p_eEC6312*rel0*0.002739521*dilution_factor;
  species eEC6352 in default_compartment = p_eEC6352*5.66167663*dilution_factor;
  species eEC11140 in default_compartment = p_eEC11140*rel0*0.005661677*dilution_factor;
  species eEC6211 in default_compartment = p_eEC6211*rel0*0.003287425*dilution_factor;
  species eEC6345 in default_compartment = p_eEC6345*5.11377244*dilution_factor;
  species eEC23129 in default_compartment = p_eEC23129*rel0*0.003287425*dilution_factor;
  species eEC2721 in default_compartment = p_eEC2721*rel0*0.002739521*dilution_factor;
  species eEC6412 in default_compartment = p_eEC6412*rel0*0.003287425*dilution_factor;
  species eEC11149 in default_compartment = p_eEC11149*rel0*0.002922156*dilution_factor;
  species eEC23139 in default_compartment = p_eEC23139*rel0*0.001461078*dilution_factor;
  species eEC27171 in default_compartment = p_eEC27171*rel0*0.002008982*dilution_factor;
  species eEC4131 in default_compartment = p_eEC4131*rel0*0.002008982*dilution_factor;
  species eEC1351 in default_compartment = p_eEC1351*rel0*0.001826347*dilution_factor;
  species eEC2216 in default_compartment = p_eEC2216*rel0*0.001826347*dilution_factor;
  species eEC43117 in default_compartment = p_eEC43117*rel0*0.000913174*dilution_factor;
  species eEC11138 in default_compartment = p_eEC11138*rel0*0.001643713*dilution_factor;
  species eEC6353 in default_compartment = p_eEC6353*1.8263473*dilution_factor;
  species eEC32121 in default_compartment = p_eEC32121*2.00898203*dilution_factor;
  species eEC5319 in default_compartment = p_eEC5319*rel0*0.001278443*dilution_factor;
  species eEC31311 in default_compartment = p_eEC31311*rel0*0.001826347*dilution_factor;
  species eEC12141 in default_compartment = p_eEC12141*1.64371257*dilution_factor;
  species eEC6354 in default_compartment = p_eEC6354*1.46107784*dilution_factor;
  species eEC11128 in default_compartment = p_eEC11128*rel0*0.000365269*dilution_factor;
  species eEC31310 in default_compartment = p_eEC31310*rel0*0.000547904*dilution_factor;
  species eEC4233 in default_compartment = p_eEC4233*0.54790419*dilution_factor;
  species eEC11142 in default_compartment = p_eEC11142*rel0*0.010227545*dilution_factor;
  species hEC11137 in default_compartment = p_hEC11137*rel1*0.0122*dilution_factor;
  species hEC43117 in default_compartment = p_hEC43117*rel2*0.0122*dilution_factor;
  species hEC6411 in default_compartment = p_hEC6411*rel3*0.0122*dilution_factor;
  species hEC11719 in default_compartment = p_hEC11719*rel4*0.0122*dilution_factor;
  species eEC2338 in default_compartment = p_eEC2338*5.29640717*dilution_factor;
  species C05379 in default_compartment;

  // Parameters:
  v2 = 1;
  dilution_factor = 1;
  v6 = 1;
  v10 = 1;
  v14 = 1;
  v23 = 1;
  v30 = 1;
  v37 = 1;
  v46 = 1;
  v69 = 1;
  v73 = 1;
  v85 = 1;
  v105 = 1;
  v107 = 1;
  v111 = 1;
  v112 = 1;
  v117 = 1;
  v119 = 1;
  v135 = 1;
  v147 = 1;
  v154 = 1;
  v160 = 1;
  v170 = 1;
  v180 = 1;
  v205 = 1;
  v208 = 1;
  v209 = 1;
  v213 = 1;
  v215 = 1;
  v232 = 1;
  v237 = 1;
  v238 = 1;
  v240 = 1;
  v248 = 1;
  v260 = 1;
  v263 = 1;
  v265 = 1;
  v277 = 1;
  v279 = 1;
  v295 = 1;
  v298 = 1;
  v310 = 1;
  v312 = 1;
  v317 = 1;
  v325 = 1;
  v326 = 1;
  v327 = 1;
  v337 = 1;
  v338 = 1;
  v346 = 1;
  v349 = 1;
  v359 = 1;
  v360 = 1;
  v366 = 1;
  v373 = 1;
  v386 = 1;
  v392 = 1;
  v403 = 1;
  v409 = 1;
  v410 = 1;
  v422 = 1;
  v424 = 1;
  v431 = 1;
  v435 = 1;
  v440 = 1;
  v457 = 1;
  v466 = 1;
  v469 = 1;
  v470 = 1;
  v483 = 1;
  v494 = 1;
  v496 = 1;
  v497 = 1;
  v501 = 1;
  v508 = 1;
  v509 = 1;
  v513 = 1;
  v516 = 1;
  v539 = 1;
  v555 = 1;
  v563 = 1;
  v577 = 1;
  v581 = 1;
  v586 = 1;
  v588 = 1;
  v593 = 1;
  v595 = 1;
  v611 = 1;
  v636 = 1;
  v653 = 1;
  v658 = 1;
  v673 = 1;
  v674 = 1;
  v712 = 1;
  v727 = 1;
  v734 = 1;
  v736 = 1;
  v740 = 1;
  v742 = 1;
  v757 = 1;
  v758 = 1;
  v764 = 1;
  v774 = 1;
  v777 = 1;
  v780 = 1;
  v791 = 1;
  v808 = 1;
  v816 = 1;
  v818 = 1;
  v825 = 1;
  v826 = 1;
  v829 = 1;
  v835 = 1;
  v837 = 1;
  v838 = 1;
  v849 = 1;
  v850 = 1;
  v858 = 1;
  v861 = 1;
  v866 = 1;
  v867 = 1;
  v873 = 1;
  v882 = 1;
  v883 = 1;
  v900 = 1;
  v911 = 1;
  v912 = 1;
  v919 = 1;
  v945 = 1;
  v975 = 1;
  v983 = 1;
  v986 = 1;
  v994 = 1;
  v1004 = 1;
  v1017 = 1;
  v1020 = 1;
  v1027 = 1;
  v1036 = 1;
  v1039 = 1;
  v1050 = 1;
  v1061 = 1;
  v1068 = 1;
  v1084 = 1;
  v1085 = 1;
  v1089 = 1;
  v1094 = 1;
  v1143 = 1;
  v1154 = 1;
  v1163 = 1;
  v1174 = 1;
  v1180 = 1;
  v1184 = 1;
  v1199 = 1;
  v1205 = 1;
  v1215 = 1;
  v1217 = 1;
  v1221 = 1;
  v1229 = 1;
  v1235 = 1;
  v1240 = 1;
  v1247 = 1;
  p_eEC4213 = 1;
  rel0 = 1;
  p_eEC1242 = 1;
  p_eEC12112 = 1;
  p_eEC1241 = 1;
  p_eEC6355 = 1;
  p_eEC6215 = 1;
  p_eEC42111 = 1;
  p_eEC11137 = 1;
  p_eEC2121 = 1;
  p_eEC4212 = 1;
  p_eEC23316 = 1;
  p_eEC4311 = 1;
  p_eEC11144 = 1;
  p_eEC41131 = 1;
  p_eEC1442 = 1;
  p_eEC41213 = 1;
  p_eEC2516 = 1;
  p_eEC6312 = 1;
  p_eEC6352 = 1;
  p_eEC11140 = 1;
  p_eEC6211 = 1;
  p_eEC6345 = 1;
  p_eEC23129 = 1;
  p_eEC2721 = 1;
  p_eEC6412 = 1;
  p_eEC11149 = 1;
  p_eEC23139 = 1;
  p_eEC27171 = 1;
  p_eEC4131 = 1;
  p_eEC1351 = 1;
  p_eEC2216 = 1;
  p_eEC43117 = 1;
  p_eEC11138 = 1;
  p_eEC6353 = 1;
  p_eEC32121 = 1;
  p_eEC5319 = 1;
  p_eEC31311 = 1;
  p_eEC12141 = 1;
  p_eEC6354 = 1;
  p_eEC11128 = 1;
  p_eEC31310 = 1;
  p_eEC4233 = 1;
  p_eEC11142 = 1;
  p_hEC11137 = 1;
  rel1 = 1;
  p_hEC43117 = 1;
  rel2 = 1;
  p_hEC6411 = 1;
  rel3 = 1;
  p_hEC11719 = 1;
  rel4 = 1;
  p_eEC2338 = 1;
  Kcat_F_R2 = 1050;
  Kcat_R_R2 = 9.578607;
  Keq_R2 = 1;
  Kcat_V_R2 = 1;
  Km_C00010_eEC23139 = 0.065542154;
  Km_C01209_eEC23139 = 0.1487474;
  Km_C00083_eEC23139 = 0.0297;
  Km_C00229_eEC23139 = 0.351;
  Kcat_F_R56 = 1.499933;
  Kcat_R_R56 = 776.3642;
  Keq_R56 = 0.003529142;
  Kcat_V_R56 = 1;
  Km_C00008_eEC2721 = 0.151691675;
  Km_C00227_eEC2721 = 1.303333;
  Km_C00002_eEC2721 = 0.122388884;
  Km_C00033_eEC2721 = 46.92825;
  Kcat_F_R57 = 1.06438;
  Kcat_R_R57 = 2.623738;
  Keq_R57 = 1.623489e-6;
  Kcat_V_R57 = 1;
  Km_C02876_eEC2721 = 0.5455302;
  Km_C00163_eEC2721 = 27.57634;
  Kcat_F_R58 = 4.182973;
  Kcat_R_R58 = 3.076709;
  Keq_R58 = 27.3906;
  Kcat_V_R58 = 1;
  Km_C00013_eEC6211 = 0.13318713;
  Km_C00020_eEC6211 = 0.053331587;
  Km_C00024_eEC6211 = 0.055413216;
  Km_C00002_eEC6211 = 0.05487762;
  Km_C00010_eEC6211 = 0.077155121;
  Km_C00033_eEC6211 = 2.543299;
  Kcat_F_R59 = 5.986188;
  Kcat_R_R59 = 4.512811;
  Keq_R59 = 1;
  Kcat_V_R59 = 1;
  Km_C05993_eEC6211 = 0.045171168;
  Kcat_F_R60 = 3.27166;
  Kcat_R_R60 = 3.085642;
  Keq_R60 = 1;
  Kcat_V_R60 = 1;
  Kcat_F_R61 = 4.289959;
  Kcat_R_R61 = 3.190813;
  Keq_R61 = 1.587908;
  Kcat_V_R61 = 1;
  Km_C00100_eEC6211 = 0.054458927;
  Km_C00163_eEC6211 = 1.640108;
  Kcat_F_R62 = 4.765085;
  Kcat_R_R62 = 38.6;
  Keq_R62 = 1.836842e-5;
  Kcat_V_R62 = 1;
  Km_C00022_eEC2216 = 11.08;
  Km_C00011_eEC2216 = 5.445469;
  Km_C06010_eEC2216 = 0.855534971;
  Kcat_F_R63 = 20.95;
  Kcat_R_R63 = 4.669526;
  Keq_R63 = 1611.962;
  Kcat_V_R63 = 1;
  Km_C06006_eEC2216 = 1.518301;
  Km_C00109_eEC2216 = 150.0055;
  Kcat_F_R64 = 0.2670509;
  Kcat_R_R64 = 0.2105731;
  Keq_R64 = 39.32772;
  Kcat_V_R64 = 1;
  Km_C00008_eEC6412 = 0.041535225;
  Km_C00009_eEC6412 = 0.312815398;
  Km_C00083_eEC6412 = 0.1;
  Km_C00002_eEC6412 = 0.031438239;
  Km_C00024_eEC6412 = 0.023739677;
  Km_C00011_eEC6412 = 0.259498209;
  Kcat_F_R69 = 6.538238;
  Kcat_R_R69 = 5.557925;
  Keq_R69 = 0.06308443;
  Kcat_V_R69 = 1;
  Km_C00311_eEC4213 = 0.339520901;
  Km_C00158_eEC4213 = 1.662617;
  Kcat_F_R70 = 6.538238;
  Kcat_R_R70 = 34.61815;
  Keq_R70 = 0.03276577;
  Kcat_V_R70 = 1;
  Km_C00001_eEC4213 = 2.687093;
  Km_C00417_eEC4213 = 0.037;
  Kcat_F_R71 = 5.557925;
  Kcat_R_R71 = 34.61815;
  Keq_R71 = 0.5193955;
  Kcat_V_R71 = 1;
  Kcat_F_R102 = 18.33995;
  Kcat_R_R102 = 21.6042526;
  Keq_R102 = 5.715393;
  Kcat_V_R102 = 1;
  Km_C00013_eEC6345 = 0.359019458;
  Km_C00020_eEC6345 = 0.05730173;
  Km_C03406_eEC6345 = 0.255128026;
  Km_C00002_eEC6345 = 0.063633703;
  Km_C00049_eEC6345 = 0.976605654;
  Km_C00327_eEC6345 = 0.332633585;
  Kcat_F_R107 = 1.274522;
  Kcat_R_R107 = 1.623264;
  Keq_R107 = 327.0234;
  Kcat_V_R107 = 1;
  Km_C00014_eEC6354 = 0.868321598;
  Km_C00025_eEC6354 = 0.753711462;
  Km_C00001_eEC6354 = 0.533058226;
  Km_C00064_eEC6354 = 0.542225182;
  Kcat_F_R108 = 1.427939;
  Kcat_R_R108 = 0.607987396;
  Keq_R108 = 31656.95;
  Kcat_V_R108 = 1;
  Km_C00013_eEC6354 = 0.234596208;
  Km_C00020_eEC6354 = 0.06555289;
  Km_C00152_eEC6354 = 0.582034588;
  Km_C00002_eEC6354 = 0.072208658;
  Km_C00049_eEC6354 = 0.928563893;
  Kcat_F_R109 = 1.055603;
  Kcat_R_R109 = 0.6150096;
  Keq_R109 = 1.035256e7;
  Kcat_V_R109 = 1;
  Kcat_F_R111 = 138.3737;
  Kcat_R_R111 = 10064.76;
  Keq_R111 = 0.00490834;
  Kcat_V_R111 = 1;
  Km_C00014_eEC4311 = 12.20387;
  Km_C00122_eEC4311 = 0.828558326;
  Km_C00049_eEC4311 = 1.19517;
  Kcat_F_R123 = 19.78221;
  Kcat_R_R123 = 19.78221;
  Keq_R123 = 0.02520442;
  Kcat_V_R123 = 1;
  Km_C00008_eEC2338 = 11.42136;
  Km_C00009_eEC2338 = 11.42136;
  Km_C00024_eEC2338 = 11.42136;
  Km_C00036_eEC2338 = 11.42136;
  Km_C00002_eEC2338 = 11.42136;
  Km_C00010_eEC2338 = 11.42136;
  Km_C00158_eEC2338 = 11.42136;
  Kcat_F_R129 = 3.755006;
  Kcat_R_R129 = 3.25420191;
  Keq_R129 = 174.9533;
  Kcat_V_R129 = 1;
  Km_C00031_eEC32121 = 4.007536;
  Km_C00001_eEC32121 = 0.826479375;
  Km_C00185_eEC32121 = 2.858437;
  Kcat_F_R130 = 2.29805655;
  Kcat_R_R130 = 3.25420191;
  Keq_R130 = 1e-12;
  Kcat_V_R130 = 1;
  Km_C00221_eEC32121 = 4.007536;
  Km_C00760_eEC32121 = 2.417008;
  Kcat_F_R131 = 2.29805655;
  Kcat_R_R131 = 3.25420191;
  Keq_R131 = 1;
  Kcat_V_R131 = 1;
  Km_C00267_eEC32121 = 4.007536;
  Km_C01335_eEC32121 = 2.417008;
  Km_C01798_eEC32121 = 2.417008;
  Kcat_F_R154 = 5.671478;
  Kcat_R_R154 = 9.334796;
  Keq_R154 = 327.0234;
  Kcat_V_R154 = 1;
  Km_C00014_eEC6355 = 2.051671;
  Km_C00025_eEC6355 = 0.995128751;
  Km_C00001_eEC6355 = 0.812423646;
  Km_C00064_eEC6355 = 0.4618738;
  Kcat_F_R155 = 4.780895;
  Kcat_R_R155 = 5.177481;
  Keq_R155 = 432.322;
  Kcat_V_R155 = 1;
  Km_C00008_eEC6355 = 0.055322122;
  Km_C00009_eEC6355 = 1.365577;
  Km_C00169_eEC6355 = 0.34583804;
  Km_C00002_eEC6355 = 0.067236871;
  Km_C00011_eEC6355 = 1.476667;
  Kcat_F_R157 = 33.80351;
  Kcat_R_R157 = 47.35067;
  Keq_R157 = 1.605748e-7;
  Kcat_V_R157 = 1;
  Km_C00158_eEC23316 = 0.206155464;
  Km_C00010_eEC23316 = 0.065331496;
  Km_C00024_eEC23316 = 0.052596927;
  Km_C00001_eEC23316 = 0.965167284;
  Km_C00036_eEC23316 = 0.069584779;
  Ki_C00004_eEC23316 = 0.03668018;
  Ki_C00026_eEC23316 = 0.1462314;
  Ki_C00100_eEC23316 = 0.05638692;
  Ki_C00158HCT_eEC23316 = 0.206155464;
  Ki_C01367_eEC23316 = 0.04042401;
  Kcat_F_R181 = 137.8607;
  Kcat_R_R181 = 541.25;
  Keq_R181 = 0.0002419607;
  Kcat_V_R181 = 1;
  Km_C00004_eEC11128 = 0.08125;
  Km_C00022_eEC11128 = 5.975;
  Km_C00080_eEC11128 = 2.627151;
  Km_C00003_eEC11128 = 0.073235102;
  Km_C00256_eEC11128 = 0.774313986;
  Kcat_F_R199 = 9.234592;
  Kcat_R_R199 = 0.289105657;
  Keq_R199 = 118.5915;
  Kcat_V_R199 = 1;
  Km_C00009_eEC31311 = 0.320538223;
  Km_C00085_eEC31311 = 0.137154579;
  Km_C00001_eEC31311 = 0.495092779;
  Km_C00354_eEC31311 = 0.068225;
  Kcat_F_R200 = 1.859234;
  Kcat_R_R200 = 0.5713371;
  Keq_R200 = 195.3358;
  Kcat_V_R200 = 1;
  Km_C05382_eEC31311 = 0.01538996;
  Km_C00447_eEC31311 = 0.011786909;
  Kcat_F_R201 = 6.2425;
  Kcat_R_R201 = 3.759508;
  Keq_R201 = 8.703976e-5;
  Kcat_V_R201 = 1;
  Km_C00111_eEC41213 = 0.219039723;
  Km_C00118_eEC41213 = 0.376360387;
  Km_C00354_eEC41213 = 0.18;
  Kcat_F_R202 = 2.649514;
  Kcat_R_R202 = 2.955887;
  Keq_R202 = 0.0002093527;
  Kcat_V_R202 = 1;
  Km_C00279_eEC41213 = 0.159231856;
  Km_C00447_eEC41213 = 0.078385606;
  Kcat_F_R203 = 0.462073109;
  Kcat_R_R203 = 3.55576296;
  Keq_R203 = 8.493038e-6;
  Kcat_V_R203 = 1;
  Km_C00577_eEC41213 = 1.749874;
  Km_C01094_eEC41213 = 0.699701726;
  Kcat_F_R204 = 55.60224;
  Kcat_R_R204 = 2921.885;
  Keq_R204 = 0.2510186;
  Kcat_V_R204 = 1;
  Km_C00001_eEC4212 = 6.656439;
  Km_C00122_eEC4212 = 0.910608768;
  Km_C00149_eEC4212 = 1.7;
  Kcat_F_R208 = 93.75484;
  Kcat_R_R208 = 13.76295;
  Keq_R208 = 247.4454;
  Kcat_V_R208 = 1;
  Km_C00005_eEC11149 = 0.008727342;
  Km_C00080_eEC11149 = 1.316865;
  Km_C01236_eEC11149 = 0.131362155;
  Km_C00006_eEC11149 = 11600.01;
  Km_C01172_eEC11149 = 0.200977385;
  Kcat_F_R209 = 1.292205;
  Kcat_R_R209 = 0.832305128;
  Keq_R209 = 0.3448916;
  Kcat_V_R209 = 1;
  Km_C00085_eEC5319 = 0.2;
  Km_C00092_eEC5319 = 0.28;
  Kcat_F_R210 = 1.292205;
  Kcat_R_R210 = 1.292205;
  Keq_R210 = 1.698178;
  Kcat_V_R210 = 1;
  Km_C01172_eEC5319 = 0.678788722;
  Km_C00668_eEC5319 = 0.678788722;
  Kcat_F_R213 = 9.454818;
  Kcat_R_R213 = 17.39077;
  Keq_R213 = 0.0460957;
  Kcat_V_R213 = 1;
  Km_C00005_eEC12141 = 0.039560795;
  Km_C00080_eEC12141 = 0.657063842;
  Km_C03287_eEC12141 = 0.307542831;
  Km_C00006_eEC12141 = 0.115;
  Km_C00009_eEC12141 = 1.65777;
  Km_C01165_eEC12141 = 2.5;
  Kcat_F_R216 = 46.37366;
  Kcat_R_R216 = 51.98956;
  Keq_R216 = 479.9769;
  Kcat_V_R216 = 1;
  Km_C00008_eEC6312 = 0.066132165;
  Km_C00009_eEC6312 = 1.038619;
  Km_C00064_eEC6312 = 0.467974067;
  Km_C00002_eEC6312 = 0.080664948;
  Km_C00014_eEC6312 = 0.269162536;
  Km_C00025_eEC6312 = 0.546636522;
  Kcat_F_R222 = 9.585562;
  Kcat_R_R222 = 13.15697;
  Keq_R222 = 0.6255122;
  Kcat_V_R222 = 1;
  Km_C00004_eEC12112 = 0.028803103;
  Km_C00080_eEC12112 = 2.130418;
  Km_C00236_eEC12112 = 0.063416369;
  Km_C00003_eEC12112 = 0.071162768;
  Km_C00009_eEC12112 = 1.398444;
  Km_C00118_eEC12112 = 0.355474025;
  Kcat_F_R224 = 3.790229;
  Kcat_R_R224 = 6.892366;
  Keq_R224 = 1.772381e-6;
  Kcat_V_R224 = 1;
  Km_C00010_eEC23129 = 0.068333149;
  Km_C03508_eEC23129 = 1.101451;
  Km_C00024_eEC23129 = 0.059;
  Km_C00037_eEC23129 = 5.073135;
  Kcat_F_R225 = 2.631663;
  Kcat_R_R225 = 4.818351;
  Keq_R225 = 1;
  Kcat_V_R225 = 1;
  Km_C00011_eEC1442 = 1.169796;
  Km_C01242_eEC1442 = 2.10105;
  Km_C00037_eEC1442 = 3.032305;
  Km_C02051_eEC1442 = 2.10105;
  Kcat_F_R226 = 4.200408;
  Kcat_R_R226 = 7.3959;
  Keq_R226 = 0.0001411845;
  Kcat_V_R226 = 1;
  Km_C00004_eEC1442 = 0.05554235;
  Km_C00014_eEC1442 = 4.617712;
  Km_C00080_eEC1442 = 1.926282;
  Km_C00143_eEC1442 = 0.049179409;
  Km_C00003_eEC1442 = 0.143204287;
  Km_C00101_eEC1442 = 0.104562275;
  Kcat_F_R227 = 0.721411978;
  Kcat_R_R227 = 1.132827;
  Keq_R227 = 0.06610282;
  Kcat_V_R227 = 1;
  Km_C00065_eEC2121 = 0.680456936;
  Km_C00101_eEC2121 = 0.048434764;
  Km_C00001_eEC2121 = 1.743806;
  Km_C00037_eEC2121 = 1.08421;
  Km_C00143_eEC2121 = 0.031294227;
  Kcat_F_R228 = 0.9187239;
  Kcat_R_R228 = 0.7097989;
  Keq_R228 = 33.9072;
  Kcat_V_R228 = 1;
  Km_C04377_eEC2121 = 0.032590855;
  Km_C01217_eEC2121 = 0.029256012;
  Kcat_F_R231 = 3.419966;
  Kcat_R_R231 = 2.60169;
  Keq_R231 = 1;
  Kcat_V_R231 = 1;
  Km_C00013_eEC6352 = 0.292456239;
  Km_C00020_eEC6352 = 0.061671037;
  Km_C00025_eEC6352 = 0.988497317;
  Km_C00144_eEC6352 = 0.060012028;
  Km_C00001_eEC6352 = 1.769341;
  Km_C00002_eEC6352 = 0.074884042;
  Km_C00064_eEC6352 = 0.369729847;
  Km_C00655_eEC6352 = 0.066067107;
  Kcat_F_R232 = 4.195816;
  Kcat_R_R232 = 2.396326;
  Keq_R232 = 1;
  Kcat_V_R232 = 1;
  Km_C00014_eEC6352 = 3.654191;
  Kcat_F_R255 = 45.91357;
  Kcat_R_R255 = 7.140433;
  Keq_R255 = 0.1128189;
  Kcat_V_R255 = 1;
  Km_C00005_eEC11142 = 0.000715;
  Km_C00011_eEC11142 = 0.505214036;
  Km_C00026_eEC11142 = 2.75;
  Km_C00080_eEC11142 = 2.13827467;
  Km_C00006_eEC11142 = 0.01485;
  Km_C00311_eEC11142 = 0.074271195;
  Kcat_F_R256 = 22.23114;
  Kcat_R_R256 = 5.840928;
  Keq_R256 = 63.9443;
  Kcat_V_R256 = 1;
  Km_C05379_eEC11142 = 0.069090471;
  Kcat_F_R257 = 45.91357;
  Kcat_R_R257 = 15.98529;
  Keq_R257 = 0.001764331;
  Kcat_V_R257 = 1;
  Kcat_F_R258 = 8.906026;
  Kcat_R_R258 = 13.46871;
  Keq_R258 = 0.02130565;
  Kcat_V_R258 = 1;
  Km_C00042_eEC4131 = 0.59;
  Km_C00048_eEC4131 = 0.13;
  Km_C00311_eEC4131 = 0.235073432;
  Kcat_F_R268 = 3.00716;
  Kcat_R_R268 = 467.4798;
  Keq_R268 = 2.261487e-5;
  Kcat_V_R268 = 1;
  Km_C00004_eEC11137 = 0.061;
  Km_C00036_eEC11137 = 0.0445;
  Km_C00080_eEC11137 = 1.627507;
  Km_C00003_eEC11137 = 0.105280019;
  Km_C00149_eEC11137 = 0.00012;
  Kcat_F_R270 = 69.81517;
  Kcat_R_R270 = 6.59885015;
  Keq_R270 = 0.007553802;
  Kcat_V_R270 = 1;
  Km_C00004_eEC11138 = 0.025;
  Km_C00011_eEC11138 = 2.194043;
  Km_C00022_eEC11138 = 1.729396;
  Km_C00080_eEC11138 = 11.55059;
  Km_C00003_eEC11138 = 0.065783687;
  Km_C00149_eEC11138 = 0.42;
  Kcat_F_R271 = 12.41888;
  Kcat_R_R271 = 7.051511;
  Keq_R271 = 334.0192;
  Kcat_V_R271 = 1;
  Km_C00036_eEC11138 = 3.966667;
  Kcat_F_R272 = 48.62428;
  Kcat_R_R272 = 112.8719;
  Keq_R272 = 0.007547267;
  Kcat_V_R272 = 1;
  Km_C00005_eEC11140 = 0.033877365;
  Km_C00011_eEC11140 = 3.163388;
  Km_C00022_eEC11140 = 1.306478;
  Km_C00080_eEC11140 = 8.466878;
  Km_C00006_eEC11140 = 0.0415;
  Km_C00149_eEC11140 = 3.41;
  Kcat_F_R273 = 318.2636;
  Kcat_R_R273 = 116.9711;
  Keq_R273 = 334.0192;
  Kcat_V_R273 = 1;
  Km_C00036_eEC11140 = 0.527139127;
  Kcat_F_R277 = 0.2317861;
  Kcat_R_R277 = 4.872041;
  Keq_R277 = 1;
  Kcat_V_R277 = 1;
  Km_C00001_eEC2516 = 1.070863;
  Km_C00002_eEC2516 = 0.117182642;
  Km_C00073_eEC2516 = 0.466537207;
  Km_C00009_eEC2516 = 1.239685;
  Km_C00013_eEC2516 = 0.28967458;
  Km_C00019_eEC2516 = 0.048553739;
  Kcat_F_R279 = 140.7;
  Kcat_R_R279 = 0.817589166;
  Keq_R279 = 2.799505e10;
  Kcat_V_R279 = 1;
  Km_C00009_eEC4233 = 1.086036;
  Km_C00546_eEC4233 = 1.780872;
  Km_C00111_eEC4233 = 2.492;
  Kcat_F_R299 = 3.74721796;
  Kcat_R_R299 = 3.858673;
  Keq_R299 = 553075.8;
  Kcat_V_R299 = 1;
  Km_C00004_eEC1242 = 0.035209294;
  Km_C00011_eEC1242 = 0.496151149;
  Km_C00080_eEC1242 = 0.608380556;
  Km_C00527_eEC1242 = 0.052975662;
  Km_C00003_eEC1242 = 0.127414092;
  Km_C00010_eEC1242 = 0.066362962;
  Km_C00322_eEC1242 = 0.131888092;
  Kcat_F_R300 = 9.177965;
  Kcat_R_R300 = 3.939461;
  Keq_R300 = 88228.45;
  Kcat_V_R300 = 1;
  Km_C00091_eEC1242 = 0.053117804;
  Km_C00026_eEC1242 = 332.9115;
  Kcat_F_R308 = 1.99915;
  Kcat_R_R308 = 182.1383;
  Keq_R308 = 8.730133e-8;
  Kcat_V_R308 = 1;
  Km_C00001_eEC41131 = 0.812425554;
  Km_C00011_eEC41131 = 1.559197;
  Km_C00074_eEC41131 = 0.19;
  Km_C00009_eEC41131 = 1.123651;
  Km_C00036_eEC41131 = 0.484438777;
  Kcat_F_R312 = 10.11896;
  Kcat_R_R312 = 16.04165;
  Keq_R312 = 0.01556112;
  Kcat_V_R312 = 1;
  Km_C00005_eEC11144 = 0.01731511;
  Km_C00011_eEC11144 = 0.468339205;
  Km_C00080_eEC11144 = 1.165087;
  Km_C00199_eEC11144 = 0.077537887;
  Km_C00006_eEC11144 = 0.049;
  Km_C00345_eEC11144 = 0.093;
  Kcat_F_R318 = 9.247854;
  Kcat_R_R318 = 7.796042;
  Keq_R318 = 4.655745;
  Kcat_V_R318 = 1;
  Km_C00001_eEC42111 = 5.651567;
  Km_C00074_eEC42111 = 0.453958184;
  Km_C00631_eEC42111 = 0.84220314;
  Kcat_F_R324 = 5.867779;
  Kcat_R_R324 = 3.331374;
  Keq_R324 = 1;
  Kcat_V_R324 = 1;
  Km_C00008_eEC6353 = 0.078582101;
  Km_C00009_eEC6353 = 0.854789674;
  Km_C00025_eEC6353 = 0.768636644;
  Km_C04640_eEC6353 = 0.0468;
  Km_C00001_eEC6353 = 1.461901;
  Km_C00002_eEC6353 = 0.074124821;
  Km_C00064_eEC6353 = 0.287832886;
  Km_C04376_eEC6353 = 0.269139975;
  Kcat_F_R346 = 15.7222;
  Kcat_R_R346 = 4.450131;
  Keq_R346 = 998855.9;
  Kcat_V_R346 = 1;
  Km_C00004_eEC1241 = 0.029656347;
  Km_C00011_eEC1241 = 0.413209707;
  Km_C00024_eEC1241 = 0.036603667;
  Km_C00080_eEC1241 = 0.307893664;
  Km_C00003_eEC1241 = 0.064532936;
  Km_C00010_eEC1241 = 0.040530939;
  Km_C00022_eEC1241 = 0.38795;
  Kcat_F_R367 = 41.18558;
  Kcat_R_R367 = 29.16148;
  Keq_R367 = 39378;
  Kcat_V_R367 = 1;
  Km_C00008_eEC27171 = 0.095129371;
  Km_C03175_eEC27171 = 0.124720573;
  Km_C00002_eEC27171 = 0.120733179;
  Km_C00493_eEC27171 = 6.3905;
  Kcat_F_R371 = 21.95;
  Kcat_R_R371 = 349.5079;
  Keq_R371 = 17031.36;
  Kcat_V_R371 = 1;
  Km_C00122_eEC1351 = 0.230714247;
  Km_C00390_eEC1351 = 0.019629668;
  Km_C00042_eEC1351 = 27.275;
  Km_C00399_eEC1351 = 0.01200348;
  Kcat_F_R372 = 37.55659;
  Kcat_R_R372 = 30.50542;
  Keq_R372 = 1.63233;
  Kcat_V_R372 = 1;
  Km_C00008_eEC6215 = 0.045971252;
  Km_C00009_eEC6215 = 1.423858;
  Km_C00091_eEC6215 = 0.046856858;
  Km_C00002_eEC6215 = 0.059107885;
  Km_C00010_eEC6215 = 4;
  Km_C00042_eEC6215 = 0.25;
  Kcat_F_R373 = 23.14659;
  Kcat_R_R373 = 31.08044;
  Keq_R373 = 6.495746;
  Kcat_V_R373 = 1;
  Km_C00531_eEC6215 = 0.049482018;
  Km_C00490_eEC6215 = 0.475;
  Kcat_F_R403 = 61.08804;
  Kcat_R_R403 = 4.353412;
  Keq_R403 = 815.3;
  Kcat_V_R403 = 1;
  Km_C00009_eEC31310 = 0.974477589;
  Km_C00031_eEC31310 = 1.199358;
  Km_C00001_eEC31310 = 0.972812712;
  Km_C00103_eEC31310 = 0.445;
  Kcat_F_R406 = 3.547282;
  Kcat_R_R406 = 16.00409;
  Keq_R406 = 194010.3;
  Kcat_V_R406 = 1;
  Km_C00014_hEC43117 = 2.321815;
  Km_C00022_hEC43117 = 0.786924958;
  Km_C00065_hEC43117 = 0.995956302;
  Kcat_F_R197 = 12.16954;
  Kcat_R_R197 = 26.70019;
  Keq_R197 = 336.0231;
  Kcat_V_R197 = 1;
  Km_C00058_hEC11719 = 6.29907;
  Km_C00003_hEC11719 = 0.179658741;
  Km_C00080_hEC11719 = 3.9966;
  Km_C00011_hEC11719 = 3.174462;
  Km_C00004_hEC11719 = 0.080049999;
  Kcat_F_R269 = 3.00716;
  Kcat_R_R269 = 467.4798;
  Keq_R269 = 2.261487e-5;
  Kcat_V_R269 = 1;
  Km_C00004_hEC11137 = 0.061;
  Km_C00036_hEC11137 = 0.0445;
  Km_C00080_hEC11137 = 1.627507;
  Km_C00003_hEC11137 = 0.105280019;
  Km_C00149_hEC11137 = 0.00012;
  Kcat_F_R345 = 7.969745;
  Kcat_R_R345 = 1.350432;
  Keq_R345 = 18.24607;
  Kcat_V_R345 = 1;
  Km_C00008_hEC6411 = 0.060795698;
  Km_C00009_hEC6411 = 1.167335;
  Km_C00036_hEC6411 = 0.202194154;
  Km_C00002_hEC6411 = 0.069778137;
  Km_C00022_hEC6411 = 9.7;
  Km_C00011_hEC6411 = 10.8;
  Gnc_C00158HCT_eEC23316 = 1;
  Gc_C00158HCT_eEC23316 = 1;
  Gnc_C01367_eEC23316 = 1;
  Gc_C01367_eEC23316 = 1;
  Gnc_C00026_eEC23316 = 1;
  Gc_C00026_eEC23316 = 1;
  Gnc_C00100_eEC23316 = 1;
  Gc_C00100_eEC23316 = 1;
  Gnc_C00004_eEC23316 = 1;
  Gc_C00004_eEC23316 = 1;

  // Assignment rules:
  R2_D := (1 + C00083/Km_C00083_eEC23139)^1*(1 + C00229/Km_C00229_eEC23139)^1 + (1 + C00010/Km_C00010_eEC23139)^1*(1 + C01209/Km_C01209_eEC23139)^1 - 1;
  hKcat_F_R2 := Kcat_V_R2*(Keq_R2*Km_C00083_eEC23139^1*Km_C00229_eEC23139^1/(Km_C00010_eEC23139^1*Km_C01209_eEC23139^1))^0.5;
  hKcat_R_R2 := Kcat_V_R2*(Keq_R2*Km_C00083_eEC23139^1*Km_C00229_eEC23139^1/(Km_C00010_eEC23139^1*Km_C01209_eEC23139^1))^(-0.5);
  R2_f := eEC23139*(hKcat_F_R2*C00083^1*C00229^1/(Km_C00083_eEC23139^1*Km_C00229_eEC23139^1))/R2_D;
  R2_r := eEC23139*(hKcat_R_R2*C00010^1*C01209^1/(Km_C00010_eEC23139^1*Km_C01209_eEC23139^1))/R2_D;
  R56_D := (1 + C00002/Km_C00002_eEC2721)^1*(1 + C00033/Km_C00033_eEC2721)^1 + (1 + C00008/Km_C00008_eEC2721)^1*(1 + C00227/Km_C00227_eEC2721)^1 - 1;
  hKcat_F_R56 := Kcat_V_R56*(Keq_R56*Km_C00002_eEC2721^1*Km_C00033_eEC2721^1/(Km_C00008_eEC2721^1*Km_C00227_eEC2721^1))^0.5;
  hKcat_R_R56 := Kcat_V_R56*(Keq_R56*Km_C00002_eEC2721^1*Km_C00033_eEC2721^1/(Km_C00008_eEC2721^1*Km_C00227_eEC2721^1))^(-0.5);
  R56_f := eEC2721*(hKcat_F_R56*C00002^1*C00033^1/(Km_C00002_eEC2721^1*Km_C00033_eEC2721^1))/R56_D;
  R56_r := eEC2721*(hKcat_R_R56*C00008^1*C00227^1/(Km_C00008_eEC2721^1*Km_C00227_eEC2721^1))/R56_D;
  R57_D := (1 + C00002/Km_C00002_eEC2721)^1*(1 + C00163/Km_C00163_eEC2721)^1 + (1 + C00008/Km_C00008_eEC2721)^1*(1 + C02876/Km_C02876_eEC2721)^1 - 1;
  hKcat_F_R57 := Kcat_V_R57*(Keq_R57*Km_C00002_eEC2721^1*Km_C00163_eEC2721^1/(Km_C00008_eEC2721^1*Km_C02876_eEC2721^1))^0.5;
  hKcat_R_R57 := Kcat_V_R57*(Keq_R57*Km_C00002_eEC2721^1*Km_C00163_eEC2721^1/(Km_C00008_eEC2721^1*Km_C02876_eEC2721^1))^(-0.5);
  R57_f := eEC2721*(hKcat_F_R57*C00002^1*C00163^1/(Km_C00002_eEC2721^1*Km_C00163_eEC2721^1))/R57_D;
  R57_r := eEC2721*(hKcat_R_R57*C00008^1*C02876^1/(Km_C00008_eEC2721^1*Km_C02876_eEC2721^1))/R57_D;
  R58_D := (1 + C00002/Km_C00002_eEC6211)^1*(1 + C00010/Km_C00010_eEC6211)^1*(1 + C00033/Km_C00033_eEC6211)^1 + (1 + C00013/Km_C00013_eEC6211)^1*(1 + C00020/Km_C00020_eEC6211)^1*(1 + C00024/Km_C00024_eEC6211)^1 - 1;
  hKcat_F_R58 := Kcat_V_R58*(Keq_R58*Km_C00002_eEC6211^1*Km_C00010_eEC6211^1*Km_C00033_eEC6211^1/(Km_C00013_eEC6211^1*Km_C00020_eEC6211^1*Km_C00024_eEC6211^1))^0.5;
  hKcat_R_R58 := Kcat_V_R58*(Keq_R58*Km_C00002_eEC6211^1*Km_C00010_eEC6211^1*Km_C00033_eEC6211^1/(Km_C00013_eEC6211^1*Km_C00020_eEC6211^1*Km_C00024_eEC6211^1))^(-0.5);
  R58_f := eEC6211*(hKcat_F_R58*C00002^1*C00010^1*C00033^1/(Km_C00002_eEC6211^1*Km_C00010_eEC6211^1*Km_C00033_eEC6211^1))/R58_D;
  R58_r := eEC6211*(hKcat_R_R58*C00013^1*C00020^1*C00024^1/(Km_C00013_eEC6211^1*Km_C00020_eEC6211^1*Km_C00024_eEC6211^1))/R58_D;
  R59_D := (1 + C00010/Km_C00010_eEC6211)^1*(1 + C05993/Km_C05993_eEC6211)^1 + (1 + C00020/Km_C00020_eEC6211)^1*(1 + C00024/Km_C00024_eEC6211)^1 - 1;
  hKcat_F_R59 := Kcat_V_R59*(Keq_R59*Km_C00010_eEC6211^1*Km_C05993_eEC6211^1/(Km_C00020_eEC6211^1*Km_C00024_eEC6211^1))^0.5;
  hKcat_R_R59 := Kcat_V_R59*(Keq_R59*Km_C00010_eEC6211^1*Km_C05993_eEC6211^1/(Km_C00020_eEC6211^1*Km_C00024_eEC6211^1))^(-0.5);
  R59_f := eEC6211*(hKcat_F_R59*C00010^1*C05993^1/(Km_C00010_eEC6211^1*Km_C05993_eEC6211^1))/R59_D;
  R59_r := eEC6211*(hKcat_R_R59*C00020^1*C00024^1/(Km_C00020_eEC6211^1*Km_C00024_eEC6211^1))/R59_D;
  R60_D := (1 + C00002/Km_C00002_eEC6211)^1*(1 + C00033/Km_C00033_eEC6211)^1 + (1 + C00013/Km_C00013_eEC6211)^1*(1 + C05993/Km_C05993_eEC6211)^1 - 1;
  hKcat_F_R60 := Kcat_V_R60*(Keq_R60*Km_C00002_eEC6211^1*Km_C00033_eEC6211^1/(Km_C00013_eEC6211^1*Km_C05993_eEC6211^1))^0.5;
  hKcat_R_R60 := Kcat_V_R60*(Keq_R60*Km_C00002_eEC6211^1*Km_C00033_eEC6211^1/(Km_C00013_eEC6211^1*Km_C05993_eEC6211^1))^(-0.5);
  R60_f := eEC6211*(hKcat_F_R60*C00002^1*C00033^1/(Km_C00002_eEC6211^1*Km_C00033_eEC6211^1))/R60_D;
  R60_r := eEC6211*(hKcat_R_R60*C00013^1*C05993^1/(Km_C00013_eEC6211^1*Km_C05993_eEC6211^1))/R60_D;
  R61_D := (1 + C00002/Km_C00002_eEC6211)^1*(1 + C00010/Km_C00010_eEC6211)^1*(1 + C00163/Km_C00163_eEC6211)^1 + (1 + C00013/Km_C00013_eEC6211)^1*(1 + C00020/Km_C00020_eEC6211)^1*(1 + C00100/Km_C00100_eEC6211)^1 - 1;
  hKcat_F_R61 := Kcat_V_R61*(Keq_R61*Km_C00002_eEC6211^1*Km_C00010_eEC6211^1*Km_C00163_eEC6211^1/(Km_C00013_eEC6211^1*Km_C00020_eEC6211^1*Km_C00100_eEC6211^1))^0.5;
  hKcat_R_R61 := Kcat_V_R61*(Keq_R61*Km_C00002_eEC6211^1*Km_C00010_eEC6211^1*Km_C00163_eEC6211^1/(Km_C00013_eEC6211^1*Km_C00020_eEC6211^1*Km_C00100_eEC6211^1))^(-0.5);
  R61_f := eEC6211*(hKcat_F_R61*C00002^1*C00010^1*C00163^1/(Km_C00002_eEC6211^1*Km_C00010_eEC6211^1*Km_C00163_eEC6211^1))/R61_D;
  R61_r := eEC6211*(hKcat_R_R61*C00013^1*C00020^1*C00100^1/(Km_C00013_eEC6211^1*Km_C00020_eEC6211^1*Km_C00100_eEC6211^1))/R61_D;
  R62_D := (1 + C00011/Km_C00011_eEC2216)^1*(1 + C06010/Km_C06010_eEC2216)^1 + (1 + C00022/Km_C00022_eEC2216)^2 - 1;
  hKcat_F_R62 := Kcat_V_R62*(Keq_R62*Km_C00011_eEC2216^1*Km_C06010_eEC2216^1/Km_C00022_eEC2216^2)^0.5;
  hKcat_R_R62 := Kcat_V_R62*(Keq_R62*Km_C00011_eEC2216^1*Km_C06010_eEC2216^1/Km_C00022_eEC2216^2)^(-0.5);
  R62_f := eEC2216*(hKcat_F_R62*C00011^1*C06010^1/(Km_C00011_eEC2216^1*Km_C06010_eEC2216^1))/R62_D;
  R62_r := eEC2216*(hKcat_R_R62*C00022^2/Km_C00022_eEC2216^2)/R62_D;
  R63_D := (1 + C00022/Km_C00022_eEC2216)^1*(1 + C00109/Km_C00109_eEC2216)^1 + (1 + C00011/Km_C00011_eEC2216)^1*(1 + C06006/Km_C06006_eEC2216)^1 - 1;
  hKcat_F_R63 := Kcat_V_R63*(Keq_R63*Km_C00022_eEC2216^1*Km_C00109_eEC2216^1/(Km_C00011_eEC2216^1*Km_C06006_eEC2216^1))^0.5;
  hKcat_R_R63 := Kcat_V_R63*(Keq_R63*Km_C00022_eEC2216^1*Km_C00109_eEC2216^1/(Km_C00011_eEC2216^1*Km_C06006_eEC2216^1))^(-0.5);
  R63_f := eEC2216*(hKcat_F_R63*C00022^1*C00109^1/(Km_C00022_eEC2216^1*Km_C00109_eEC2216^1))/R63_D;
  R63_r := eEC2216*(hKcat_R_R63*C00011^1*C06006^1/(Km_C00011_eEC2216^1*Km_C06006_eEC2216^1))/R63_D;
  R64_D := (1 + C00002/Km_C00002_eEC6412)^1*(1 + C00024/Km_C00024_eEC6412)^1*(1 + C00011/Km_C00011_eEC6412)^1 + (1 + C00008/Km_C00008_eEC6412)^1*(1 + C00009/Km_C00009_eEC6412)^1*(1 + C00083/Km_C00083_eEC6412)^1 - 1;
  hKcat_F_R64 := Kcat_V_R64*(Keq_R64*Km_C00002_eEC6412^1*Km_C00024_eEC6412^1*Km_C00011_eEC6412^1/(Km_C00008_eEC6412^1*Km_C00009_eEC6412^1*Km_C00083_eEC6412^1))^0.5;
  hKcat_R_R64 := Kcat_V_R64*(Keq_R64*Km_C00002_eEC6412^1*Km_C00024_eEC6412^1*Km_C00011_eEC6412^1/(Km_C00008_eEC6412^1*Km_C00009_eEC6412^1*Km_C00083_eEC6412^1))^(-0.5);
  R64_f := eEC6412*(hKcat_F_R64*C00002^1*C00024^1*C00011^1/(Km_C00002_eEC6412^1*Km_C00024_eEC6412^1*Km_C00011_eEC6412^1))/R64_D;
  R64_r := eEC6412*(hKcat_R_R64*C00008^1*C00009^1*C00083^1/(Km_C00008_eEC6412^1*Km_C00009_eEC6412^1*Km_C00083_eEC6412^1))/R64_D;
  R69_D := (1 + C00158/Km_C00158_eEC4213)^1 + (1 + C00311/Km_C00311_eEC4213)^1 - 1;
  hKcat_F_R69 := Kcat_V_R69*(Keq_R69*Km_C00158_eEC4213^1/Km_C00311_eEC4213^1)^0.5;
  hKcat_R_R69 := Kcat_V_R69*(Keq_R69*Km_C00158_eEC4213^1/Km_C00311_eEC4213^1)^(-0.5);
  R69_f := eEC4213*(hKcat_F_R69*C00158^1/Km_C00158_eEC4213^1)/R69_D;
  R69_r := eEC4213*(hKcat_R_R69*C00311^1/Km_C00311_eEC4213^1)/R69_D;
  R70_D := (1 + C00158/Km_C00158_eEC4213)^1 + (1 + C00417/Km_C00417_eEC4213)^1 - 1;
  hKcat_F_R70 := Kcat_V_R70*(Keq_R70*Km_C00158_eEC4213^1/Km_C00417_eEC4213^1)^0.5;
  hKcat_R_R70 := Kcat_V_R70*(Keq_R70*Km_C00158_eEC4213^1/Km_C00417_eEC4213^1)^(-0.5);
  R70_f := eEC4213*(hKcat_F_R70*C00158^1/Km_C00158_eEC4213^1)/R70_D;
  R70_r := eEC4213*(hKcat_R_R70*C00417^1/Km_C00417_eEC4213^1)/R70_D;
  R71_D := (1 + C00311/Km_C00311_eEC4213)^1 + (1 + C00417/Km_C00417_eEC4213)^1 - 1;
  hKcat_F_R71 := Kcat_V_R71*(Keq_R71*Km_C00311_eEC4213^1/Km_C00417_eEC4213^1)^0.5;
  hKcat_R_R71 := Kcat_V_R71*(Keq_R71*Km_C00311_eEC4213^1/Km_C00417_eEC4213^1)^(-0.5);
  R71_f := eEC4213*(hKcat_F_R71*C00311^1/Km_C00311_eEC4213^1)/R71_D;
  R71_r := eEC4213*(hKcat_R_R71*C00417^1/Km_C00417_eEC4213^1)/R71_D;
  R102_D := (1 + C00002/Km_C00002_eEC6345)^1*(1 + C00049/Km_C00049_eEC6345)^1*(1 + C00327/Km_C00327_eEC6345)^1 + (1 + C00013/Km_C00013_eEC6345)^1*(1 + C00020/Km_C00020_eEC6345)^1*(1 + C03406/Km_C03406_eEC6345)^1 - 1;
  hKcat_F_R102 := Kcat_V_R102*(Keq_R102*Km_C00002_eEC6345^1*Km_C00049_eEC6345^1*Km_C00327_eEC6345^1/(Km_C00013_eEC6345^1*Km_C00020_eEC6345^1*Km_C03406_eEC6345^1))^0.5;
  hKcat_R_R102 := Kcat_V_R102*(Keq_R102*Km_C00002_eEC6345^1*Km_C00049_eEC6345^1*Km_C00327_eEC6345^1/(Km_C00013_eEC6345^1*Km_C00020_eEC6345^1*Km_C03406_eEC6345^1))^(-0.5);
  R102_f := eEC6345*(hKcat_F_R102*C00002^1*C00049^1*C00327^1/(Km_C00002_eEC6345^1*Km_C00049_eEC6345^1*Km_C00327_eEC6345^1))/R102_D;
  R102_r := eEC6345*(hKcat_R_R102*C00013^1*C00020^1*C03406^1/(Km_C00013_eEC6345^1*Km_C00020_eEC6345^1*Km_C03406_eEC6345^1))/R102_D;
  R107_D := (1 + C00064/Km_C00064_eEC6354)^1 + (1 + C00014/Km_C00014_eEC6354)^1*(1 + C00025/Km_C00025_eEC6354)^1 - 1;
  hKcat_F_R107 := Kcat_V_R107*(Keq_R107*Km_C00064_eEC6354^1/(Km_C00014_eEC6354^1*Km_C00025_eEC6354^1))^0.5;
  hKcat_R_R107 := Kcat_V_R107*(Keq_R107*Km_C00064_eEC6354^1/(Km_C00014_eEC6354^1*Km_C00025_eEC6354^1))^(-0.5);
  R107_f := eEC6354*(hKcat_F_R107*C00064^1/Km_C00064_eEC6354^1)/R107_D;
  R107_r := eEC6354*(hKcat_R_R107*C00014^1*C00025^1/(Km_C00014_eEC6354^1*Km_C00025_eEC6354^1))/R107_D;
  R108_D := (1 + C00002/Km_C00002_eEC6354)^1*(1 + C00014/Km_C00014_eEC6354)^1*(1 + C00049/Km_C00049_eEC6354)^1 + (1 + C00013/Km_C00013_eEC6354)^1*(1 + C00020/Km_C00020_eEC6354)^1*(1 + C00152/Km_C00152_eEC6354)^1 - 1;
  hKcat_F_R108 := Kcat_V_R108*(Keq_R108*Km_C00002_eEC6354^1*Km_C00014_eEC6354^1*Km_C00049_eEC6354^1/(Km_C00013_eEC6354^1*Km_C00020_eEC6354^1*Km_C00152_eEC6354^1))^0.5;
  hKcat_R_R108 := Kcat_V_R108*(Keq_R108*Km_C00002_eEC6354^1*Km_C00014_eEC6354^1*Km_C00049_eEC6354^1/(Km_C00013_eEC6354^1*Km_C00020_eEC6354^1*Km_C00152_eEC6354^1))^(-0.5);
  R108_f := eEC6354*(hKcat_F_R108*C00002^1*C00014^1*C00049^1/(Km_C00002_eEC6354^1*Km_C00014_eEC6354^1*Km_C00049_eEC6354^1))/R108_D;
  R108_r := eEC6354*(hKcat_R_R108*C00013^1*C00020^1*C00152^1/(Km_C00013_eEC6354^1*Km_C00020_eEC6354^1*Km_C00152_eEC6354^1))/R108_D;
  R109_D := (1 + C00002/Km_C00002_eEC6354)^1*(1 + C00049/Km_C00049_eEC6354)^1*(1 + C00064/Km_C00064_eEC6354)^1 + (1 + C00013/Km_C00013_eEC6354)^1*(1 + C00020/Km_C00020_eEC6354)^1*(1 + C00025/Km_C00025_eEC6354)^1*(1 + C00152/Km_C00152_eEC6354)^1 - 1;
  hKcat_F_R109 := Kcat_V_R109*(Keq_R109*Km_C00002_eEC6354^1*Km_C00049_eEC6354^1*Km_C00064_eEC6354^1/(Km_C00013_eEC6354^1*Km_C00020_eEC6354^1*Km_C00025_eEC6354^1*Km_C00152_eEC6354^1))^0.5;
  hKcat_R_R109 := Kcat_V_R109*(Keq_R109*Km_C00002_eEC6354^1*Km_C00049_eEC6354^1*Km_C00064_eEC6354^1/(Km_C00013_eEC6354^1*Km_C00020_eEC6354^1*Km_C00025_eEC6354^1*Km_C00152_eEC6354^1))^(-0.5);
  R109_f := eEC6354*(hKcat_F_R109*C00002^1*C00049^1*C00064^1/(Km_C00002_eEC6354^1*Km_C00049_eEC6354^1*Km_C00064_eEC6354^1))/R109_D;
  R109_r := eEC6354*(hKcat_R_R109*C00013^1*C00020^1*C00025^1*C00152^1/(Km_C00013_eEC6354^1*Km_C00020_eEC6354^1*Km_C00025_eEC6354^1*Km_C00152_eEC6354^1))/R109_D;
  R111_D := (1 + C00049/Km_C00049_eEC4311)^1 + (1 + C00014/Km_C00014_eEC4311)^1*(1 + C00122/Km_C00122_eEC4311)^1 - 1;
  hKcat_F_R111 := Kcat_V_R111*(Keq_R111*Km_C00049_eEC4311^1/(Km_C00014_eEC4311^1*Km_C00122_eEC4311^1))^0.5;
  hKcat_R_R111 := Kcat_V_R111*(Keq_R111*Km_C00049_eEC4311^1/(Km_C00014_eEC4311^1*Km_C00122_eEC4311^1))^(-0.5);
  R111_f := eEC4311*(hKcat_F_R111*C00049^1/Km_C00049_eEC4311^1)/R111_D;
  R111_r := eEC4311*(hKcat_R_R111*C00014^1*C00122^1/(Km_C00014_eEC4311^1*Km_C00122_eEC4311^1))/R111_D;
  R123_D := (1 + C00002/Km_C00002_eEC2338)^1*(1 + C00010/Km_C00010_eEC2338)^1*(1 + C00158/Km_C00158_eEC2338)^1 + (1 + C00008/Km_C00008_eEC2338)^1*(1 + C00009/Km_C00009_eEC2338)^1*(1 + C00024/Km_C00024_eEC2338)^1*(1 + C00036/Km_C00036_eEC2338)^1 - 1;
  hKcat_F_R123 := Kcat_V_R123*(Keq_R123*Km_C00002_eEC2338^1*Km_C00010_eEC2338^1*Km_C00158_eEC2338^1/(Km_C00008_eEC2338^1*Km_C00009_eEC2338^1*Km_C00024_eEC2338^1*Km_C00036_eEC2338^1))^0.5;
  hKcat_R_R123 := Kcat_V_R123*(Keq_R123*Km_C00002_eEC2338^1*Km_C00010_eEC2338^1*Km_C00158_eEC2338^1/(Km_C00008_eEC2338^1*Km_C00009_eEC2338^1*Km_C00024_eEC2338^1*Km_C00036_eEC2338^1))^(-0.5);
  R123_f := eEC2338*(hKcat_F_R123*C00002^1*C00010^1*C00158^1/(Km_C00002_eEC2338^1*Km_C00010_eEC2338^1*Km_C00158_eEC2338^1))/R123_D;
  R123_r := eEC2338*(hKcat_R_R123*C00008^1*C00009^1*C00024^1*C00036^1/(Km_C00008_eEC2338^1*Km_C00009_eEC2338^1*Km_C00024_eEC2338^1*Km_C00036_eEC2338^1))/R123_D;
  R129_D := (1 + C00185/Km_C00185_eEC32121)^1 + (1 + C00031/Km_C00031_eEC32121)^2 - 1;
  hKcat_F_R129 := Kcat_V_R129*(Keq_R129*Km_C00185_eEC32121^1/Km_C00031_eEC32121^2)^0.5;
  hKcat_R_R129 := Kcat_V_R129*(Keq_R129*Km_C00185_eEC32121^1/Km_C00031_eEC32121^2)^(-0.5);
  R129_f := eEC32121*(hKcat_F_R129*C00185^1/Km_C00185_eEC32121^1)/R129_D;
  R129_r := eEC32121*(hKcat_R_R129*C00031^2/Km_C00031_eEC32121^2)/R129_D;
  R130_D := (1 + C00760/Km_C00760_eEC32121)^1 + (1 + C00221/Km_C00221_eEC32121)^1*(1 + C00760/Km_C00760_eEC32121)^1 - 1;
  hKcat_F_R130 := Kcat_V_R130*(Keq_R130*Km_C00760_eEC32121^1/(Km_C00221_eEC32121^1*Km_C00760_eEC32121^1))^0.5;
  hKcat_R_R130 := Kcat_V_R130*(Keq_R130*Km_C00760_eEC32121^1/(Km_C00221_eEC32121^1*Km_C00760_eEC32121^1))^(-0.5);
  R130_f := eEC32121*(hKcat_F_R130*C00760^1/Km_C00760_eEC32121^1)/R130_D;
  R130_r := eEC32121*(hKcat_R_R130*C00221^1*C00760^1/(Km_C00221_eEC32121^1*Km_C00760_eEC32121^1))/R130_D;
  R131_D := (1 + C01798/Km_C01798_eEC32121)^1 + (1 + C00267/Km_C00267_eEC32121)^1*(1 + C01335/Km_C01335_eEC32121)^1 - 1;
  hKcat_F_R131 := Kcat_V_R131*(Keq_R131*Km_C01798_eEC32121^1/(Km_C00267_eEC32121^1*Km_C01335_eEC32121^1))^0.5;
  hKcat_R_R131 := Kcat_V_R131*(Keq_R131*Km_C01798_eEC32121^1/(Km_C00267_eEC32121^1*Km_C01335_eEC32121^1))^(-0.5);
  R131_f := eEC32121*(hKcat_F_R131*C01798^1/Km_C01798_eEC32121^1)/R131_D;
  R131_r := eEC32121*(hKcat_R_R131*C00267^1*C01335^1/(Km_C00267_eEC32121^1*Km_C01335_eEC32121^1))/R131_D;
  R154_D := (1 + C00064/Km_C00064_eEC6355)^1 + (1 + C00014/Km_C00014_eEC6355)^1*(1 + C00025/Km_C00025_eEC6355)^1 - 1;
  hKcat_F_R154 := Kcat_V_R154*(Keq_R154*Km_C00064_eEC6355^1/(Km_C00014_eEC6355^1*Km_C00025_eEC6355^1))^0.5;
  hKcat_R_R154 := Kcat_V_R154*(Keq_R154*Km_C00064_eEC6355^1/(Km_C00014_eEC6355^1*Km_C00025_eEC6355^1))^(-0.5);
  R154_f := eEC6355*(hKcat_F_R154*C00064^1/Km_C00064_eEC6355^1)/R154_D;
  R154_r := eEC6355*(hKcat_R_R154*C00014^1*C00025^1/(Km_C00014_eEC6355^1*Km_C00025_eEC6355^1))/R154_D;
  R155_D := (1 + C00002/Km_C00002_eEC6355)^2*(1 + C00064/Km_C00064_eEC6355)^1*(1 + C00011/Km_C00011_eEC6355)^1 + (1 + C00008/Km_C00008_eEC6355)^2*(1 + C00009/Km_C00009_eEC6355)^1*(1 + C00025/Km_C00025_eEC6355)^1*(1 + C00169/Km_C00169_eEC6355)^1 - 1;
  hKcat_F_R155 := Kcat_V_R155*(Keq_R155*Km_C00002_eEC6355^2*Km_C00064_eEC6355^1*Km_C00011_eEC6355^1/(Km_C00008_eEC6355^2*Km_C00009_eEC6355^1*Km_C00025_eEC6355^1*Km_C00169_eEC6355^1))^0.5;
  hKcat_R_R155 := Kcat_V_R155*(Keq_R155*Km_C00002_eEC6355^2*Km_C00064_eEC6355^1*Km_C00011_eEC6355^1/(Km_C00008_eEC6355^2*Km_C00009_eEC6355^1*Km_C00025_eEC6355^1*Km_C00169_eEC6355^1))^(-0.5);
  R155_f := eEC6355*(hKcat_F_R155*C00002^2*C00064^1*C00011^1/(Km_C00002_eEC6355^2*Km_C00064_eEC6355^1*Km_C00011_eEC6355^1))/R155_D;
  R155_r := eEC6355*(hKcat_R_R155*C00008^2*C00009^1*C00025^1*C00169^1/(Km_C00008_eEC6355^2*Km_C00009_eEC6355^1*Km_C00025_eEC6355^1*Km_C00169_eEC6355^1))/R155_D;
  eEC23316_fr := (Gnc_C00004_eEC23316 + (1 - Gnc_C00004_eEC23316)*(1/(1 + C00004/Ki_C00004_eEC23316)))*(Gnc_C00026_eEC23316 + (1 - Gnc_C00026_eEC23316)*(1/(1 + C00026/Ki_C00026_eEC23316)))*(Gnc_C00100_eEC23316 + (1 - Gnc_C00100_eEC23316)*(1/(1 + C00100/Ki_C00100_eEC23316)))*(Gnc_C00158HCT_eEC23316 + (1 - Gnc_C00158HCT_eEC23316)*(1/(1 + C00158HCT/Ki_C00158HCT_eEC23316)))*(Gnc_C01367_eEC23316 + (1 - Gnc_C01367_eEC23316)*(1/(1 + C01367/Ki_C01367_eEC23316)));
  eEC23316_Dreg := (1 - Gc_C00004_eEC23316)*(C00004/Ki_C00004_eEC23316) + (1 - Gc_C00026_eEC23316)*(C00026/Ki_C00026_eEC23316) + (1 - Gc_C00100_eEC23316)*(C00100/Ki_C00100_eEC23316) + (1 - Gc_C00158HCT_eEC23316)*(C00158HCT/Ki_C00158HCT_eEC23316) + (1 - Gc_C01367_eEC23316)*(C01367/Ki_C01367_eEC23316);
  R157_D := (1 + C00010/Km_C00010_eEC23316)^1*(1 + C00158/Km_C00158_eEC23316)^1 + (1 + C00024/Km_C00024_eEC23316)^1*(1 + C00036/Km_C00036_eEC23316)^1 - 1;
  hKcat_F_R157 := Kcat_V_R157*(Keq_R157*Km_C00010_eEC23316^1*Km_C00158_eEC23316^1/(Km_C00024_eEC23316^1*Km_C00036_eEC23316^1))^0.5;
  hKcat_R_R157 := Kcat_V_R157*(Keq_R157*Km_C00010_eEC23316^1*Km_C00158_eEC23316^1/(Km_C00024_eEC23316^1*Km_C00036_eEC23316^1))^(-0.5);
  R157_f := eEC23316*eEC23316_fr*(hKcat_F_R157*C00010^1*C00158^1/(Km_C00010_eEC23316^1*Km_C00158_eEC23316^1))/(R157_D + eEC23316_Dreg);
  R157_r := eEC23316*eEC23316_fr*(hKcat_R_R157*C00024^1*C00036^1/(Km_C00024_eEC23316^1*Km_C00036_eEC23316^1))/(R157_D + eEC23316_Dreg);
  R181_D := (1 + C00003/Km_C00003_eEC11128)^1*(1 + C00256/Km_C00256_eEC11128)^1 + (1 + C00004/Km_C00004_eEC11128)^1*(1 + C00022/Km_C00022_eEC11128)^1 - 1;
  hKcat_F_R181 := Kcat_V_R181*(Keq_R181*Km_C00003_eEC11128^1*Km_C00256_eEC11128^1/(Km_C00004_eEC11128^1*Km_C00022_eEC11128^1))^0.5;
  hKcat_R_R181 := Kcat_V_R181*(Keq_R181*Km_C00003_eEC11128^1*Km_C00256_eEC11128^1/(Km_C00004_eEC11128^1*Km_C00022_eEC11128^1))^(-0.5);
  R181_f := eEC11128*(hKcat_F_R181*C00003^1*C00256^1/(Km_C00003_eEC11128^1*Km_C00256_eEC11128^1))/R181_D;
  R181_r := eEC11128*(hKcat_R_R181*C00004^1*C00022^1/(Km_C00004_eEC11128^1*Km_C00022_eEC11128^1))/R181_D;
  R199_D := (1 + C00354/Km_C00354_eEC31311)^1 + (1 + C00009/Km_C00009_eEC31311)^1*(1 + C00085/Km_C00085_eEC31311)^1 - 1;
  hKcat_F_R199 := Kcat_V_R199*(Keq_R199*Km_C00354_eEC31311^1/(Km_C00009_eEC31311^1*Km_C00085_eEC31311^1))^0.5;
  hKcat_R_R199 := Kcat_V_R199*(Keq_R199*Km_C00354_eEC31311^1/(Km_C00009_eEC31311^1*Km_C00085_eEC31311^1))^(-0.5);
  R199_f := eEC31311*(hKcat_F_R199*C00354^1/Km_C00354_eEC31311^1)/R199_D;
  R199_r := eEC31311*(hKcat_R_R199*C00009^1*C00085^1/(Km_C00009_eEC31311^1*Km_C00085_eEC31311^1))/R199_D;
  R200_D := (1 + C00447/Km_C00447_eEC31311)^1 + (1 + C00009/Km_C00009_eEC31311)^1*(1 + C05382/Km_C05382_eEC31311)^1 - 1;
  hKcat_F_R200 := Kcat_V_R200*(Keq_R200*Km_C00447_eEC31311^1/(Km_C00009_eEC31311^1*Km_C05382_eEC31311^1))^0.5;
  hKcat_R_R200 := Kcat_V_R200*(Keq_R200*Km_C00447_eEC31311^1/(Km_C00009_eEC31311^1*Km_C05382_eEC31311^1))^(-0.5);
  R200_f := eEC31311*(hKcat_F_R200*C00447^1/Km_C00447_eEC31311^1)/R200_D;
  R200_r := eEC31311*(hKcat_R_R200*C00009^1*C05382^1/(Km_C00009_eEC31311^1*Km_C05382_eEC31311^1))/R200_D;
  R201_D := (1 + C00354/Km_C00354_eEC41213)^1 + (1 + C00111/Km_C00111_eEC41213)^1*(1 + C00118/Km_C00118_eEC41213)^1 - 1;
  hKcat_F_R201 := Kcat_V_R201*(Keq_R201*Km_C00354_eEC41213^1/(Km_C00111_eEC41213^1*Km_C00118_eEC41213^1))^0.5;
  hKcat_R_R201 := Kcat_V_R201*(Keq_R201*Km_C00354_eEC41213^1/(Km_C00111_eEC41213^1*Km_C00118_eEC41213^1))^(-0.5);
  R201_f := eEC41213*(hKcat_F_R201*C00354^1/Km_C00354_eEC41213^1)/R201_D;
  R201_r := eEC41213*(hKcat_R_R201*C00111^1*C00118^1/(Km_C00111_eEC41213^1*Km_C00118_eEC41213^1))/R201_D;
  R202_D := (1 + C00447/Km_C00447_eEC41213)^1 + (1 + C00111/Km_C00111_eEC41213)^1*(1 + C00279/Km_C00279_eEC41213)^1 - 1;
  hKcat_F_R202 := Kcat_V_R202*(Keq_R202*Km_C00447_eEC41213^1/(Km_C00111_eEC41213^1*Km_C00279_eEC41213^1))^0.5;
  hKcat_R_R202 := Kcat_V_R202*(Keq_R202*Km_C00447_eEC41213^1/(Km_C00111_eEC41213^1*Km_C00279_eEC41213^1))^(-0.5);
  R202_f := eEC41213*(hKcat_F_R202*C00447^1/Km_C00447_eEC41213^1)/R202_D;
  R202_r := eEC41213*(hKcat_R_R202*C00111^1*C00279^1/(Km_C00111_eEC41213^1*Km_C00279_eEC41213^1))/R202_D;
  R203_D := (1 + C01094/Km_C01094_eEC41213)^1 + (1 + C00111/Km_C00111_eEC41213)^1*(1 + C00577/Km_C00577_eEC41213)^1 - 1;
  hKcat_F_R203 := Kcat_V_R203*(Keq_R203*Km_C01094_eEC41213^1/(Km_C00111_eEC41213^1*Km_C00577_eEC41213^1))^0.5;
  hKcat_R_R203 := Kcat_V_R203*(Keq_R203*Km_C01094_eEC41213^1/(Km_C00111_eEC41213^1*Km_C00577_eEC41213^1))^(-0.5);
  R203_f := eEC41213*(hKcat_F_R203*C01094^1/Km_C01094_eEC41213^1)/R203_D;
  R203_r := eEC41213*(hKcat_R_R203*C00111^1*C00577^1/(Km_C00111_eEC41213^1*Km_C00577_eEC41213^1))/R203_D;
  R204_D := (1 + C00149/Km_C00149_eEC4212)^1 + (1 + C00122/Km_C00122_eEC4212)^1 - 1;
  hKcat_F_R204 := Kcat_V_R204*(Keq_R204*Km_C00149_eEC4212^1/Km_C00122_eEC4212^1)^0.5;
  hKcat_R_R204 := Kcat_V_R204*(Keq_R204*Km_C00149_eEC4212^1/Km_C00122_eEC4212^1)^(-0.5);
  R204_f := eEC4212*(hKcat_F_R204*C00149^1/Km_C00149_eEC4212^1)/R204_D;
  R204_r := eEC4212*(hKcat_R_R204*C00122^1/Km_C00122_eEC4212^1)/R204_D;
  R208_D := (1 + C00006/Km_C00006_eEC11149)^1*(1 + C01172/Km_C01172_eEC11149)^1 + (1 + C00005/Km_C00005_eEC11149)^1*(1 + C01236/Km_C01236_eEC11149)^1 - 1;
  hKcat_F_R208 := Kcat_V_R208*(Keq_R208*Km_C00006_eEC11149^1*Km_C01172_eEC11149^1/(Km_C00005_eEC11149^1*Km_C01236_eEC11149^1))^0.5;
  hKcat_R_R208 := Kcat_V_R208*(Keq_R208*Km_C00006_eEC11149^1*Km_C01172_eEC11149^1/(Km_C00005_eEC11149^1*Km_C01236_eEC11149^1))^(-0.5);
  R208_f := eEC11149*(hKcat_F_R208*C00006^1*C01172^1/(Km_C00006_eEC11149^1*Km_C01172_eEC11149^1))/R208_D;
  R208_r := eEC11149*(hKcat_R_R208*C00005^1*C01236^1/(Km_C00005_eEC11149^1*Km_C01236_eEC11149^1))/R208_D;
  R209_D := (1 + C00092/Km_C00092_eEC5319)^1 + (1 + C00085/Km_C00085_eEC5319)^1 - 1;
  hKcat_F_R209 := Kcat_V_R209*(Keq_R209*Km_C00092_eEC5319^1/Km_C00085_eEC5319^1)^0.5;
  hKcat_R_R209 := Kcat_V_R209*(Keq_R209*Km_C00092_eEC5319^1/Km_C00085_eEC5319^1)^(-0.5);
  R209_f := eEC5319*(hKcat_F_R209*C00092^1/Km_C00092_eEC5319^1)/R209_D;
  R209_r := eEC5319*(hKcat_R_R209*C00085^1/Km_C00085_eEC5319^1)/R209_D;
  R210_D := (1 + C00668/Km_C00668_eEC5319)^1 + (1 + C01172/Km_C01172_eEC5319)^1 - 1;
  hKcat_F_R210 := Kcat_V_R210*(Keq_R210*Km_C00668_eEC5319^1/Km_C01172_eEC5319^1)^0.5;
  hKcat_R_R210 := Kcat_V_R210*(Keq_R210*Km_C00668_eEC5319^1/Km_C01172_eEC5319^1)^(-0.5);
  R210_f := eEC5319*(hKcat_F_R210*C00668^1/Km_C00668_eEC5319^1)/R210_D;
  R210_r := eEC5319*(hKcat_R_R210*C01172^1/Km_C01172_eEC5319^1)/R210_D;
  R213_D := (1 + C00006/Km_C00006_eEC12141)^1*(1 + C00009/Km_C00009_eEC12141)^1*(1 + C01165/Km_C01165_eEC12141)^1 + (1 + C00005/Km_C00005_eEC12141)^1*(1 + C03287/Km_C03287_eEC12141)^1 - 1;
  hKcat_F_R213 := Kcat_V_R213*(Keq_R213*Km_C00006_eEC12141^1*Km_C00009_eEC12141^1*Km_C01165_eEC12141^1/(Km_C00005_eEC12141^1*Km_C03287_eEC12141^1))^0.5;
  hKcat_R_R213 := Kcat_V_R213*(Keq_R213*Km_C00006_eEC12141^1*Km_C00009_eEC12141^1*Km_C01165_eEC12141^1/(Km_C00005_eEC12141^1*Km_C03287_eEC12141^1))^(-0.5);
  R213_f := eEC12141*(hKcat_F_R213*C00006^1*C00009^1*C01165^1/(Km_C00006_eEC12141^1*Km_C00009_eEC12141^1*Km_C01165_eEC12141^1))/R213_D;
  R213_r := eEC12141*(hKcat_R_R213*C00005^1*C03287^1/(Km_C00005_eEC12141^1*Km_C03287_eEC12141^1))/R213_D;
  R216_D := (1 + C00002/Km_C00002_eEC6312)^1*(1 + C00014/Km_C00014_eEC6312)^1*(1 + C00025/Km_C00025_eEC6312)^1 + (1 + C00008/Km_C00008_eEC6312)^1*(1 + C00009/Km_C00009_eEC6312)^1*(1 + C00064/Km_C00064_eEC6312)^1 - 1;
  hKcat_F_R216 := Kcat_V_R216*(Keq_R216*Km_C00002_eEC6312^1*Km_C00014_eEC6312^1*Km_C00025_eEC6312^1/(Km_C00008_eEC6312^1*Km_C00009_eEC6312^1*Km_C00064_eEC6312^1))^0.5;
  hKcat_R_R216 := Kcat_V_R216*(Keq_R216*Km_C00002_eEC6312^1*Km_C00014_eEC6312^1*Km_C00025_eEC6312^1/(Km_C00008_eEC6312^1*Km_C00009_eEC6312^1*Km_C00064_eEC6312^1))^(-0.5);
  R216_f := eEC6312*(hKcat_F_R216*C00002^1*C00014^1*C00025^1/(Km_C00002_eEC6312^1*Km_C00014_eEC6312^1*Km_C00025_eEC6312^1))/R216_D;
  R216_r := eEC6312*(hKcat_R_R216*C00008^1*C00009^1*C00064^1/(Km_C00008_eEC6312^1*Km_C00009_eEC6312^1*Km_C00064_eEC6312^1))/R216_D;
  R222_D := (1 + C00003/Km_C00003_eEC12112)^1*(1 + C00009/Km_C00009_eEC12112)^1*(1 + C00118/Km_C00118_eEC12112)^1 + (1 + C00004/Km_C00004_eEC12112)^1*(1 + C00236/Km_C00236_eEC12112)^1 - 1;
  hKcat_F_R222 := Kcat_V_R222*(Keq_R222*Km_C00003_eEC12112^1*Km_C00009_eEC12112^1*Km_C00118_eEC12112^1/(Km_C00004_eEC12112^1*Km_C00236_eEC12112^1))^0.5;
  hKcat_R_R222 := Kcat_V_R222*(Keq_R222*Km_C00003_eEC12112^1*Km_C00009_eEC12112^1*Km_C00118_eEC12112^1/(Km_C00004_eEC12112^1*Km_C00236_eEC12112^1))^(-0.5);
  R222_f := eEC12112*(hKcat_F_R222*C00003^1*C00009^1*C00118^1/(Km_C00003_eEC12112^1*Km_C00009_eEC12112^1*Km_C00118_eEC12112^1))/R222_D;
  R222_r := eEC12112*(hKcat_R_R222*C00004^1*C00236^1/(Km_C00004_eEC12112^1*Km_C00236_eEC12112^1))/R222_D;
  R224_D := (1 + C00024/Km_C00024_eEC23129)^1*(1 + C00037/Km_C00037_eEC23129)^1 + (1 + C00010/Km_C00010_eEC23129)^1*(1 + C03508/Km_C03508_eEC23129)^1 - 1;
  hKcat_F_R224 := Kcat_V_R224*(Keq_R224*Km_C00024_eEC23129^1*Km_C00037_eEC23129^1/(Km_C00010_eEC23129^1*Km_C03508_eEC23129^1))^0.5;
  hKcat_R_R224 := Kcat_V_R224*(Keq_R224*Km_C00024_eEC23129^1*Km_C00037_eEC23129^1/(Km_C00010_eEC23129^1*Km_C03508_eEC23129^1))^(-0.5);
  R224_f := eEC23129*(hKcat_F_R224*C00024^1*C00037^1/(Km_C00024_eEC23129^1*Km_C00037_eEC23129^1))/R224_D;
  R224_r := eEC23129*(hKcat_R_R224*C00010^1*C03508^1/(Km_C00010_eEC23129^1*Km_C03508_eEC23129^1))/R224_D;
  R225_D := (1 + C00037/Km_C00037_eEC1442)^1*(1 + C02051/Km_C02051_eEC1442)^1 + (1 + C00011/Km_C00011_eEC1442)^1*(1 + C01242/Km_C01242_eEC1442)^1 - 1;
  hKcat_F_R225 := Kcat_V_R225*(Keq_R225*Km_C00037_eEC1442^1*Km_C02051_eEC1442^1/(Km_C00011_eEC1442^1*Km_C01242_eEC1442^1))^0.5;
  hKcat_R_R225 := Kcat_V_R225*(Keq_R225*Km_C00037_eEC1442^1*Km_C02051_eEC1442^1/(Km_C00011_eEC1442^1*Km_C01242_eEC1442^1))^(-0.5);
  R225_f := eEC1442*(hKcat_F_R225*C00037^1*C02051^1/(Km_C00037_eEC1442^1*Km_C02051_eEC1442^1))/R225_D;
  R225_r := eEC1442*(hKcat_R_R225*C00011^1*C01242^1/(Km_C00011_eEC1442^1*Km_C01242_eEC1442^1))/R225_D;
  R226_D := (1 + C00003/Km_C00003_eEC1442)^1*(1 + C00037/Km_C00037_eEC1442)^1*(1 + C00101/Km_C00101_eEC1442)^1 + (1 + C00004/Km_C00004_eEC1442)^1*(1 + C00011/Km_C00011_eEC1442)^1*(1 + C00014/Km_C00014_eEC1442)^1*(1 + C00143/Km_C00143_eEC1442)^1 - 1;
  hKcat_F_R226 := Kcat_V_R226*(Keq_R226*Km_C00003_eEC1442^1*Km_C00037_eEC1442^1*Km_C00101_eEC1442^1/(Km_C00004_eEC1442^1*Km_C00011_eEC1442^1*Km_C00014_eEC1442^1*Km_C00143_eEC1442^1))^0.5;
  hKcat_R_R226 := Kcat_V_R226*(Keq_R226*Km_C00003_eEC1442^1*Km_C00037_eEC1442^1*Km_C00101_eEC1442^1/(Km_C00004_eEC1442^1*Km_C00011_eEC1442^1*Km_C00014_eEC1442^1*Km_C00143_eEC1442^1))^(-0.5);
  R226_f := eEC1442*(hKcat_F_R226*C00003^1*C00037^1*C00101^1/(Km_C00003_eEC1442^1*Km_C00037_eEC1442^1*Km_C00101_eEC1442^1))/R226_D;
  R226_r := eEC1442*(hKcat_R_R226*C00004^1*C00011^1*C00014^1*C00143^1/(Km_C00004_eEC1442^1*Km_C00011_eEC1442^1*Km_C00014_eEC1442^1*Km_C00143_eEC1442^1))/R226_D;
  R227_D := (1 + C00037/Km_C00037_eEC2121)^1*(1 + C00143/Km_C00143_eEC2121)^1 + (1 + C00065/Km_C00065_eEC2121)^1*(1 + C00101/Km_C00101_eEC2121)^1 - 1;
  hKcat_F_R227 := Kcat_V_R227*(Keq_R227*Km_C00037_eEC2121^1*Km_C00143_eEC2121^1/(Km_C00065_eEC2121^1*Km_C00101_eEC2121^1))^0.5;
  hKcat_R_R227 := Kcat_V_R227*(Keq_R227*Km_C00037_eEC2121^1*Km_C00143_eEC2121^1/(Km_C00065_eEC2121^1*Km_C00101_eEC2121^1))^(-0.5);
  R227_f := eEC2121*(hKcat_F_R227*C00037^1*C00143^1/(Km_C00037_eEC2121^1*Km_C00143_eEC2121^1))/R227_D;
  R227_r := eEC2121*(hKcat_R_R227*C00065^1*C00101^1/(Km_C00065_eEC2121^1*Km_C00101_eEC2121^1))/R227_D;
  R228_D := (1 + C00065/Km_C00065_eEC2121)^1*(1 + C01217/Km_C01217_eEC2121)^1 + (1 + C00037/Km_C00037_eEC2121)^1*(1 + C04377/Km_C04377_eEC2121)^1 - 1;
  hKcat_F_R228 := Kcat_V_R228*(Keq_R228*Km_C00065_eEC2121^1*Km_C01217_eEC2121^1/(Km_C00037_eEC2121^1*Km_C04377_eEC2121^1))^0.5;
  hKcat_R_R228 := Kcat_V_R228*(Keq_R228*Km_C00065_eEC2121^1*Km_C01217_eEC2121^1/(Km_C00037_eEC2121^1*Km_C04377_eEC2121^1))^(-0.5);
  R228_f := eEC2121*(hKcat_F_R228*C00065^1*C01217^1/(Km_C00065_eEC2121^1*Km_C01217_eEC2121^1))/R228_D;
  R228_r := eEC2121*(hKcat_R_R228*C00037^1*C04377^1/(Km_C00037_eEC2121^1*Km_C04377_eEC2121^1))/R228_D;
  R231_D := (1 + C00002/Km_C00002_eEC6352)^1*(1 + C00064/Km_C00064_eEC6352)^1*(1 + C00655/Km_C00655_eEC6352)^1 + (1 + C00013/Km_C00013_eEC6352)^1*(1 + C00020/Km_C00020_eEC6352)^1*(1 + C00025/Km_C00025_eEC6352)^1*(1 + C00144/Km_C00144_eEC6352)^1 - 1;
  hKcat_F_R231 := Kcat_V_R231*(Keq_R231*Km_C00002_eEC6352^1*Km_C00064_eEC6352^1*Km_C00655_eEC6352^1/(Km_C00013_eEC6352^1*Km_C00020_eEC6352^1*Km_C00025_eEC6352^1*Km_C00144_eEC6352^1))^0.5;
  hKcat_R_R231 := Kcat_V_R231*(Keq_R231*Km_C00002_eEC6352^1*Km_C00064_eEC6352^1*Km_C00655_eEC6352^1/(Km_C00013_eEC6352^1*Km_C00020_eEC6352^1*Km_C00025_eEC6352^1*Km_C00144_eEC6352^1))^(-0.5);
  R231_f := eEC6352*(hKcat_F_R231*C00002^1*C00064^1*C00655^1/(Km_C00002_eEC6352^1*Km_C00064_eEC6352^1*Km_C00655_eEC6352^1))/R231_D;
  R231_r := eEC6352*(hKcat_R_R231*C00013^1*C00020^1*C00025^1*C00144^1/(Km_C00013_eEC6352^1*Km_C00020_eEC6352^1*Km_C00025_eEC6352^1*Km_C00144_eEC6352^1))/R231_D;
  R232_D := (1 + C00002/Km_C00002_eEC6352)^1*(1 + C00014/Km_C00014_eEC6352)^1*(1 + C00655/Km_C00655_eEC6352)^1 + (1 + C00013/Km_C00013_eEC6352)^1*(1 + C00020/Km_C00020_eEC6352)^1*(1 + C00144/Km_C00144_eEC6352)^1 - 1;
  hKcat_F_R232 := Kcat_V_R232*(Keq_R232*Km_C00002_eEC6352^1*Km_C00014_eEC6352^1*Km_C00655_eEC6352^1/(Km_C00013_eEC6352^1*Km_C00020_eEC6352^1*Km_C00144_eEC6352^1))^0.5;
  hKcat_R_R232 := Kcat_V_R232*(Keq_R232*Km_C00002_eEC6352^1*Km_C00014_eEC6352^1*Km_C00655_eEC6352^1/(Km_C00013_eEC6352^1*Km_C00020_eEC6352^1*Km_C00144_eEC6352^1))^(-0.5);
  R232_f := eEC6352*(hKcat_F_R232*C00002^1*C00014^1*C00655^1/(Km_C00002_eEC6352^1*Km_C00014_eEC6352^1*Km_C00655_eEC6352^1))/R232_D;
  R232_r := eEC6352*(hKcat_R_R232*C00013^1*C00020^1*C00144^1/(Km_C00013_eEC6352^1*Km_C00020_eEC6352^1*Km_C00144_eEC6352^1))/R232_D;
  R255_D := (1 + C00006/Km_C00006_eEC11142)^1*(1 + C00311/Km_C00311_eEC11142)^1 + (1 + C00005/Km_C00005_eEC11142)^1*(1 + C00011/Km_C00011_eEC11142)^1*(1 + C00026/Km_C00026_eEC11142)^1 - 1;
  hKcat_F_R255 := Kcat_V_R255*(Keq_R255*Km_C00006_eEC11142^1*Km_C00311_eEC11142^1/(Km_C00005_eEC11142^1*Km_C00011_eEC11142^1*Km_C00026_eEC11142^1))^0.5;
  hKcat_R_R255 := Kcat_V_R255*(Keq_R255*Km_C00006_eEC11142^1*Km_C00311_eEC11142^1/(Km_C00005_eEC11142^1*Km_C00011_eEC11142^1*Km_C00026_eEC11142^1))^(-0.5);
  R255_f := eEC11142*(hKcat_F_R255*C00006^1*C00311^1/(Km_C00006_eEC11142^1*Km_C00311_eEC11142^1))/R255_D;
  R255_r := eEC11142*(hKcat_R_R255*C00005^1*C00011^1*C00026^1/(Km_C00005_eEC11142^1*Km_C00011_eEC11142^1*Km_C00026_eEC11142^1))/R255_D;
  R256_D := (1 + C05379/Km_C05379_eEC11142)^1 + (1 + C00011/Km_C00011_eEC11142)^1*(1 + C00026/Km_C00026_eEC11142)^1 - 1;
  hKcat_F_R256 := Kcat_V_R256*(Keq_R256*Km_C05379_eEC11142^1/(Km_C00011_eEC11142^1*Km_C00026_eEC11142^1))^0.5;
  hKcat_R_R256 := Kcat_V_R256*(Keq_R256*Km_C05379_eEC11142^1/(Km_C00011_eEC11142^1*Km_C00026_eEC11142^1))^(-0.5);
  R256_f := eEC11142*(hKcat_F_R256*C05379^1/Km_C05379_eEC11142^1)/R256_D;
  R256_r := eEC11142*(hKcat_R_R256*C00011^1*C00026^1/(Km_C00011_eEC11142^1*Km_C00026_eEC11142^1))/R256_D;
  R257_D := (1 + C00006/Km_C00006_eEC11142)^1*(1 + C00311/Km_C00311_eEC11142)^1 + (1 + C00005/Km_C00005_eEC11142)^1*(1 + C05379/Km_C05379_eEC11142)^1 - 1;
  hKcat_F_R257 := Kcat_V_R257*(Keq_R257*Km_C00006_eEC11142^1*Km_C00311_eEC11142^1/(Km_C00005_eEC11142^1*Km_C05379_eEC11142^1))^0.5;
  hKcat_R_R257 := Kcat_V_R257*(Keq_R257*Km_C00006_eEC11142^1*Km_C00311_eEC11142^1/(Km_C00005_eEC11142^1*Km_C05379_eEC11142^1))^(-0.5);
  R257_f := eEC11142*(hKcat_F_R257*C00006^1*C00311^1/(Km_C00006_eEC11142^1*Km_C00311_eEC11142^1))/R257_D;
  R257_r := eEC11142*(hKcat_R_R257*C00005^1*C05379^1/(Km_C00005_eEC11142^1*Km_C05379_eEC11142^1))/R257_D;
  R258_D := (1 + C00311/Km_C00311_eEC4131)^1 + (1 + C00042/Km_C00042_eEC4131)^1*(1 + C00048/Km_C00048_eEC4131)^1 - 1;
  hKcat_F_R258 := Kcat_V_R258*(Keq_R258*Km_C00311_eEC4131^1/(Km_C00042_eEC4131^1*Km_C00048_eEC4131^1))^0.5;
  hKcat_R_R258 := Kcat_V_R258*(Keq_R258*Km_C00311_eEC4131^1/(Km_C00042_eEC4131^1*Km_C00048_eEC4131^1))^(-0.5);
  R258_f := eEC4131*(hKcat_F_R258*C00311^1/Km_C00311_eEC4131^1)/R258_D;
  R258_r := eEC4131*(hKcat_R_R258*C00042^1*C00048^1/(Km_C00042_eEC4131^1*Km_C00048_eEC4131^1))/R258_D;
  R268_D := (1 + C00003/Km_C00003_eEC11137)^1*(1 + C00149/Km_C00149_eEC11137)^1 + (1 + C00004/Km_C00004_eEC11137)^1*(1 + C00036/Km_C00036_eEC11137)^1 - 1;
  hKcat_F_R268 := Kcat_V_R268*(Keq_R268*Km_C00003_eEC11137^1*Km_C00149_eEC11137^1/(Km_C00004_eEC11137^1*Km_C00036_eEC11137^1))^0.5;
  hKcat_R_R268 := Kcat_V_R268*(Keq_R268*Km_C00003_eEC11137^1*Km_C00149_eEC11137^1/(Km_C00004_eEC11137^1*Km_C00036_eEC11137^1))^(-0.5);
  R268_f := eEC11137*(hKcat_F_R268*C00003^1*C00149^1/(Km_C00003_eEC11137^1*Km_C00149_eEC11137^1))/R268_D;
  R268_r := eEC11137*(hKcat_R_R268*C00004^1*C00036^1/(Km_C00004_eEC11137^1*Km_C00036_eEC11137^1))/R268_D;
  R270_D := (1 + C00003/Km_C00003_eEC11138)^1*(1 + C00149/Km_C00149_eEC11138)^1 + (1 + C00004/Km_C00004_eEC11138)^1*(1 + C00011/Km_C00011_eEC11138)^1*(1 + C00022/Km_C00022_eEC11138)^1 - 1;
  hKcat_F_R270 := Kcat_V_R270*(Keq_R270*Km_C00003_eEC11138^1*Km_C00149_eEC11138^1/(Km_C00004_eEC11138^1*Km_C00011_eEC11138^1*Km_C00022_eEC11138^1))^0.5;
  hKcat_R_R270 := Kcat_V_R270*(Keq_R270*Km_C00003_eEC11138^1*Km_C00149_eEC11138^1/(Km_C00004_eEC11138^1*Km_C00011_eEC11138^1*Km_C00022_eEC11138^1))^(-0.5);
  R270_f := eEC11138*(hKcat_F_R270*C00003^1*C00149^1/(Km_C00003_eEC11138^1*Km_C00149_eEC11138^1))/R270_D;
  R270_r := eEC11138*(hKcat_R_R270*C00004^1*C00011^1*C00022^1/(Km_C00004_eEC11138^1*Km_C00011_eEC11138^1*Km_C00022_eEC11138^1))/R270_D;
  R271_D := (1 + C00036/Km_C00036_eEC11138)^1 + (1 + C00011/Km_C00011_eEC11138)^1*(1 + C00022/Km_C00022_eEC11138)^1 - 1;
  hKcat_F_R271 := Kcat_V_R271*(Keq_R271*Km_C00036_eEC11138^1/(Km_C00011_eEC11138^1*Km_C00022_eEC11138^1))^0.5;
  hKcat_R_R271 := Kcat_V_R271*(Keq_R271*Km_C00036_eEC11138^1/(Km_C00011_eEC11138^1*Km_C00022_eEC11138^1))^(-0.5);
  R271_f := eEC11138*(hKcat_F_R271*C00036^1/Km_C00036_eEC11138^1)/R271_D;
  R271_r := eEC11138*(hKcat_R_R271*C00011^1*C00022^1/(Km_C00011_eEC11138^1*Km_C00022_eEC11138^1))/R271_D;
  R272_D := (1 + C00006/Km_C00006_eEC11140)^1*(1 + C00149/Km_C00149_eEC11140)^1 + (1 + C00005/Km_C00005_eEC11140)^1*(1 + C00011/Km_C00011_eEC11140)^1*(1 + C00022/Km_C00022_eEC11140)^1 - 1;
  hKcat_F_R272 := Kcat_V_R272*(Keq_R272*Km_C00006_eEC11140^1*Km_C00149_eEC11140^1/(Km_C00005_eEC11140^1*Km_C00011_eEC11140^1*Km_C00022_eEC11140^1))^0.5;
  hKcat_R_R272 := Kcat_V_R272*(Keq_R272*Km_C00006_eEC11140^1*Km_C00149_eEC11140^1/(Km_C00005_eEC11140^1*Km_C00011_eEC11140^1*Km_C00022_eEC11140^1))^(-0.5);
  R272_f := eEC11140*(hKcat_F_R272*C00006^1*C00149^1/(Km_C00006_eEC11140^1*Km_C00149_eEC11140^1))/R272_D;
  R272_r := eEC11140*(hKcat_R_R272*C00005^1*C00011^1*C00022^1/(Km_C00005_eEC11140^1*Km_C00011_eEC11140^1*Km_C00022_eEC11140^1))/R272_D;
  R273_D := (1 + C00036/Km_C00036_eEC11140)^1 + (1 + C00011/Km_C00011_eEC11140)^1*(1 + C00022/Km_C00022_eEC11140)^1 - 1;
  hKcat_F_R273 := Kcat_V_R273*(Keq_R273*Km_C00036_eEC11140^1/(Km_C00011_eEC11140^1*Km_C00022_eEC11140^1))^0.5;
  hKcat_R_R273 := Kcat_V_R273*(Keq_R273*Km_C00036_eEC11140^1/(Km_C00011_eEC11140^1*Km_C00022_eEC11140^1))^(-0.5);
  R273_f := eEC11140*(hKcat_F_R273*C00036^1/Km_C00036_eEC11140^1)/R273_D;
  R273_r := eEC11140*(hKcat_R_R273*C00011^1*C00022^1/(Km_C00011_eEC11140^1*Km_C00022_eEC11140^1))/R273_D;
  R277_D := (1 + C00009/Km_C00009_eEC2516)^1*(1 + C00013/Km_C00013_eEC2516)^1*(1 + C00019/Km_C00019_eEC2516)^1 + (1 + C00002/Km_C00002_eEC2516)^1*(1 + C00073/Km_C00073_eEC2516)^1 - 1;
  hKcat_F_R277 := Kcat_V_R277*(Keq_R277*Km_C00009_eEC2516^1*Km_C00013_eEC2516^1*Km_C00019_eEC2516^1/(Km_C00002_eEC2516^1*Km_C00073_eEC2516^1))^0.5;
  hKcat_R_R277 := Kcat_V_R277*(Keq_R277*Km_C00009_eEC2516^1*Km_C00013_eEC2516^1*Km_C00019_eEC2516^1/(Km_C00002_eEC2516^1*Km_C00073_eEC2516^1))^(-0.5);
  R277_f := eEC2516*(hKcat_F_R277*C00009^1*C00013^1*C00019^1/(Km_C00009_eEC2516^1*Km_C00013_eEC2516^1*Km_C00019_eEC2516^1))/R277_D;
  R277_r := eEC2516*(hKcat_R_R277*C00002^1*C00073^1/(Km_C00002_eEC2516^1*Km_C00073_eEC2516^1))/R277_D;
  R279_D := (1 + C00111/Km_C00111_eEC4233)^1 + (1 + C00009/Km_C00009_eEC4233)^1*(1 + C00546/Km_C00546_eEC4233)^1 - 1;
  hKcat_F_R279 := Kcat_V_R279*(Keq_R279*Km_C00111_eEC4233^1/(Km_C00009_eEC4233^1*Km_C00546_eEC4233^1))^0.5;
  hKcat_R_R279 := Kcat_V_R279*(Keq_R279*Km_C00111_eEC4233^1/(Km_C00009_eEC4233^1*Km_C00546_eEC4233^1))^(-0.5);
  R279_f := eEC4233*(hKcat_F_R279*C00111^1/Km_C00111_eEC4233^1)/R279_D;
  R279_r := eEC4233*(hKcat_R_R279*C00009^1*C00546^1/(Km_C00009_eEC4233^1*Km_C00546_eEC4233^1))/R279_D;
  R299_D := (1 + C00003/Km_C00003_eEC1242)^1*(1 + C00010/Km_C00010_eEC1242)^1*(1 + C00322/Km_C00322_eEC1242)^1 + (1 + C00004/Km_C00004_eEC1242)^1*(1 + C00011/Km_C00011_eEC1242)^1*(1 + C00527/Km_C00527_eEC1242)^1 - 1;
  hKcat_F_R299 := Kcat_V_R299*(Keq_R299*Km_C00003_eEC1242^1*Km_C00010_eEC1242^1*Km_C00322_eEC1242^1/(Km_C00004_eEC1242^1*Km_C00011_eEC1242^1*Km_C00527_eEC1242^1))^0.5;
  hKcat_R_R299 := Kcat_V_R299*(Keq_R299*Km_C00003_eEC1242^1*Km_C00010_eEC1242^1*Km_C00322_eEC1242^1/(Km_C00004_eEC1242^1*Km_C00011_eEC1242^1*Km_C00527_eEC1242^1))^(-0.5);
  R299_f := eEC1242*(hKcat_F_R299*C00003^1*C00010^1*C00322^1/(Km_C00003_eEC1242^1*Km_C00010_eEC1242^1*Km_C00322_eEC1242^1))/R299_D;
  R299_r := eEC1242*(hKcat_R_R299*C00004^1*C00011^1*C00527^1/(Km_C00004_eEC1242^1*Km_C00011_eEC1242^1*Km_C00527_eEC1242^1))/R299_D;
  R300_D := (1 + C00003/Km_C00003_eEC1242)^1*(1 + C00010/Km_C00010_eEC1242)^1*(1 + C00026/Km_C00026_eEC1242)^1 + (1 + C00004/Km_C00004_eEC1242)^1*(1 + C00011/Km_C00011_eEC1242)^1*(1 + C00091/Km_C00091_eEC1242)^1 - 1;
  hKcat_F_R300 := Kcat_V_R300*(Keq_R300*Km_C00003_eEC1242^1*Km_C00010_eEC1242^1*Km_C00026_eEC1242^1/(Km_C00004_eEC1242^1*Km_C00011_eEC1242^1*Km_C00091_eEC1242^1))^0.5;
  hKcat_R_R300 := Kcat_V_R300*(Keq_R300*Km_C00003_eEC1242^1*Km_C00010_eEC1242^1*Km_C00026_eEC1242^1/(Km_C00004_eEC1242^1*Km_C00011_eEC1242^1*Km_C00091_eEC1242^1))^(-0.5);
  R300_f := eEC1242*(hKcat_F_R300*C00003^1*C00010^1*C00026^1/(Km_C00003_eEC1242^1*Km_C00010_eEC1242^1*Km_C00026_eEC1242^1))/R300_D;
  R300_r := eEC1242*(hKcat_R_R300*C00004^1*C00011^1*C00091^1/(Km_C00004_eEC1242^1*Km_C00011_eEC1242^1*Km_C00091_eEC1242^1))/R300_D;
  R308_D := (1 + C00009/Km_C00009_eEC41131)^1*(1 + C00036/Km_C00036_eEC41131)^1 + (1 + C00011/Km_C00011_eEC41131)^1*(1 + C00074/Km_C00074_eEC41131)^1 - 1;
  hKcat_F_R308 := Kcat_V_R308*(Keq_R308*Km_C00009_eEC41131^1*Km_C00036_eEC41131^1/(Km_C00011_eEC41131^1*Km_C00074_eEC41131^1))^0.5;
  hKcat_R_R308 := Kcat_V_R308*(Keq_R308*Km_C00009_eEC41131^1*Km_C00036_eEC41131^1/(Km_C00011_eEC41131^1*Km_C00074_eEC41131^1))^(-0.5);
  R308_f := eEC41131*(hKcat_F_R308*C00009^1*C00036^1/(Km_C00009_eEC41131^1*Km_C00036_eEC41131^1))/R308_D;
  R308_r := eEC41131*(hKcat_R_R308*C00011^1*C00074^1/(Km_C00011_eEC41131^1*Km_C00074_eEC41131^1))/R308_D;
  R312_D := (1 + C00006/Km_C00006_eEC11144)^1*(1 + C00345/Km_C00345_eEC11144)^1 + (1 + C00005/Km_C00005_eEC11144)^1*(1 + C00011/Km_C00011_eEC11144)^1*(1 + C00199/Km_C00199_eEC11144)^1 - 1;
  hKcat_F_R312 := Kcat_V_R312*(Keq_R312*Km_C00006_eEC11144^1*Km_C00345_eEC11144^1/(Km_C00005_eEC11144^1*Km_C00011_eEC11144^1*Km_C00199_eEC11144^1))^0.5;
  hKcat_R_R312 := Kcat_V_R312*(Keq_R312*Km_C00006_eEC11144^1*Km_C00345_eEC11144^1/(Km_C00005_eEC11144^1*Km_C00011_eEC11144^1*Km_C00199_eEC11144^1))^(-0.5);
  R312_f := eEC11144*(hKcat_F_R312*C00006^1*C00345^1/(Km_C00006_eEC11144^1*Km_C00345_eEC11144^1))/R312_D;
  R312_r := eEC11144*(hKcat_R_R312*C00005^1*C00011^1*C00199^1/(Km_C00005_eEC11144^1*Km_C00011_eEC11144^1*Km_C00199_eEC11144^1))/R312_D;
  R318_D := (1 + C00631/Km_C00631_eEC42111)^1 + (1 + C00074/Km_C00074_eEC42111)^1 - 1;
  hKcat_F_R318 := Kcat_V_R318*(Keq_R318*Km_C00631_eEC42111^1/Km_C00074_eEC42111^1)^0.5;
  hKcat_R_R318 := Kcat_V_R318*(Keq_R318*Km_C00631_eEC42111^1/Km_C00074_eEC42111^1)^(-0.5);
  R318_f := eEC42111*(hKcat_F_R318*C00631^1/Km_C00631_eEC42111^1)/R318_D;
  R318_r := eEC42111*(hKcat_R_R318*C00074^1/Km_C00074_eEC42111^1)/R318_D;
  R324_D := (1 + C00002/Km_C00002_eEC6353)^1*(1 + C00064/Km_C00064_eEC6353)^1*(1 + C04376/Km_C04376_eEC6353)^1 + (1 + C00008/Km_C00008_eEC6353)^1*(1 + C00009/Km_C00009_eEC6353)^1*(1 + C00025/Km_C00025_eEC6353)^1*(1 + C04640/Km_C04640_eEC6353)^1 - 1;
  hKcat_F_R324 := Kcat_V_R324*(Keq_R324*Km_C00002_eEC6353^1*Km_C00064_eEC6353^1*Km_C04376_eEC6353^1/(Km_C00008_eEC6353^1*Km_C00009_eEC6353^1*Km_C00025_eEC6353^1*Km_C04640_eEC6353^1))^0.5;
  hKcat_R_R324 := Kcat_V_R324*(Keq_R324*Km_C00002_eEC6353^1*Km_C00064_eEC6353^1*Km_C04376_eEC6353^1/(Km_C00008_eEC6353^1*Km_C00009_eEC6353^1*Km_C00025_eEC6353^1*Km_C04640_eEC6353^1))^(-0.5);
  R324_f := eEC6353*(hKcat_F_R324*C00002^1*C00064^1*C04376^1/(Km_C00002_eEC6353^1*Km_C00064_eEC6353^1*Km_C04376_eEC6353^1))/R324_D;
  R324_r := eEC6353*(hKcat_R_R324*C00008^1*C00009^1*C00025^1*C04640^1/(Km_C00008_eEC6353^1*Km_C00009_eEC6353^1*Km_C00025_eEC6353^1*Km_C04640_eEC6353^1))/R324_D;
  R346_D := (1 + C00003/Km_C00003_eEC1241)^1*(1 + C00010/Km_C00010_eEC1241)^1*(1 + C00022/Km_C00022_eEC1241)^1 + (1 + C00004/Km_C00004_eEC1241)^1*(1 + C00011/Km_C00011_eEC1241)^1*(1 + C00024/Km_C00024_eEC1241)^1 - 1;
  hKcat_F_R346 := Kcat_V_R346*(Keq_R346*Km_C00003_eEC1241^1*Km_C00010_eEC1241^1*Km_C00022_eEC1241^1/(Km_C00004_eEC1241^1*Km_C00011_eEC1241^1*Km_C00024_eEC1241^1))^0.5;
  hKcat_R_R346 := Kcat_V_R346*(Keq_R346*Km_C00003_eEC1241^1*Km_C00010_eEC1241^1*Km_C00022_eEC1241^1/(Km_C00004_eEC1241^1*Km_C00011_eEC1241^1*Km_C00024_eEC1241^1))^(-0.5);
  R346_f := eEC1241*(hKcat_F_R346*C00003^1*C00010^1*C00022^1/(Km_C00003_eEC1241^1*Km_C00010_eEC1241^1*Km_C00022_eEC1241^1))/R346_D;
  R346_r := eEC1241*(hKcat_R_R346*C00004^1*C00011^1*C00024^1/(Km_C00004_eEC1241^1*Km_C00011_eEC1241^1*Km_C00024_eEC1241^1))/R346_D;
  R367_D := (1 + C00002/Km_C00002_eEC27171)^1*(1 + C00493/Km_C00493_eEC27171)^1 + (1 + C00008/Km_C00008_eEC27171)^1*(1 + C03175/Km_C03175_eEC27171)^1 - 1;
  hKcat_F_R367 := Kcat_V_R367*(Keq_R367*Km_C00002_eEC27171^1*Km_C00493_eEC27171^1/(Km_C00008_eEC27171^1*Km_C03175_eEC27171^1))^0.5;
  hKcat_R_R367 := Kcat_V_R367*(Keq_R367*Km_C00002_eEC27171^1*Km_C00493_eEC27171^1/(Km_C00008_eEC27171^1*Km_C03175_eEC27171^1))^(-0.5);
  R367_f := eEC27171*(hKcat_F_R367*C00002^1*C00493^1/(Km_C00002_eEC27171^1*Km_C00493_eEC27171^1))/R367_D;
  R367_r := eEC27171*(hKcat_R_R367*C00008^1*C03175^1/(Km_C00008_eEC27171^1*Km_C03175_eEC27171^1))/R367_D;
  R371_D := (1 + C00042/Km_C00042_eEC1351)^1*(1 + C00399/Km_C00399_eEC1351)^1 + (1 + C00122/Km_C00122_eEC1351)^1*(1 + C00390/Km_C00390_eEC1351)^1 - 1;
  hKcat_F_R371 := Kcat_V_R371*(Keq_R371*Km_C00042_eEC1351^1*Km_C00399_eEC1351^1/(Km_C00122_eEC1351^1*Km_C00390_eEC1351^1))^0.5;
  hKcat_R_R371 := Kcat_V_R371*(Keq_R371*Km_C00042_eEC1351^1*Km_C00399_eEC1351^1/(Km_C00122_eEC1351^1*Km_C00390_eEC1351^1))^(-0.5);
  R371_f := eEC1351*(hKcat_F_R371*C00042^1*C00399^1/(Km_C00042_eEC1351^1*Km_C00399_eEC1351^1))/R371_D;
  R371_r := eEC1351*(hKcat_R_R371*C00122^1*C00390^1/(Km_C00122_eEC1351^1*Km_C00390_eEC1351^1))/R371_D;
  R372_D := (1 + C00002/Km_C00002_eEC6215)^1*(1 + C00010/Km_C00010_eEC6215)^1*(1 + C00042/Km_C00042_eEC6215)^1 + (1 + C00008/Km_C00008_eEC6215)^1*(1 + C00009/Km_C00009_eEC6215)^1*(1 + C00091/Km_C00091_eEC6215)^1 - 1;
  hKcat_F_R372 := Kcat_V_R372*(Keq_R372*Km_C00002_eEC6215^1*Km_C00010_eEC6215^1*Km_C00042_eEC6215^1/(Km_C00008_eEC6215^1*Km_C00009_eEC6215^1*Km_C00091_eEC6215^1))^0.5;
  hKcat_R_R372 := Kcat_V_R372*(Keq_R372*Km_C00002_eEC6215^1*Km_C00010_eEC6215^1*Km_C00042_eEC6215^1/(Km_C00008_eEC6215^1*Km_C00009_eEC6215^1*Km_C00091_eEC6215^1))^(-0.5);
  R372_f := eEC6215*(hKcat_F_R372*C00002^1*C00010^1*C00042^1/(Km_C00002_eEC6215^1*Km_C00010_eEC6215^1*Km_C00042_eEC6215^1))/R372_D;
  R372_r := eEC6215*(hKcat_R_R372*C00008^1*C00009^1*C00091^1/(Km_C00008_eEC6215^1*Km_C00009_eEC6215^1*Km_C00091_eEC6215^1))/R372_D;
  R373_D := (1 + C00002/Km_C00002_eEC6215)^1*(1 + C00010/Km_C00010_eEC6215)^1*(1 + C00490/Km_C00490_eEC6215)^1 + (1 + C00008/Km_C00008_eEC6215)^1*(1 + C00009/Km_C00009_eEC6215)^1*(1 + C00531/Km_C00531_eEC6215)^1 - 1;
  hKcat_F_R373 := Kcat_V_R373*(Keq_R373*Km_C00002_eEC6215^1*Km_C00010_eEC6215^1*Km_C00490_eEC6215^1/(Km_C00008_eEC6215^1*Km_C00009_eEC6215^1*Km_C00531_eEC6215^1))^0.5;
  hKcat_R_R373 := Kcat_V_R373*(Keq_R373*Km_C00002_eEC6215^1*Km_C00010_eEC6215^1*Km_C00490_eEC6215^1/(Km_C00008_eEC6215^1*Km_C00009_eEC6215^1*Km_C00531_eEC6215^1))^(-0.5);
  R373_f := eEC6215*(hKcat_F_R373*C00002^1*C00010^1*C00490^1/(Km_C00002_eEC6215^1*Km_C00010_eEC6215^1*Km_C00490_eEC6215^1))/R373_D;
  R373_r := eEC6215*(hKcat_R_R373*C00008^1*C00009^1*C00531^1/(Km_C00008_eEC6215^1*Km_C00009_eEC6215^1*Km_C00531_eEC6215^1))/R373_D;
  R403_D := (1 + C00103/Km_C00103_eEC31310)^1 + (1 + C00009/Km_C00009_eEC31310)^1*(1 + C00031/Km_C00031_eEC31310)^1 - 1;
  hKcat_F_R403 := Kcat_V_R403*(Keq_R403*Km_C00103_eEC31310^1/(Km_C00009_eEC31310^1*Km_C00031_eEC31310^1))^0.5;
  hKcat_R_R403 := Kcat_V_R403*(Keq_R403*Km_C00103_eEC31310^1/(Km_C00009_eEC31310^1*Km_C00031_eEC31310^1))^(-0.5);
  R403_f := eEC31310*(hKcat_F_R403*C00103^1/Km_C00103_eEC31310^1)/R403_D;
  R403_r := eEC31310*(hKcat_R_R403*C00009^1*C00031^1/(Km_C00009_eEC31310^1*Km_C00031_eEC31310^1))/R403_D;
  R406_D := (1 + C00065/Km_C00065_hEC43117)^1 + (1 + C00014/Km_C00014_hEC43117)^1*(1 + C00022/Km_C00022_hEC43117)^1 - 1;
  hKcat_F_R406 := Kcat_V_R406*(Keq_R406*Km_C00065_hEC43117^1/(Km_C00014_hEC43117^1*Km_C00022_hEC43117^1))^0.5;
  hKcat_R_R406 := Kcat_V_R406*(Keq_R406*Km_C00065_hEC43117^1/(Km_C00014_hEC43117^1*Km_C00022_hEC43117^1))^(-0.5);
  R406_f := hEC43117*(hKcat_F_R406*C00065^1/Km_C00065_hEC43117^1)/R406_D;
  R406_r := hEC43117*(hKcat_R_R406*C00014^1*C00022^1/(Km_C00014_hEC43117^1*Km_C00022_hEC43117^1))/R406_D;
  R197_D := (1 + C00003/Km_C00003_hEC11719)^1*(1 + C00058/Km_C00058_hEC11719)^1 + (1 + C00004/Km_C00004_hEC11719)^1*(1 + C00011/Km_C00011_hEC11719)^1 - 1;
  hKcat_F_R197 := Kcat_V_R197*(Keq_R197*Km_C00003_hEC11719^1*Km_C00058_hEC11719^1/(Km_C00004_hEC11719^1*Km_C00011_hEC11719^1))^0.5;
  hKcat_R_R197 := Kcat_V_R197*(Keq_R197*Km_C00003_hEC11719^1*Km_C00058_hEC11719^1/(Km_C00004_hEC11719^1*Km_C00011_hEC11719^1))^(-0.5);
  R197_f := hEC11719*(hKcat_F_R197*C00003^1*C00058^1/(Km_C00003_hEC11719^1*Km_C00058_hEC11719^1))/R197_D;
  R197_r := hEC11719*(hKcat_R_R197*C00004^1*C00011^1/(Km_C00004_hEC11719^1*Km_C00011_hEC11719^1))/R197_D;
  R269_D := (1 + C00003/Km_C00003_hEC11137)^1*(1 + C00149/Km_C00149_hEC11137)^1 + (1 + C00004/Km_C00004_hEC11137)^1*(1 + C00036/Km_C00036_hEC11137)^1 - 1;
  hKcat_F_R269 := Kcat_V_R269*(Keq_R269*Km_C00003_hEC11137^1*Km_C00149_hEC11137^1/(Km_C00004_hEC11137^1*Km_C00036_hEC11137^1))^0.5;
  hKcat_R_R269 := Kcat_V_R269*(Keq_R269*Km_C00003_hEC11137^1*Km_C00149_hEC11137^1/(Km_C00004_hEC11137^1*Km_C00036_hEC11137^1))^(-0.5);
  R269_f := hEC11137*(hKcat_F_R269*C00003^1*C00149^1/(Km_C00003_hEC11137^1*Km_C00149_hEC11137^1))/R269_D;
  R269_r := hEC11137*(hKcat_R_R269*C00004^1*C00036^1/(Km_C00004_hEC11137^1*Km_C00036_hEC11137^1))/R269_D;
  R345_D := (1 + C00002/Km_C00002_hEC6411)^1*(1 + C00022/Km_C00022_hEC6411)^1*(1 + C00011/Km_C00011_hEC6411)^1 + (1 + C00008/Km_C00008_hEC6411)^1*(1 + C00009/Km_C00009_hEC6411)^1*(1 + C00036/Km_C00036_hEC6411)^1 - 1;
  hKcat_F_R345 := Kcat_V_R345*(Keq_R345*Km_C00002_hEC6411^1*Km_C00022_hEC6411^1*Km_C00011_hEC6411^1/(Km_C00008_hEC6411^1*Km_C00009_hEC6411^1*Km_C00036_hEC6411^1))^0.5;
  hKcat_R_R345 := Kcat_V_R345*(Keq_R345*Km_C00002_hEC6411^1*Km_C00022_hEC6411^1*Km_C00011_hEC6411^1/(Km_C00008_hEC6411^1*Km_C00009_hEC6411^1*Km_C00036_hEC6411^1))^(-0.5);
  R345_f := hEC6411*(hKcat_F_R345*C00002^1*C00022^1*C00011^1/(Km_C00002_hEC6411^1*Km_C00022_hEC6411^1*Km_C00011_hEC6411^1))/R345_D;
  R345_r := hEC6411*(hKcat_R_R345*C00008^1*C00009^1*C00036^1/(Km_C00008_hEC6411^1*Km_C00009_hEC6411^1*Km_C00036_hEC6411^1))/R345_D;

  // Reactions:
  R2: C00083 + C00229 + eEC23139 -> eEC23139 + C00010 + C01209; R2_f - R2_r;
  R56: C00002 + C00033 + eEC2721 -> eEC2721 + C00008 + C00227; R56_f - R56_r;
  R57: C00002 + C00163 + eEC2721 -> eEC2721 + C00008 + C02876; R57_f - R57_r;
  R58: C00002 + C00010 + C00033 + eEC6211 -> eEC6211 + C00013 + C00020 + C00024; R58_f - R58_r;
  R59: C00010 + C05993 + eEC6211 -> eEC6211 + C00020 + C00024; R59_f - R59_r;
  R60: C00002 + C00033 + eEC6211 -> eEC6211 + C00013 + C05993; R60_f - R60_r;
  R61: C00002 + C00010 + C00163 + eEC6211 -> eEC6211 + C00013 + C00020 + C00100; R61_f - R61_r;
  R62: C00011 + C06010 + eEC2216 -> eEC2216 + 2 C00022; R62_f - R62_r;
  R63: C00022 + C00109 + eEC2216 -> eEC2216 + C00011 + C06006; R63_f - R63_r;
  R64: C00002 + C00024 + C00011 + eEC6412 -> eEC6412 + C00008 + C00009 + C00083; R64_f - R64_r;
  R69: C00158 + eEC4213 -> eEC4213 + C00311; R69_f - R69_r;
  R70: C00158 + eEC4213 -> eEC4213 + C00001 + C00417; R70_f - R70_r;
  R71: C00311 + eEC4213 -> eEC4213 + C00001 + C00417; R71_f - R71_r;
  R102: C00002 + C00049 + C00327 + eEC6345 -> eEC6345 + C00013 + C00020 + C03406; R102_f - R102_r;
  R107: C00001 + C00064 + eEC6354 -> eEC6354 + C00014 + C00025; R107_f - R107_r;
  R108: C00002 + C00014 + C00049 + eEC6354 -> eEC6354 + C00013 + C00020 + C00152; R108_f - R108_r;
  R109: C00001 + C00002 + C00049 + C00064 + eEC6354 -> eEC6354 + C00013 + C00020 + C00025 + C00152; R109_f - R109_r;
  R111: C00049 + eEC4311 -> eEC4311 + C00014 + C00122; R111_f - R111_r;
  R123: C00002 + C00010 + C00158 + eEC2338 -> eEC2338 + C00008 + C00009 + C00024 + C00036; R123_f - R123_r;
  R129: C00001 + C00185 + eEC32121 -> eEC32121 + 2 C00031; R129_f - R129_r;
  R130: C00001 + C00760 + eEC32121 -> eEC32121 + C00221 + C00760; R130_f - R130_r;
  R131: C00001 + C01798 + eEC32121 -> eEC32121 + C00267 + C01335; R131_f - R131_r;
  R154: C00001 + C00064 + eEC6355 -> eEC6355 + C00014 + C00025; R154_f - R154_r;
  R155: C00001 + 2 C00002 + C00064 + C00011 + eEC6355 -> eEC6355 + 2 C00008 + C00009 + C00025 + C00169; R155_f - R155_r;
  R157: C00010 + C00158 + eEC23316 -> eEC23316 + C00001 + C00024 + C00036; R157_f - R157_r;
  R181: C00003 + C00256 + eEC11128 -> eEC11128 + C00004 + C00022 + C00080; R181_f - R181_r;
  R199: C00001 + C00354 + eEC31311 -> eEC31311 + C00009 + C00085; R199_f - R199_r;
  R200: C00001 + C00447 + eEC31311 -> eEC31311 + C00009 + C05382; R200_f - R200_r;
  R201: C00354 + eEC41213 -> eEC41213 + C00111 + C00118; R201_f - R201_r;
  R202: C00447 + eEC41213 -> eEC41213 + C00111 + C00279; R202_f - R202_r;
  R203: C01094 + eEC41213 -> eEC41213 + C00111 + C00577; R203_f - R203_r;
  R204: C00149 + eEC4212 -> eEC4212 + C00001 + C00122; R204_f - R204_r;
  R208: C00006 + C01172 + eEC11149 -> eEC11149 + C00005 + C00080 + C01236; R208_f - R208_r;
  R209: C00092 + eEC5319 -> eEC5319 + C00085; R209_f - R209_r;
  R210: C00668 + eEC5319 -> eEC5319 + C01172; R210_f - R210_r;
  R213: C00006 + C00009 + C01165 + eEC12141 -> eEC12141 + C00005 + C00080 + C03287; R213_f - R213_r;
  R216: C00002 + C00014 + C00025 + eEC6312 -> eEC6312 + C00008 + C00009 + C00064; R216_f - R216_r;
  R222: C00003 + C00009 + C00118 + eEC12112 -> eEC12112 + C00004 + C00080 + C00236; R222_f - R222_r;
  R224: C00024 + C00037 + eEC23129 -> eEC23129 + C00010 + C03508; R224_f - R224_r;
  R225: C00037 + C02051 + eEC1442 -> eEC1442 + C00011 + C01242; R225_f - R225_r;
  R226: C00003 + C00037 + C00101 + eEC1442 -> eEC1442 + C00004 + C00011 + C00014 + C00080 + C00143; R226_f - R226_r;
  R227: C00001 + C00037 + C00143 + eEC2121 -> eEC2121 + C00065 + C00101; R227_f - R227_r;
  R228: C00065 + C01217 + eEC2121 -> eEC2121 + C00001 + C00037 + C04377; R228_f - R228_r;
  R231: C00001 + C00002 + C00064 + C00655 + eEC6352 -> eEC6352 + C00013 + C00020 + C00025 + C00144; R231_f - R231_r;
  R232: C00002 + C00014 + C00655 + eEC6352 -> eEC6352 + C00013 + C00020 + C00144; R232_f - R232_r;
  R255: C00006 + C00311 + eEC11142 -> eEC11142 + C00005 + C00011 + C00026 + C00080; R255_f - R255_r;
  R256: C05379 + eEC11142 -> eEC11142 + C00011 + C00026; R256_f - R256_r;
  R257: C00006 + C00311 + eEC11142 -> eEC11142 + C00005 + C00080 + C05379; R257_f - R257_r;
  R258: C00311 + eEC4131 -> eEC4131 + C00042 + C00048; R258_f - R258_r;
  R268: C00003 + C00149 + eEC11137 -> eEC11137 + C00004 + C00036 + C00080; R268_f - R268_r;
  R270: C00003 + C00149 + eEC11138 -> eEC11138 + C00004 + C00011 + C00022 + C00080; R270_f - R270_r;
  R271: C00036 + eEC11138 -> eEC11138 + C00011 + C00022; R271_f - R271_r;
  R272: C00006 + C00149 + eEC11140 -> eEC11140 + C00005 + C00011 + C00022 + C00080; R272_f - R272_r;
  R273: C00036 + eEC11140 -> eEC11140 + C00011 + C00022; R273_f - R273_r;
  R277: C00009 + C00013 + C00019 + eEC2516 -> eEC2516 + C00001 + C00002 + C00073; R277_f - R277_r;
  R279: C00111 + eEC4233 -> eEC4233 + C00009 + C00546; R279_f - R279_r;
  R299: C00003 + C00010 + C00322 + eEC1242 -> eEC1242 + C00004 + C00011 + C00080 + C00527; R299_f - R299_r;
  R300: C00003 + C00010 + C00026 + eEC1242 -> eEC1242 + C00004 + C00011 + C00080 + C00091; R300_f - R300_r;
  R308: C00009 + C00036 + eEC41131 -> eEC41131 + C00001 + C00011 + C00074; R308_f - R308_r;
  R312: C00006 + C00345 + eEC11144 -> eEC11144 + C00005 + C00011 + C00080 + C00199; R312_f - R312_r;
  R318: C00631 + eEC42111 -> eEC42111 + C00001 + C00074; R318_f - R318_r;
  R324: C00001 + C00002 + C00064 + C04376 + eEC6353 -> eEC6353 + C00008 + C00009 + C00025 + C04640; R324_f - R324_r;
  R346: C00003 + C00010 + C00022 + eEC1241 -> eEC1241 + C00004 + C00011 + C00024 + C00080; R346_f - R346_r;
  R367: C00002 + C00493 + eEC27171 -> eEC27171 + C00008 + C03175; R367_f - R367_r;
  R371: C00042 + C00399 + eEC1351 -> eEC1351 + C00122 + C00390; R371_f - R371_r;
  R372: C00002 + C00010 + C00042 + eEC6215 -> eEC6215 + C00008 + C00009 + C00091; R372_f - R372_r;
  R373: C00002 + C00010 + C00490 + eEC6215 -> eEC6215 + C00008 + C00009 + C00531; R373_f - R373_r;
  R403: C00001 + C00103 + eEC31310 -> eEC31310 + C00009 + C00031; R403_f - R403_r;
  R406: C00065 + hEC43117 -> hEC43117 + C00014 + C00022; R406_f - R406_r;
  R197: C00003 + C00058 + hEC11719 -> hEC11719 + C00004 + C00011 + C00080; R197_f - R197_r;
  R269: C00003 + C00149 + hEC11137 -> hEC11137 + C00004 + C00036 + C00080; R269_f - R269_r;
  R345: C00002 + C00022 + C00011 + hEC6411 -> hEC6411 + C00008 + C00009 + C00036; R345_f - R345_r;
end
